# 丙烯生产 | 丙烯 | 石脑油路线 | 石脑油

Dataset: ILCD process, Unit process, black box
Geography: CN
Reference year: 2010
Classification: Materials production / Other mineralic materials
Functional unit: The functional unit is 1t of propylene product
LCI method principle: Attributional
LCI method approaches: Allocation - mass
Generated by: 任亚楠, renyn15@tsinghua.org.cn
Review: Dependent internal review by Tiangong LCI Data Working Group
Amounts: no units in this file; such an amount is in the reference unit of its flow, which a separate flow dataset defines
copyright: false

## General comment
2010年中石化和中石油的4家百万吨企业；乙烯联合装置，副产丙烯

## Geography
2010年中石化和中石油的4家百万吨企业

## Technology and included processes
我国丙烯生产的原料较多且来源复杂，主要包括石脑油、加裂尾油、富乙烯气和液化气等 ，因此本研究对乙烯的生产主要考察管式炉蒸汽裂解法，上游原料为四种石油炼制产品。

## Reference product
- propene (propylene): 1000; measured
  丙烯

## Inputs
All rows: measured
- naphtha: 700
  石脑油
- tall oil: 230
  加裂尾油
- LPG - liquefied petroleum gas: 50
  液化气
- ethene (ethylene): 30
  富乙烯气
- electricity mix: 137.484
  电
- light fuel oil: 126.13
  燃料油
- natural gas: 53.87
  燃料气

## Outputs
- carbon dioxide: 560; article inperiodical
  CO2
- carbon monoxide: 0.03079; measured
  CO
- sulfur dioxide: 1.36854; measured
  SO2
- nitrogen monoxide: 0.30795; measured
  NOx
- methane: 0.01854; measured
  CH4
- nitrous oxide: 0.00331; measured
  N2O
- total suspended solids, unspecified: 0.31159; measured
  TSP
- Water (groundwater from technosphere, waste water): 92.72; measured
  废水
- chemical oxygen demand: 0.0053; measured
  COD
- ammonia: 0.00033; measured
  NH3-N
- Oils, unspecified: 0.00033; measured
  油
- Suspended solids, unspecified: 0.00464; measured
  SS

## Deviations from the LCI method approaches
按照产物质量比重分配原则进行分配

## Data selection and combination
丙烯生产的原料投入、产品产出、能源消耗及污染物排放清单来源于2010年中石化和中石油的4家百万吨企业。

## Review details
Inventory: The internal review was done by several iteration steps concerning raw data validation, raw data documentation, representativity, completeness and consistency of modelling with regard to ISO 14040 and 14044.; Documentation: The review of the documentation was performed by Ecobilan and is in compliance with ISO 14040 and 14044. The data set documentation is correct in view of the appropriateness of the information provided. It includes all relevant information in view of data quality and scope of application of the respective LCI result.

## Data sources
- 赵志仝, 王峰, 赵宁, 李学宽, 魏伟, 孙予罕. 生命周期评价在我国乙烯行业环境评估中的应用. 环境科学学报 34, 3200–3206 (2014).
