# 垃圾反渗透模块处理;焚烧与填埋混合

Dataset: ILCD process, Unit process, single operation
Geography: US
Reference year: 2022
Classification: Unit processes / End-of-life treatment / Other end-of-life services
Functional unit: 1 item of reverse osmosis module
Generated by: 陆嘉麒, wilsherelu@foxmail.com
Owner: 天工LCI数据工作小组
Review: Dependent internal review by 天工LCI数据工作小组
Amounts: no units in this file; such an amount is in the reference unit of its flow, which a separate flow dataset defines
copyright: false
licenseType: Free of charge for all users and uses

## General comment
所描述的反渗透模块用于焚烧和填埋应用中废水的净化和处理。它专门设计用于从渗滤液或其他液体废物中去除污染物，这是中国废物管理设施中常见的需求。

## Reference product
- waste incineration of plastics (unspecified) fraction in municipal solid waste (MSW): 1; input; measured
  1 waste RO module

## Outputs
All rows: measured
- waste incineration of plastics (unspecified) fraction in municipal solid waste (MSW): 0.052
  废弃PVC
- waste incineration of plastics (unspecified) fraction in municipal solid waste (MSW): 0.088
  废弃PVDF膜
- waste incineration of plastics (unspecified) fraction in municipal solid waste (MSW): 0.129
  废弃PP膜
- waste incineration of plastics (unspecified) fraction in municipal solid waste (MSW): 1.643
  废弃胶带（缠绕外壳）
- waste incineration of plastics (unspecified) fraction in municipal solid waste (MSW): 0.016
  废弃挤压塑料管
- waste incineration of plastics (unspecified) fraction in municipal solid waste (MSW): 0.012
  废弃注塑塑料
- waste incineration of plastics (unspecified) fraction in municipal solid waste (MSW): 0.032
  废弃PU填充剂

## Use advice
将此数据集纳入生命周期评估时，确保准确反映地理相关性（中国特有）和过程特定参数，例如效率、容量和技术适用性。必须注意焚烧与填埋的影响之间的区分，以及反渗透模块的处理效率。对于涉及材料回收的情景，必须仔细整合上游和下游影响以及产品生命周期的终末阶段。

## Review details
清单： 内部审查通过几个迭代步骤完成，涉及原始数据验证、原始数据记录、代表性、完整性、与 ISO 14040 和 14044 有关的建模的一致性。

## Data sources
- DuPont. Product Data Sheet
