# Sludge treatment and disposal|landfilling

Dataset: ILCD process, Unit process, single operation
Geography: CN
Classification: Materials production / Other mineralic materials
Functional unit: The functional unit used for GHGs in this LCA is one dry ton (DT) of sludge.
Generated by: 金思甜, 2331276@tongji.edu.cn
Review: Dependent internal review by 天工LCI数据工作小组
Amounts: no units in this file; such an amount is in the reference unit of its flow, which a separate flow dataset defines

## Geography
Tai Lake Watershed

## Reference product
- Sludge: 1000; input; estimated
  one dry ton (DT) of sludge

## Inputs
- Polymer: 5.65; measured
- Electricity: 252; measured
- Diesel: 0.0031; measured

## Review details
清单： 内部审查通过几个迭代步骤完成，涉及原始数据验证、原始数据记录、代表性、完整性、与 ISO 14040 和 14044 有关的建模的一致性。

## Data sources
- Life cycle GHG emissions of sewage sludge treatment and disposal options in Tai Lake Watershed, China
