# 多晶硅片生产 ; 13g/片多晶硅片 ; 铸锭和切片

Dataset: ILCD process, Unit process, single operation
Geography: SC-CN
Reference year: 2013
Classification: Materials production / Other materials
Functional unit: 1 kg solar grade multi-Si
LCI method principle: Attributional
LCI method approaches: Allocation
Generated by: 杨锦锋, yjfzfshn@163.com
Owner: 天工LCI数据工作小组
Review: Dependent internal review by 天工LCI数据工作小组
Amounts: no units in this file; such an amount is in the reference unit of its flow, which a separate flow dataset defines
copyright: false
licenseType: Free of charge for all users and uses

## General comment
多晶硅

## Geography
根据四川某太阳能多晶硅片的企业生产过程的数据资料收集整理

## Time period
文章发表

## Reference product
- Multi-Si wafer: 1e6; measured
  多晶硅片（MW）

## Inputs
All rows: measured
- Solar grade multi-Si: 9670
  太阳能级多晶硅
- electricity: 595026
  电耗
- Water (fresh water): 1.53165e6
  新鲜水
- Mortar: 36720
  砂浆
- Hydrochloric acid: 90
  盐酸
- Hydrofluoric acid: 100
  氢氟酸
- Nitric acid: 450
  硝酸
- Lactic acid: 1620
  乳酸
- Silicon nitride: 105
  氮化硅
- Sodium hydroxide: 667
  NaOH

## Outputs
All rows: measured
- hydrogen chloride: 0.583
  HCl
- Nitrogen oxides: 3.06
  氮氧化物
- Dust (unspecified, from stack): 0.944
  粉尘
- chemical oxygen demand: 179.28
  COD
- nitrogen, total (excluding N2): 14.13
  TN
- chloride: 15.18
  氯化物
- fluoride: 11.46
  氟化物
- Suspended solids, unspecified: 53.95
  悬浮固体
- industrial waste (unspecified): 370
  固体废弃物

## Deviations from the LCI method approaches
以太阳能级多晶硅为研究对象，运用 LCA的评价方法，定量计算国内普遍生产水平下，太阳能级多晶硅生命周期过程的资源、能源投入和环境排放值

## Review details
清单： 内部审查通过几个迭代步骤完成，涉及原始数据验证、原始数据记录、代表性、完整性、与 ISO 14040 和 14044 有关的建模的一致性。

## Data sources
- 何洋. 太阳能级多晶硅的生命周期评价. (西南交通大学, 2013).
