# 大黄鱼生产;大黄鱼成鱼;深水抗风浪网箱养殖

Dataset: ILCD process, Unit process, black box
Geography: ZS-ZJ-CN
Reference year: 2014
Valid until: 2014
Classification: Unit processes / Materials production / Food and renewable raw materials
Functional unit: 1000kg large yellow croaker
LCI method principle: Attributional
LCI method approaches: Allocation
Generated by: 吴康妮, wukangni@xmu.stu.edu.cn
Owner: 天工LCI数据工作小组
Review: Dependent internal review by 天工LCI数据工作小组
Amounts: no units in this file; such an amount is in the reference unit of its flow, which a separate flow dataset defines
copyright: false
licenseType: Free of charge for all users and uses

## General comment
大黄鱼网箱养殖的系统边界包括大黄鱼网箱建设所需材料（木材、聚乙烯和水泥）的生产、大黄鱼养殖所需资料（配合饲料、甲醛和电冰箱等）的生产、各种材料的运输和养殖过程生产及各过程使用能源的生产和消耗。不包括大黄鱼鱼苗的孵化到半成鱼的养殖和大黄鱼成鱼的加工的过程。

## Geography
舟山市东极镇大黄鱼深水大网箱养殖基地

## Time period
文献未说明数据或采样时间，由养殖幼苗购买于2014年6月，养殖周期约6个月进行估测

## Technology and included processes
大黄鱼网箱养殖技术。深水抗风浪网箱采用高密度聚乙烯的圆形浮动式网箱，网衣一般使用聚乙烯材料或尼龙材料制成，网衣的材质可以有效地保护大黄鱼，防止大黄鱼刮伤。 网箱底部配以一定量的沉子，确保网衣在水下成形。

## Technical purpose
大黄鱼深水抗风浪网箱养殖过程旨在为海鲜市场养育成鱼大黄鱼。这种水产养殖方法可被渔业部门使用，尤其适用于海洋离岸区域，鱼类在建造的网箱内养成市场销售大小，这些网箱能承受恶劣的开放水域条件。

## Model description
数据标准化基准值采用了 2000 年世界人均环境影响基准值；加权评估采用专家组评议设置的权重系数

## Reference product
- Large Yellow Croaker: 1000; measured

## Inputs
All rows: measured
- Electricity: 48.708
- polyethylene high density granulate (PE-HD): 64.45
- cement, unspecified: 1.8
- trash fish: 3364
- Assorted Feed: 336
- Formaldehyde: 0.079
- Diesel: 46.21

## Deviations from the LCI method approaches
本研究基于污染物排放按照计算公式来计算生命周期污染排放。研究中能源生产和使用过程的、生产聚乙烯、电冰箱、防腐木、水泥和甲醛的能源消耗和环境排放数据分别参考已有文献的研究结果。柴油燃烧所产生的污染物排放参考美国 环保总署（EPA）关于汽车用柴油生产与燃烧清单

## Data selection and combination
针对大黄鱼网箱养殖的各个养殖或者生产阶段，通过直接的实地检测途径，或者间接的文献检索和政府公司的报告等进行基础数据的收集；然后对数据进行鉴 别，数据的有效性与真实性很重要，对正确无误的数据进行进一步的收集和分配， 用于生命周期清单的建立；收集的数据为无效的数据时，对收集方法进行调整， 转化为有效地数据，依然无效或错误的数据需要剔除，而相关的数据则需要进行补充

## Data treatment and extrapolations
文献基于清单和排放因子计算碳足迹，排放因子数据来自其他文献及报告性数据。各输入数据按照对应物资的使用寿命进行了折算

## Sampling procedure
数据主要来自浙江大海洋科技有限公司，该公司在舟山市普陀区的东极镇进行大黄鱼的深水抗风浪网箱养殖。

## Use advice
本数据集涵盖在深水抗风浪网箱中养殖大黄鱼的生命周期，不包括大黄鱼苗孵化到半成鱼养殖以及成鱼加工的阶段。用户在使用这些数据进行环境影响计算时，不应包括这些被排除的过程，并且在利用这些数据进行海鲜行业LCA时应确保正确的应用范围。应特别关注方法论的一致性，特别是与为本系统定义的边界有关。

## Review details
清单： 内部审查通过几个迭代步骤完成，涉及原始数据验证、原始数据记录、代表性、完整性、与 ISO 14040 和 14044 有关的建模的一致性。

## Data sources
- 付晓洋. 基于生命周期评价的大黄鱼网箱养殖环境影响分析. (浙江海洋大学, 2016).
