# 土壤修复;异位修复;水泥窑协同处置;运行阶段;熟料煅烧

Dataset: ILCD process, Unit process, single operation
Geography: CN
Classification: Other Services / Repair and maintenance
Generated by: 曹嘉萌, 2979480760@qq.com
Owner: 天工LCI数据工作小组
Review: Dependent internal review by 天工LCI数据工作小组
Amounts: no units in this file; such an amount is in the reference unit of its flow, which a separate flow dataset defines
licenseType: Free of charge for all users and uses

## General comment
水泥厂拥有一条4000t/d规模的现代化干法生产线，年生产水泥190万t，熟料150万t．公司自有矿山面积0.448km2，年生产石灰石能力200万t.生产工艺采用具有先进水平的RSP五级窑外分解技术．危险废物均采用汽车运输方式，配置危险品专用车辆，行车路线为货车专用线.矿山至厂区的运输距离约1.5km，废弃物的运输距离约50km．常规水泥的生产过程主要包括原辅材料的幵采及运输、生料制备、煤粉制备、熟料煅烧和水泥粉磨等阶段， 添加废弃物处置环节后， 废弃物（污染土壤、消化污泥、废油泥等）可以用作替代原料和替代燃料，以节省石灰石和煤炭等原材料。水泥窑协同处置，运行阶段，熟料煅烧过程，主要是物料预热分解以及在回转窑中的煅烧分解过程，伴有CO2等废气的排放。

## Technical purpose
该水泥厂拥有一条现代化干法生产线，日产量4000吨，年产水泥190万吨，熟料150万吨。拥有0.448平方公里的矿山，年产石灰石能力200万吨。生产过程采用先进的RSP五级预分解窑技术。危险废物通过配置的专用车辆在货车专用线上运输。矿山至厂区运输距离约为1.5公里，废弃物运输距离约为50公里。随着废弃物处理步骤的加入，如污染土壤、消化污泥、废油泥等废弃物可作为替代原料和燃料使用，以节约石灰石和煤炭资源。水泥窑在运行阶段与熟料生产过程中合作，涉及物料预热、分解和回转窑中的煅烧过程，伴随着CO2等废气排放。

## Reference product
- cement clinker: 1000; article inperiodical

## Inputs
- Electricity: 90.108; article inperiodical

## Outputs
- carbon dioxide: 762.54; article inperiodical

## Use advice
数据使用者在开展生命周期评估计算时，应考虑将废弃物处理中的替代原料和燃料纳入考虑，以此计入材料和能源节约。特别是对于水泥窑处置过程中运输和使用的危险废物，准确追踪运输距离和作为替代物的废弃物类型至关重要。使用者还应关注熟料生产阶段产生的排放，特别是CO2，并将其纳入环境影响评估。还应注意，危险废物的运输需遵守法规合规性，且排放因子可能会因废物组成和分解过程的效率而异。

## Review details
清单： 内部审查通过几个迭代步骤完成，涉及原始数据验证、原始数据记录、代表性、完整性、与 ISO 14040 和 14044 有关的建模的一致性。
