# 熟料生产|熟料|新型干法, 5000 t/d|混合固废

Dataset: ILCD process, Unit process, black box
Geography: HAIN-CN
Classification: Materials production / Other mineralic materials
Generated by: 杨思琪
Amounts: no units in this file; such an amount is in the reference unit of its flow, which a separate flow dataset defines
copyright: false

## General comment
造纸渣，也称为造纸绿渣，是制浆造纸厂碱回收过程中产生的固体废弃物。这些渣来自中国海南省的一家制浆造纸厂。混合固废包括粉煤灰和造纸渣。

## Model description
功能单元定义：将1吨水泥熟料定义为功能单元。系统边界设置：该工厂的原材料被设定为生命周期的起点，而熟料水泥的产出被设定为终点。

## Reference product
- clinker: 1000
  熟料

## Inputs
All rows: measured
- limestone, crushed, for mill: 1344
  石灰石
- clay: 93
  粘土
- ash: 63
  粉煤灰
- iron ore: 32
  铁石
- Waste, solid, from paper production: 25
  造纸废渣
- hard coal, run-of-mine: 106
  煤炭
- electricity, medium voltage: 288
  电力的平均消耗

## Outputs
- carbon dioxide (fossil): 264; calculated
  m-CO2。煤炭燃烧的二氧化碳排放量（mc）用热碳当量法计算。mc=标准煤x2.93x10^7×8.494x10^-8=标准煤×2.489，其中1J热量释放相当于8.494×10^-8kg的CO2。1kg标准煤相当于2.93 × 10^7 J的热量（热值）。
- carbon dioxide: 532; calculated
  n-CO2。石灰石分解产生的CO2排放量（nc）采用公式计算。nc=石灰石消耗量x90%x44%=石灰石消耗量x0.396，其中石灰石中CaCO3的百分比为90%。CaCO3中CO2的百分比为44%。
- sulfur dioxide: 0.86; measured
  SO2。SO2的排放数据主要来自工厂的在线监测系统。
- Nitrogen oxides: 1.71; measured
  NOx。NOx的排放数据主要来自工厂的在线监测系统。
- particles (> PM10): 0.05; measured
  粉尘，未标明粒径，按PM>10处理。。粉尘的排放数据主要来自工厂的在线监测系统。

## Data selection and combination
造纸渣来自海南某纸浆和造纸厂。水泥生产的其他原料来自于海南某矿山。

## Sampling procedure
在海南省某市选取一家5000吨/天新型干法水泥生产线的水泥厂并对其进行试验。将造纸渣被混入石灰石中，与其他原料一起放入水泥窑中。处理了150吨/日的造纸渣。

## Data sources
- Kan Fu, Xiao Yu Ren, Jin Quan Lin, & Ping Yue. (2013). Comparative Analysis of Environmental Impacts between Dregs Disposal and Conventional Cement Production by Life Cycle Assessment (LCA). Advanced Materials Research 777, 461–466.
