# 精炼铜生产|电解铜（1吨，99.9%）|双面吹浴冶炼技术|铜精矿

Dataset: ILCD process, Unit process, single operation
Geography: CN
Reference year: 2018
Classification: Materials production / Other mineralic materials
Functional unit: the production of 1 ton of copper (i.e., refined or reclaimed copper) was selected as the functional unit.
LCI method principle: Attributional
LCI method approaches: Allocation - mass
Generated by: 王鹏, 2867919560@qq.com
Review: Dependent internal review by Tiangong LCI Data Working Group
Amounts: no units in this file; such an amount is in the reference unit of its flow, which a separate flow dataset defines
copyright: false

## Geography
中国有两个精炼铜和再生铜生产基地。

## Reference product
- copper: 1000; software or database

## Inputs
- Land Occupation: 0.06; measured
  Land occupation
- water: 14340; measured
  Water
- Electricity: 4307.72; software or database
- Oils (unspecified): 0; software or database
  Oil
- hard coal: 0.08; software or database
  Coal
- Copper concentrates: 4410; measured
  Copper concentrate需要补充
- calcium carbonate: 110; software or database
- coke: 160; software or database
  Coke需要补充
- Diesel: 1; software or database
- Very fine milled silica sand d50 = 20 micrometer: 400; software or database
  Silica sand
- Chemicals inorganic: 3.64; software or database
  Chemicals inorganic需要补充
- Chemicals organic: 0; software or database
  Chemicals organic需要补充
- Natural gas, at consumer EU-27: 48.58; software or database
  Natural gas
- Sulfuric acid(98%): 12270; software or database
  Sulfuric acid需要补充resourse
- hydrogen chloride: 1660; software or database
- freshwater: 2330; software or database
  Soft water需要补充

## Outputs
- carbon dioxide: 398.19; software or database
  Carbon dioxide
- mercury: 5.75e-5, 4.46e-8 (2 entries); software or database
  Mercury
- particles (PM2.5 - PM10): 0.16709; software or database
- sulfur oxides: 0.56605; software or database
  Sulfur dioxide
- arsenic: 0.00034, 1.68e-5 (2 entries); software or database
  Arsenic
- Phosphorus: 2.56e-5; software or database
- chemical oxygen demand: 0.01956; software or database
  COD需要补充
- nitrogen, total (excluding N2): 0.00193; software or database
- copper: 2.34e-5; software or database
  Copper
- sulfide: 2.13e-6; software or database
  Sulfide
- lead-210: 2.23e-5; software or database
  Lead
- cadmium: 1.25e-5; software or database
  Cadmium
- fluoride: 0.0003; software or database
  Fluoride
- chromium VI: 1.7e-6; software or database
  Chromium VI
- Petroleum: 1.7e-5; measured
  Petroleum oil需要补充
- Drilling waste: 14720; measured
  Drilling waste需要补充
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
## Deviations from the LCI method approaches
采用 ReCiPe 方法在中点水平进行生命周期影响评估 (LCIA)，该方法是 LCA 分析中最常用的指标方法之一（Goedkoop 等人，2009 年；Schryveretal.2009）。

## Data selection and combination
本研究中提供的生命周期清单数据是从中国的两个精炼和再生铜生产基地收集的。

## Data treatment and extrapolations
LCA 使用 SimaPro 8.2 软件进行。

## Review details
Inventory: The internal review was done by several iteration steps concerning raw data validation, raw data documentation, representativity, completeness and consistency of modelling with regard to ISO 14040 and 14044.; Documentation: The review of the documentation was performed by Ecobilan and is in compliance with ISO 14040 and 14044. The data set documentation is correct in view of the appropriateness of the information provided. It includes all relevant information in view of data quality and scope of application of the respective LCI result.

## Data sources
- Hong, J. et al. Life cycle assessment of copper production: a case study in China. Int J Life Cycle Assess 23, 1814–1824 (2018).
