# 土壤和地下水修复;原位;地下水抽出处理;施工;处理设施

Dataset: ILCD process, Unit process, single operation
Geography: DK
Reference year: 2021
Classification: Other Services / Engineering and consulting
Generated by: 王宁, wang_ning@caep.org.cn
Owner: 天工LCI数据工作小组
Review: Dependent internal review by 天工LCI数据工作小组
Amounts: no units in this file; such an amount is in the reference unit of its flow, which a separate flow dataset defines
copyright: false
licenseType: Free of charge for all users and uses

## General comment
使用活性炭、高密度聚乙烯、铁建造废水处置设施

## Technology and included processes
使用电力、石英砂、高密度聚乙烯、钢铁、活性炭建造处理设施

## Technical purpose
该数据集代表用于土壤和地下水修复的废水处理设施的建设过程。这些设施在建设中使用了活性炭、高密度聚乙烯和铁等材料，专门设计用于原位地下水抽提和处理应用。

## Reference product
- Treatment facilities: 1; estimated

## Inputs
All rows: estimated
- polyethylene high density granulate (PE-HD): 410
- Steel sections: 50
- Activated Carbon: 180
- Electricity: 38000
- quartz sand: 300000

## Use advice
在使用此数据集时，请考虑所代表的具体建筑材料和过程——活性炭、石英砂、高密度聚乙烯、钢铁和铁。在建设阶段要纳入能源消耗因素。确保模拟的使用阶段行为准确反映废水处理设施的运营要求，包括输入和输出的管理。用户还应考虑生命周期末期的影响，如材料潜在的回收利用或处置的环境影响。

## Review details
清单： 内部审查通过几个迭代步骤完成，涉及原始数据验证、原始数据记录、代表性、完整性、与 ISO 14040 和 14044 有关的建模的一致性。

## Data sources
- Sustainable remediation assessment of a chlorinated ethene plume: method evelopment, application, and assessment
