# 砖生产|烧结砖|烧结工艺

Dataset: ILCD process, Unit process, single operation
Geography: ZG-SC-CN
Reference year: 2020
Classification: Materials production / Other mineralic materials
Functional unit: 1t WDC were chosen as the functional unit
Generated by: 王湘锦, r99rt4@163.com
Review: Dependent internal review by Tiangong LCI Data Working Group
Amounts: no units in this file; such an amount is in the reference unit of its flow, which a separate flow dataset defines
copyright: false

## Technology and included processes
WDC（水基钻屑） 用于替代天然粘土制备烧结砖。通过压滤机预处理，WDC 的含水量可从 80% 降至 20%，从而满足对外交付的循环利用要求。WDC 中剩余的水可直接用于制砖（240 毫米 × 115 毫米 × 53 毫米），以减少水资源的消耗。整个生产过程包括原料制备、混合、压制、干燥和烧结（温度为 800-1000 ℃；时间为 1-4 h）。

## Reference product
- green brick: 5123; input; measured

## Inputs
- Water (fresh water): 4160; measured
- electricity mix: 752.94; measured

## Outputs
All rows: measured
- sintered brick: 4600
  烧结砖成品
- sulfur dioxide: 0.11117
- nitrogen monoxide: 0.1015
  原文中为NOX
- hydrogen fluoride: 0.00204
- particles (> PM10): 0.0686
  Monitoring analysis
- carbon dioxide (fossil): 89.2

## Deviations from the LCI method approaches
作为生命周期评估的一部分，亿科环境技术有限公司开发的 eFootprint 在线分析平台用于对整个生命周期过程进行定量分析。

## Data selection and combination
原材料、能源投入和废气排放的原始数据来自自贡（中国四川）的一家案例研究企业--创奇环保建材有限公司，该公司承担了烧结砖原材料 WDC 的利用项目，年产 3000 万块烧结砖。

## Sampling procedure
此外，选择 1t WDC 作为功能单位，并按照功能单位计算所有原材料、辅助材料、能耗、运输和直接排放的输入参数。

## Review details
Inventory: The internal review was done by several iteration steps concerning raw data validation, raw data documentation, representativity, completeness and consistency of modelling with regard to ISO 14040 and 14044.; Documentation: The review of the documentation was performed by Ecobilan and is in compliance with ISO 14040 and 14044. The data set documentation is correct in view of the appropriateness of the information provided. It includes all relevant information in view of data quality and scope of application of the respective LCI result.

## Data sources
- Liu, W. et al. Comparative life cycle assessment of cement, sintered bricks and non-sintered bricks manufacturing using water-based drilling cuttings from shale gas production in the Sichuan Basin, China. J. Environ. Manage. 314, 115135 (2022).
