# 土壤修复;异位修复;水泥窑协同处置;准备阶段;原料开采运输

Dataset: ILCD process, Unit process, single operation
Geography: CN
Classification: Other Services / Repair and maintenance
Generated by: 曹嘉萌, 2979480760@qq.com
Owner: 天工LCI数据工作小组
Review: Dependent internal review by 天工LCI数据工作小组
Amounts: no units in this file; such an amount is in the reference unit of its flow, which a separate flow dataset defines
licenseType: Free of charge for all users and uses

## General comment
水泥厂拥有一条4000t/d规模的现代化干法生产线，年生产水泥190万t，熟料150万t．公司自有矿山面积0.448km2，年生产石灰石能力200万t.生产工艺采用具有先进水平的RSP五级窑外分解技术．危险废物均采用汽车运输方式，配置危险品专用车辆，行车路线为货车专用线.矿山至厂区的运输距离约1.5km，废弃物的运输距离约50km．常规水泥的生产过程主要包括原辅材料的幵采及运输、生料制备、煤粉制备、熟料煅烧和水泥粉磨等阶段， 添加废弃物处置环节后， 废弃物（污染土壤、消化污泥、废油泥等）可以用作替代原料和替代燃料，以节省石灰石和煤炭等原材料。水泥窑协同处置，准备阶段，原料开采运输，主要开采和运输原料为石灰石、页岩、粉煤灰等，运输距离1.5km。以及工业废物（污染土壤、废油泥、废催化剂等），运输距离50km。工业废物不计算开采投入，只统计运输消耗。

## Technical purpose
此工业过程涉及使用水泥窑协同处置技术的土壤修复异位治理，在准备阶段，工厂运行一条每天4000吨的现代化干法生产线，年产水泥190万吨，年产熟料150万吨。该过程主要用于利用废弃物（如污染土壤、消化污泥、废油泥等）作为替代原料和燃料，在水泥生产中以节约石灰石和煤炭等资源。

## Reference product
- carbon dioxide: 37.88

## Inputs
- Diesel: 4.18; article inperiodical
- Electricity: 47.664; article inperiodical

## Outputs
All rows: article inperiodical
- calcium carbonate: 1125.43
- shale: 1.23
- diatomite: 17.75
- iron powder: 27.25
- gypsum: 52.15
- fly ash: 124.24
- Slag: 203.78
- waste clay: 1.05
- Coating residue: 0.16
- oil sludge: 5.26
- Spent catalyst: 2.11
- contaminated soil: 5.26
- Digested Sludge: 15.79
- coal: 98.28

## Use advice
在使用此数据集进行生命周期评估时，必须考虑修复过程的具体情况，特别是在水泥窑协同处理中使用废弃物的情况。注意，工业废物在此不计算开采投入，而只考虑运输消耗。石灰石、页岩、粉煤灰等原材料的运输距离大约为1.5公里，工业废物的运输距离约为50公里。需要特别注意的方法学考虑包括回收操作的边界以及对协同处理材料使用阶段行为的建模。

## Review details
清单： 内部审查通过几个迭代步骤完成，涉及原始数据验证、原始数据记录、代表性、完整性、与 ISO 14040 和 14044 有关的建模的一致性。
