# 完成原位热脱附施工准备的场地;土壤修复;原位热脱附;场地准备

Dataset: ILCD process, Unit process, black box
Geography: CN
Reference year: 2022
Classification: Unit processes / Other Services / Repair and maintenance
Generated by: 张今英, zhangjy@caep.org.cn
Owner: 天工LCI数据工作小组
Review: Dependent internal review by 天工LCI数据工作小组
Amounts: no units in this file; such an amount is in the reference unit of its flow, which a separate flow dataset defines
copyright: false
licenseType: Free of charge for all users and uses

## General comment
案例焦化厂位于我国北方中纬度地带，将苯含量高于40 mg/kg、苯并 [a] 芘含量高于 15 mg/kg 的区域定义为高风险区，并进行原位热脱附修复。修复面积7567㎡，土方量30413m³，施工准备阶段周期约 50 天，包括人员物资准备、场地清理、临时设施施工等工。

## Technical purpose
该数据集描述了一个工业土壤修复过程，其中使用了原位热脱附（ISTD）技术。ISTD 应用于污染高风险地点，即苯浓度超过 40 mg/kg 且苯并[a]芘超过 15 mg/kg 的区域。具体而言，该过程适用于中国北部中纬度地区的如焦化厂等区域。土壤修复项目覆盖面积为 7567 平方米，土方体积为 30413 立方米，建设准备阶段大约持续 50 天。此阶段的活动包括准备人员和物资、清理现场和建设临时设施。

## Reference product
- Prepared site: 1; measured

## Inputs
All rows: measured
- Electricity: 172800
- Diesel: 9.629
- Tap Water: 640
- Steel: 27868
- Concrete: 2097
- cement, unspecified: 300
- Polyethylene,Polyethylene: 35
- Diesel,Diesel: 4

## Outputs
- Equipment and Materials Arriving on Site: 1; measured
  文章中水泥、混凝土的量使用的是体积单位，且运输到场的设备没有列出，所以这里以项目为计量单位。

## Use advice
在使用这个生命周期评估数据集时，用户应包括与原位热脱附施工准备阶段相关的所有输入和输出，确保评估涵盖了人员和物资的准备、现场清理、临时设施的建设，以及所有相关的能源和材料消耗。这包括机械设备燃料、电力和其他能源如天然气的使用，以及如混凝土和钢铁等材料的使用。也应该包括材料和设备运往现场的交通。建议特别关注可能影响现场准备阶段和整体修复效果的本地条件，如地理位置和技术适用性。

## Review details
清单： 内部审查通过几个迭代步骤完成，涉及原始数据验证、原始数据记录、代表性、完整性、与 ISO 14040 和 14044 有关的建模的一致性。

## Data sources
- 刘文晓等.基于修复效果的污染土壤修复工程环境足迹分析[J].环境科学研究 35,2367-2377（2022）.
