# 电力生产 ; 电力 ; 火电（82.0%）+水电（2.5%）+风电（12.6%）+太阳能发电（2.9%）

Dataset: ILCD process, Partly terminated system
Geography: HLJ-CN
Reference year: 2019
Classification: Energy carriers and technologies / Electricity
LCI method principle: Other
Generated by: 熊若熙, xiongrx0126@163.com
Owner: 天工LCI数据工作小组
Review: Dependent internal review by 天工LCI数据工作小组
Amounts: no units in this file; such an amount is in the reference unit of its flow, which a separate flow dataset defines
copyright: false
licenseType: Free of charge for all users and uses

## General comment
电力产生形式包括火力发电、水力发电、风力发电和太阳能发电

## Time period
根据2019年能源统计年鉴数据计算

## Technical purpose
该数据集描述了中国电力发电组成，包括火力发电（82.0%）、水电（2.5%）、风电（12.6%）和太阳能发电（2.9%）。它用于环境影响评估中，特别是作为生命周期评估（LCA）的一部分，用于计算各种形式的电力生产的碳排放。

## Reference product
- Electricity: 3.6; calculated

## Outputs
- carbon dioxide: 0.774; calculated
- sulfur dioxide: 0.000142; calculated
- Nitrogen oxides: 0.000223136; calculated
- Dust (unspecified, from stack): 2.7321e-5; calculated

## Data treatment and extrapolations
核算方法参考《企业温室气体排放核算方法与报告指南 发电设施》。不同形式发电量及燃料用量来自于《中国能源统计年鉴 2020》中的第三章（能源生产） 和第六章（地区能源平衡表）。用于计算二氧化碳排放因子的低位发热量、单位热值含碳量等燃料参数来自于《2019 年度中国区域电网二氧化碳基准线排放因子 OM 计算说明》、《企业温室气体排放核算方法与报告指南 发电设施》

## Use advice
使用此数据集的用户应参考《企业温室气体排放核算方法与报告指南 发电设施》中的碳核算方法。需要考虑《中国能源统计年鉴 2020》中报告的具体燃料消耗量和电力生产类型，特别是第三章“能源生产”和第六章“地区能源平衡表”。计算 CO2 排放因子时，必须使用如低位发热量和单位热值含碳量等燃料参数，这些参数应源于《2019 年度中国区域电网二氧化碳基准线排放因子 OM 计算说明》及相关指南。

## Review details
清单： 内部审查通过几个迭代步骤完成，涉及原始数据验证、原始数据记录、代表性、完整性、与 ISO 14040 和 14044 有关的建模的一致性。

## Data sources
- 熊若熙. 中国电力生产和消费二氧化碳与污染物排放因子核算. (清华大学, 2023).
