# 土壤和地下水修复;原位;地下水抽出处理;施工;灌浆帷幕施工

Dataset: ILCD process, Unit process, single operation
Geography: JS-CN
Reference year: 2022
Classification: Other Services / Repair and maintenance
Generated by: 王宁, wang_ning@caep.org.cn
Owner: 天工LCI数据工作小组
Review: Dependent internal review by 天工LCI数据工作小组
Amounts: no units in this file; such an amount is in the reference unit of its flow, which a separate flow dataset defines
licenseType: Free of charge for all users and uses

## General comment
使用水泥、自来水和钢铁建造一个有90个桩的灌浆帷幕

## Geography
a closed pesticide manufacturing plant located in Jiangsu Province, China.

## Technical purpose
该工业过程用于江苏省一个已关闭的农药制造厂的土壤和地下水修复。该修复方法涉及使用水泥、自来水和钢铁等材料，外部施工90个桩的灌浆帷幕，以控制或防止污染扩散。

## Reference product
- Grout curtains: 1; article inperiodical

## Inputs
- Electricity: 212616; article inperiodical
- Steel sections: 500; article inperiodical
- cement: 365630; article inperiodical
- water: 548440; article inperiodical

## Use advice
在使用此数据集进行生命周期评估时，用户需将此特定修复过程视作农药厂使用后阶段的一部分。该数据集可能特定于中国江苏省的地理和环境条件。当将此数据应用于其他地点时，用户应验证区域适用性。此外，还应在方法上考虑来源材料的可持续性及其对长期阻隔的贡献。

## Review details
清单： 内部审查通过几个迭代步骤完成，涉及原始数据验证、原始数据记录、代表性、完整性、与 ISO 14040 和 14044 有关的建模的一致性。

## Data sources
- Ding, D. et al. Assessing the environmental impacts and costs of biochar and monitored natural attenuation for groundwater heavily contaminated with volatile organic compounds. Science of The Total Environment 846, 157316 (2022).
