# 底泥修复;原位覆盖;覆盖;活性炭覆盖

Dataset: ILCD process, Unit process, black box
Geography: NO
Reference year: 2011
Classification: Unit processes / Other Services / Repair and maintenance
Generated by: 桑春晖, sangch@mail.bnu.edu.cn
Owner: 天工LCI数据工作小组
Review: Dependent internal review by 天工LCI数据工作小组
Amounts: no units in this file; such an amount is in the reference unit of its flow, which a separate flow dataset defines
copyright: false
licenseType: Free of charge for all users and uses

## General comment
使用疏浚船完成覆盖材料的覆盖。

## Geography
经查询，暂未找到国内有相关研究文献

## Time period
文献中没有明确数据收集的开始时间，以文献发表时间为有效期的开始时间

## Technology and included processes
覆盖材料的使用量为2 kg /m2，密度为0.5 吨/m3。

## Technical purpose
本工艺描述的是一种用于沉积物修复的环境整治技术。'原位覆盖'包括用活性炭（AC）覆盖受污染的沉积物，从而隔离污染物并降低其生物可用性。这一过程通常用于湖泊、河流和沿海地区的水质整治，以应对污染问题。活性炭覆盖的技术应用旨在通过减缓受污染沉积物的影响，改善水质。

## Reference product
- AC covered area: 2.38e7; calculated
  这里指的是采用活性炭覆盖的底泥沉积物影响区域，用面积表示

## Inputs
- Diesel oil,diesel oil: 46700; calculated
- Activated Carbon: 4.76e7; calculated

## Data selection and combination
初级数据清单是根据ISO 14040关于LCA.35的规定获得的。基本数据来自特定场地的盆栽实验、中试和供应商处获取，这些数据代表了中国南方的情况。

## Use advice
使用此LCA数据时，应关注方法论方面的注意事项。需要指出的是，该数据集缺乏国内研究文献，因此必须仔细审查假设和数值。初级数据应被认为仅是对中国南部特定案例的代表，并可能不具有广泛适用性。用户必须考虑所述的覆盖材料使用量和密度，即每平方米2公斤，密度为0.5吨/立方米。数据收集缺乏明确定义的开始时间，需依赖源文献的发布时间。数据集必须依据ISO 14040 LCA标准使用，并且在清单数据中应包含所有主要原材料和能源消耗，以进行全面评估。

## Review details
清单： 内部审查通过几个迭代步骤完成，涉及原始数据验证、原始数据记录、代表性、完整性、与 ISO 14040 和 14044 有关的建模的一致性。

## Data sources
- Sparrevik, M. et al. Use of Life Cycle Assessments To Evaluate the Environmental Footprint of Contaminated Sediment Remediation. Environ. Sci. Technol. 45, 4235–4241 (2011).
