# 电力生产 ; 电力 ; 火电（83.9%）+水电（1.1%）+风电（12.1%）+太阳能发电（3.0%）

Dataset: ILCD process, Partly terminated system
Geography: NMG-CN
Reference year: 2019
Classification: Energy carriers and technologies / Electricity
LCI method principle: Other
Generated by: 熊若熙, xiongrx0126@163.com
Owner: 天工LCI数据工作小组
Review: Dependent internal review by 天工LCI数据工作小组
Amounts: no units in this file; such an amount is in the reference unit of its flow, which a separate flow dataset defines
copyright: false
licenseType: Free of charge for all users and uses

## General comment
电力产生形式包括火力发电、水力发电、风力发电和太阳能发电

## Time period
根据2019年能源统计年鉴数据计算

## Technical purpose
此数据集涉及通过不同能源源（主要为化石燃料）、水电、风电和太阳能发电产生电力。它反映了中国的能源组合，并适用于在生命周期评估产品和服务中需要消耗此类电力的情况。这包括工业运营、住宅能源使用、使用期间消耗电力的产品，以及基础设施中消耗的电力。

## Reference product
- Electricity: 3.6; calculated

## Outputs
- carbon dioxide: 0.911; calculated
- sulfur dioxide: 0.000158; calculated
- Nitrogen oxides: 0.000248951; calculated
- Dust (unspecified, from stack): 3.0208e-5; calculated

## Data treatment and extrapolations
核算方法参考《企业温室气体排放核算方法与报告指南 发电设施》。不同形式发电量及燃料用量来自于《中国能源统计年鉴 2020》中的第三章（能源生产） 和第六章（地区能源平衡表）。用于计算二氧化碳排放因子的低位发热量、单位热值含碳量等燃料参数来自于《2019 年度中国区域电网二氧化碳基准线排放因子 OM 计算说明》、《企业温室气体排放核算方法与报告指南 发电设施》

## Use advice
用户应在提及年份（2019年）的中国能源生产上下文中应用此数据集，记住该能源组合和碳排放因子是特定于那个时间的，并且在其他年份或地区可能会有所不同。验证数据对拟定应用的适用性是非常重要的，特别是关于时间和地理代表性。对于涉及多年能源使用的评估，用户可能需要调整数据，以计入能源组合的变化或技术的进步。

## Review details
清单： 内部审查通过几个迭代步骤完成，涉及原始数据验证、原始数据记录、代表性、完整性、与 ISO 14040 和 14044 有关的建模的一致性。

## Data sources
- 熊若熙. 中国电力生产和消费二氧化碳与污染物排放因子核算. (清华大学, 2023).
