# 土壤修复;原位修复;生物强化修复;后端处理;注射井和监测井回填

Dataset: ILCD process, Unit process, single operation
Geography: SH-CN
Classification: Other Services / Repair and maintenance
Generated by: 肖萌, xiaomeng@mail
Owner: 天工LCI数据工作小组
Review: Dependent internal review by 天工LCI数据工作小组
Amounts: no units in this file; such an amount is in the reference unit of its flow, which a separate flow dataset defines
licenseType: Free of charge for all users and uses

## General comment
该数据集代表了土壤修复过程，特别是针对氯化挥发性有机化合物（CVOCs）污染场地的原位生物强化修复。这种生物修复适用于土壤和地下水含水层被均匀污染的区域。所描述的过程包括修复阶段后对注射井和监测井的回填，这是确保场地恢复到自然状态或为未来使用做准备的关键步骤。

## Geography
The aquifer in a certain area in Shanghai, China, is uniformly contaminated with chlorinated volatile organic compounds (CVOCs), with a surface area of 20,000 m2 and a depth of 50 m, with the water table located at a depth of 30 m.

## Reference product
- Well backfilling: 128
  回填完成的注射井和监测井

## Inputs
- Concrete: 8139.75; software or database
- Gravel Sand: 76310.2; software or database
  Gravel sand
- clay: 36094.7; software or database
- Water: 13730.6; software or database

## Use advice
使用此数据集的用户在将此数据应用于类似的修复工作时，应考虑含水层的均匀污染水平及其具体的深度尺寸。在适应之前，确保受污染场地的参数，如表面积、深度和水位位置，与数据集中描述的参数兼容非常重要。此外，在使用这些数据时，应注意可能影响生物修复过程分布和效果的地质和水文地质条件。

## Review details
清单： 内部审查通过几个迭代步骤完成，涉及原始数据验证、原始数据记录、代表性、完整性、与 ISO 14040 和 14044 有关的建模的一致性。

## Data sources
- Ni, Z. et al. Comparative Life-Cycle Assessment of Aquifer Thermal Energy Storage Integrated with in Situ Bioremediation of Chlorinated Volatile Organic Compounds. Environ. Sci. Technol. 54, 3039–3049 (2020).
