# 土壤修复;异位修复;热脱附修复;工程实施;土壤最终处理

Dataset: ILCD process, Unit process, single operation
Geography: SH-CN
Classification: Other Services / Repair and maintenance
Generated by: 王枫, wangfeng@caep.org.cn
Owner: 天工LCI数据工作小组
Review: Dependent internal review by 天工LCI数据工作小组
Amounts: no units in this file; such an amount is in the reference unit of its flow, which a separate flow dataset defines
copyright: false
licenseType: Free of charge for all users and uses

## General comment
异位热脱附修复1立方米污染土，热脱附后的土壤，会暂存在修复场地内等待效果评估单位的验收，验收合格后 回填到场地内或运输到场地外处置

## Geography
我国华东区域5 个污染土壤异位热脱附修复工程案例

## Technology and included processes
热脱附后的土壤，会暂存在修复场地内等待效果评估单位的验收，验收合格后回填到场地内或运输到场地外处置

## Technical purpose
本数据集描述的排水口主要用于将工业或市政废水处理设施处理后的废水排放到自然水体中。它的适用性主要在于需要依法进行大规模废水处理与处置的工业区。

## Reference product
- The final treated soil: 1; measured

## Inputs
- Diesel: 0.00021; measured

## Use advice
在使用此数据集进行生命周期评估时，应仔细考虑治疗后的出水水质的特定特征。重要的是要考虑废水处理过程的地理和技术背景，因为这些因素显著影响环境影响评估。此外，建议定期更新数据集以反映最新的治疗技术和法规遵从性变化。

## Review details
清单： 内部审查通过几个迭代步骤完成，涉及原始数据验证、原始数据记录、代表性、完整性、与 ISO 14040 和 14044 有关的建模的一致性。

## Data sources
- 刘爽,陈盼,宋慧敏等.我国华东地区污染土壤异位热脱附修复碳排放及减排策略[J].环境工程学报,2022,16(08):2663-2671.
