# 地下水修复;原位修复;可渗透反应墙;材料运输

Dataset: ILCD process, Unit process, single operation
Geography: US
Reference year: 2011
Classification: Other Services / Repair and maintenance
Generated by: 张建宾, zhangjb@caep.org.cn
Owner: 天工LCI数据工作小组
Review: Dependent internal review by 天工LCI数据工作小组
Amounts: no units in this file; such an amount is in the reference unit of its flow, which a separate flow dataset defines
copyright: false
licenseType: Free of charge for all users and uses

## General comment
卡车运输，距离160km

## Geography
多佛空军基地

## Technical purpose
所述工艺专注于原位地下水修复，特别是使用可透水反应墙（PRBs），旨在处理受污染的地下水而无需从地下抽取。这些屏障的建造材料通过卡车运输160公里距离运至多佛空军基地。该工艺可应用于环境工程项目，特别是在已识别污染物的地点管理和恢复地下水质量。

## Reference product
- Equipment and Materials Arriving on Site: 4.66899e8; measured

## Inputs
- iron: 22200; measured
- sand: 22200, 9470 (2 entries); measured
- Steel sections: 3420, 8930 (2 entries); measured
- cement: 7650; measured

## Use advice
在利用此数据集进行生命周期评估时，应仔细考虑运输距离和方法的具体性。未经适当调整，不应将运输数据概括应用于其他距离或运输方式。该数据集适用于涉及类似运输距离和车型场景的生命周期评估实践者。此外，还应将PRB材料的生产和安装过程的环境影响包括在整体评估中。确保多佛空军基地的上下文环境也适合预期的数据应用。

## Review details
清单： 内部审查通过几个迭代步骤完成，涉及原始数据验证、原始数据记录、代表性、完整性、与 ISO 14040 和 14044 有关的建模的一致性。

## Data sources
- Mark S. H. Mak and Irene M. C. Lo.Environmental Life Cycle Assessment of Permeable Reactive Barriers: Effects of Construction Methods, Reactive Materials and Groundwater Constituents[J].Environmental Science & Technology 2011, 45, 23, 10148-10154
