# 本地品牌纯牛奶生产 | 生奶生产

Dataset: ILCD process, Unit process, single operation
Geography: MS-SC-CN
Reference year: 2017
Classification: Materials production / Other mineralic materials
Functional unit: The Tetra Pak 1litre pure liquid milk is selected to assess its lifecycle based carbon footprint.
Generated by: 杨瑞, 1632707028@qq.com
Review: Dependent internal review by Tiangong LCI Data Working Group
Amounts: no units in this file; such an amount is in the reference unit of its flow, which a separate flow dataset defines
copyright: false

## General comment
原料奶生产的地点是奶牛场，主要消耗饲料、电力和柴油。

## Geography
奶源基地位于中国四川省西南部洪崖县，距离省会成都市约147公里。乳品加工厂位于成都郊区郫县，距离奶源基地约175公里。品牌牛奶主要分布在距离乳制品加工厂约40公里的成都市中心。牛奶包装废弃物被运送到距离市中心约30公里的市政垃圾填埋场进行最终处理。

## Reference product
- milk: 0.001; measured
  pure liquid milk

## Inputs
All rows: measured
- Electricity: 0.1692
- Diesel: 3.68e-6
- feed: 1.29
  Fodder
- disinfectant: 1.59e-6
  Disinfectant
- water: 0.00266

## Outputs
- carbon dioxide: 0.5691; article inperiodical

## Deviations from the LCI method approaches
与传统的LCA相比，本研究简化了生命周期影响评估的过程，主要使用不同类别的指标来阐述生命周期清单的结果(Nigri et al.， 2014)。

## Data selection and combination
表1显示了原料奶生产阶段的库存数据，这些数据是通过类比Hospido et al.(2003)对牛奶LCA的研究得出的。原料奶生产的地点是奶牛场，主要消耗饲料、电力和柴油。将Hospido et al.(2003)关于农场饲料和设备消毒剂的温室气体排放系数的结果进行换算，得到相应的CO2排放系数用于计算。电力排放因子基于国家发改委发布的《2014年中国区域电网基线排放因子》，本研究使用中部电网排放因子。运行边际排放系数为0.972 t CO2/MWh，建设边际排放系数为0.47 t CO2/MWh(国家发改委，2014)。经换算，电网排放系数为0.723 kg/kW·h。

## Review details
Inventory: The internal review was done by several iteration steps concerning raw data validation, raw data documentation, representativity, completeness and consistency of modelling with regard to ISO 14040 and 14044.; Documentation: The review of the documentation was performed by Ecobilan and is in compliance with ISO 14040 and 14044. The data set documentation is correct in view of the appropriateness of the information provided. It includes all relevant information in view of data quality and scope of application of the respective LCI result.

## Data sources
- Zhao, R., Xu, Y., Wen, X., Zhang, N. & Cai, J. Carbon footprint assessment for a local branded pure milk product: a lifecycle based approach. Food Sci. Technol 38, 98–105 (2017).
