# 阴极铜生产|阴极铜|湿法冶金|铜矿石

Dataset: ILCD process, Unit process, single operation
Geography: CN
Reference year: 2009
Valid until: 2013
Classification: Materials production / Other mineralic materials
Functional unit: the functional unit was defined as the production of 1 ton of cathode copper.
LCI method principle: Attributional
LCI method approaches: Allocation - mass
Generated by: 王鹏, 2867919560@qq.com
Review: Dependent internal review by 天工LCI数据工作小组
Amounts: no units in this file; such an amount is in the reference unit of its flow, which a separate flow dataset defines
copyright: false

## Geography
中国南方

## Time period
火法精炼工艺矿石品位为2009年至2013年中国地下和露天开采的平均水平，

## Technology and included processes
采矿-运输-堆浸-萃取-电解精炼

## Reference product
- copper: 307000; input; measured
  Copper ore

## Inputs
All rows: software or database
- hard coal: 1790
  Coal
- crude oil; 42.3 MJ/kg: 91.2
  Crude oil
- natural gas; 44.1 MJ/kg: 12
  Natural gas
- Anode Plate: 15
  Anode Plate需要补充
- bauxite: 0.00596
  Bauxite
- Extraction agent: 0.277
  Extraction agent需要补充
- water: 295
  Fresh water
- gravel: 0.784
  Gravel
- Limestone: 51.6
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
## Deviations from the LCI method approaches
与污染排放相关的特征因子源自 CML 方法

## Data selection and combination
火法精炼工艺的矿石品位是2009-2013年中国地下和露天开采的平均水平，并且考虑了湿法冶金方法矿石品位的真实情况[14]。其他无法从实际工厂获得的数据来自已发表的文献或通过质量平衡计算，例如，

## Data treatment and extrapolations
本文选取11个指标来评价阴极铜生产对环境的影响，并通过Simapro7.0进行计算。

## Review details
清单： 内部审查通过几个迭代步骤完成，涉及原始数据验证、原始数据记录、代表性、完整性、与 ISO 14040 和 14044 有关的建模的一致性。

## Data sources
- Li, H., Gong, X. Z., Wang, Z. H. & Li, Y. Life Cycle Assessment of Cathode Copper Production. MSF 898, 2422–2431 (2017).
