# 电力生产 ; 电力 ; 火电（49.7%）+水电（45.9%）+风电（2.5%）+太阳能发电（1.9%）

Dataset: ILCD process, Partly terminated system
Geography: HUB-CN
Reference year: 2019
Classification: Energy carriers and technologies / Electricity
LCI method principle: Other
Generated by: 熊若熙, xiongrx0126@163.com
Owner: 天工LCI数据工作小组
Review: Dependent internal review by 天工LCI数据工作小组
Amounts: no units in this file; such an amount is in the reference unit of its flow, which a separate flow dataset defines
copyright: false
licenseType: Free of charge for all users and uses

## General comment
电力产生形式包括火力发电、水力发电、风力发电和太阳能发电

## Time period
根据2019年能源统计年鉴数据计算

## Technical purpose
该数据集代表了不同形式的电力生成，包括火力发电（49.7%）、水力发电（45.9%）、风力发电（2.5%）和太阳能发电（1.9%）。该数据可用于评估给定电力组合的电力生成的环境影响，这对于能源政策的制定、环境影响研究以及旨在最小化碳排放的电力系统设计至关重要。

## Reference product
- Electricity: 3.6; calculated

## Outputs
- carbon dioxide: 0.369; calculated
- sulfur dioxide: 6.1e-5; calculated
- Nitrogen oxides: 9.8327e-5; calculated
- Dust (unspecified, from stack): 1.2459e-5; calculated

## Data treatment and extrapolations
核算方法参考《企业温室气体排放核算方法与报告指南 发电设施》。不同形式发电量及燃料用量来自于《中国能源统计年鉴 2020》中的第三章（能源生产） 和第六章（地区能源平衡表）。用于计算二氧化碳排放因子的低位发热量、单位热值含碳量等燃料参数来自于《2019 年度中国区域电网二氧化碳基准线排放因子 OM 计算说明》、《企业温室气体排放核算方法与报告指南 发电设施》

## Use advice
用户应根据提供的发电组合数据进行碳排放剖析。必须注意遵循《企业温室气体排放核算方法与报告指南 发电设施》中提供的方法论指导。使用《中国能源统计年鉴 2020》中特定能源生产值和燃料消耗的正确地区数据非常重要。计算二氧化碳排放因子时，应符合《2019年中国区域电网二氧化碳基准线排放因子计算说明OM》中提供的信息，以确保在生命周期评估或其他环境影响评价中准确地核算排放量。

## Review details
清单： 内部审查通过几个迭代步骤完成，涉及原始数据验证、原始数据记录、代表性、完整性、与 ISO 14040 和 14044 有关的建模的一致性。

## Data sources
- 熊若熙. 中国电力生产和消费二氧化碳与污染物排放因子核算. (清华大学, 2023).
