# 土壤修复;原位修复;生物强化修复;施工准备;钻井废弃土处理

Dataset: ILCD process, Unit process, single operation
Geography: SH-CN
Classification: Other Services / Repair and maintenance
Generated by: 肖萌, xiaomeng@mail
Owner: 天工LCI数据工作小组
Review: Dependent internal review by 天工LCI数据工作小组
Amounts: no units in this file; such an amount is in the reference unit of its flow, which a separate flow dataset defines
licenseType: Free of charge for all users and uses

## General comment
此数据代表原位土壤修复过程，具体为处理受氯代挥发性有机化合物（CVOCs）污染水体的生物强化修复。它适用于施工准备期间钻井废弃土的处理与处置。此过程适合大规模的环境清洁工程，特别是在有CVOCs污染的地区。

## Geography
The aquifer in a certain area in Shanghai, China, is uniformly contaminated with chlorinated volatile organic compounds (CVOCs), with a surface area of 20,000 m2 and a depth of 50 m, with the water table located at a depth of 30 m.

## Reference product
- Treated borehole waste soil: 490280
  处理完成的钻井废弃土

## Inputs
All rows: software or database
- Concrete: 2206.25
- Steel sections: 147.08
- Polyethylene: 11.28
- polyvinylchloride resin (B-PVC): 1.47
- gravel: 10786.1
- Electricity: 2117.99
- Diesel: 524.6

## Use advice
使用此数据集的用户应注意，它特定适用于所描述的具有确定面积和深度的受污染水体的场景。数据集反映了联合化学和原位生物修复（CHC+ISB）技术的使用，必须在整个受污染区域均匀执行。在评估土壤修复过程中，必须包括此技术对水体特性、环境合规性和潜在副产品形成的影响。

## Review details
清单： 内部审查通过几个迭代步骤完成，涉及原始数据验证、原始数据记录、代表性、完整性、与 ISO 14040 和 14044 有关的建模的一致性。

## Data sources
- Ni, Z. et al. Comparative Life-Cycle Assessment of Aquifer Thermal Energy Storage Integrated with in Situ Bioremediation of Chlorinated Volatile Organic Compounds. Environ. Sci. Technol. 54, 3039–3049 (2020).
