# 电力生产 ; 电力 ; 火电（86.5%）+水电（0.6%）+核电（6.4%）+风电（3.6%）+太阳能发电（3.0%）

Dataset: ILCD process, Partly terminated system
Geography: JS-CN
Reference year: 2019
Classification: Energy carriers and technologies / Electricity
LCI method principle: Other
Generated by: 熊若熙, xiongrx0126@163.com
Owner: 天工LCI数据工作小组
Review: Dependent internal review by 天工LCI数据工作小组
Amounts: no units in this file; such an amount is in the reference unit of its flow, which a separate flow dataset defines
copyright: false
licenseType: Free of charge for all users and uses

## General comment
电力产生形式包括火力发电、水力发电、核能发电、风力发电和太阳能发电

## Time period
根据2019年能源统计年鉴数据计算

## Technical purpose
该数据集描述了电力生产中使用的不同电力生成技术的组合，它包括火力发电、水电、核电、风电和太阳能发电在整体电力混合中的比例贡献。这种数据集通常由工业和组织使用，以了解其电力消费的碳足迹，为能源采购战略决策提供信息，并遵守要求披露环境影响的法规。此外，该数据可用于优化能源采购以实现可持续性目标，支持设计低碳产品或服务，或用于环境影响研究和与气候变化相关的研究。

## Reference product
- Electricity: 3.6; calculated

## Outputs
- carbon dioxide: 0.678; calculated
- sulfur dioxide: 0.000106; calculated
- Nitrogen oxides: 0.000172389; calculated
- Dust (unspecified, from stack): 2.2651e-5; calculated

## Data treatment and extrapolations
核算方法参考《企业温室气体排放核算方法与报告指南 发电设施》。不同形式发电量及燃料用量来自于《中国能源统计年鉴 2020》中的第三章（能源生产） 和第六章（地区能源平衡表）。用于计算二氧化碳排放因子的低位发热量、单位热值含碳量等燃料参数来自于《2019 年度中国区域电网二氧化碳基准线排放因子 OM 计算说明》、《企业温室气体排放核算方法与报告指南 发电设施》

## Use advice
该数据集用户必须在其生命周期评估中考虑电力生成的方法学细节。遵守为电力生产设施指定的温室气体核算方法和报告指南至关重要。必须谨慎确保按照提供的来源中概述的区域能源组合的正确背景使用排放因子。关于是否包括来自特定来源（例如，可再生与非可再生）电力的假设应该被透明地记录。此外，在计算碳足迹时，用户应根据最新和适用的统计年鉴和专门的排放因子计算指南更新排放因子。

## Review details
清单： 内部审查通过几个迭代步骤完成，涉及原始数据验证、原始数据记录、代表性、完整性、与 ISO 14040 和 14044 有关的建模的一致性。

## Data sources
- 熊若熙. 中国电力生产和消费二氧化碳与污染物排放因子核算. (清华大学, 2023).
