# 地下水异位修复;地下水抽出处理;施工;抽水井

Dataset: ILCD process, Unit process, single operation
Geography: CA
Reference year: 2007
Classification: Unit processes / Other Services / Repair and maintenance
Generated by: 王宁, wang_ning@caep.org.cn
Owner: 天工LCI数据工作小组
Review: Dependent internal review by 天工LCI数据工作小组
Amounts: no units in this file; such an amount is in the reference unit of its flow, which a separate flow dataset defines
copyright: false
licenseType: Free of charge for all users and uses

## General comment
使用聚氯乙烯、石英砂、膨润土、混凝土建造个3抽水井

## Geography
The contaminated area was located 600 m from a river shore in the northern part of the prov-ince of Quebec， Canada.

## Technology and included processes
使用柴油、聚氯乙烯、石英砂、膨润土、混凝土建造个3抽水井

## Technical purpose
使用聚氯乙烯（PVC）、石英砂、膨润土和混凝土建造的抽水井旨在进行地下水异位修复。该过程特别适用于通过抽取后进行处理的受污染地下水。这种装置通常用于旨在恢复地下水质量的环境工程项目中，通常是在受工业污染影响的区域所需。

## Reference product
- Extraction wel: 3; estimated
  在现场建造三个抽提井

## Inputs
All rows: estimated
- Polyvinyl chloride: 459.1
  成井过程消耗的PVC管
- Diesel: 2.5
  钻孔过程钻机所消耗的柴油
- quartz sand: 1036
  成井过程消耗的石英砂
- bentonite: 843.4
  成井过程消耗的石膨润土
- cement, unspecified: 210.1
  成井过程消耗的水泥

## Use advice
在使用该生命周期评估数据时，用户应考虑工艺的地理空间相关性，以确保数据适用于正在研究的特定站点。注意施工方法和所使用材料的细节是很重要的，因为它们会影响评估结果。此外，用户还应考虑泵处理系统所需的任何附加基础设施，并应考虑井的运营寿命与地下水修复项目的技术可行性和预期持续时间之间的关系。

## Review details
清单： 内部审查通过几个迭代步骤完成，涉及原始数据验证、原始数据记录、代表性、完整性、与 ISO 14040 和 14044 有关的建模的一致性。

## Data sources
- Cadotte, M., Deschênes, L. & Samson, R. Selection of a remediation scenario for a diesel-contaminated site using LCA. Int J Life Cycle Assess 12, 239–251 (2007).
