# 地下水异位修复;地下水抽出处理;施工;设备和材料到场

Dataset: ILCD process, Unit process, single operation
Geography: CA
Reference year: 2007
Classification: Unit processes / Other Services / Repair and maintenance
Generated by: 王宁, wang_ning@caep.org.cn
Owner: 天工LCI数据工作小组
Review: Dependent internal review by 天工LCI数据工作小组
Amounts: no units in this file; such an amount is in the reference unit of its flow, which a separate flow dataset defines
copyright: false
licenseType: Free of charge for all users and uses

## General comment
将所需材料和设备运至现场

## Geography
The contaminated area was located 600 m from a river shore in the northern part of the prov-ince of Quebec， Canada.

## Technology and included processes
消耗柴油将设备与材料运输到项目现场

## Technical purpose
该数据描述了地下水异位修复技术的应用，该技术通过抽水和处理的过程。它涵盖了将必要的材料和设备运输到污染点以进行修复的过程。这一过程通常应用于地下水污染的场所，需要干预以防止进一步的环境影响，通常在敏感的生态系统附近，如河岸。

## Reference product
- Equipment and Materials Arriving on Site: 1; estimated
  到达现场的设备和材料

## Inputs
- Diesel: 79.8; estimated
  将所需材料和设备运至现场所需要的柴油

## Use advice
使用此数据集时，确保正确计算运输材料和设备到现场的柴油消耗量，以确保生命周期评价（LCA）的准确性。考虑源头到现场的距离（离河岸600米）非常重要，因为它直接影响燃料消耗。用户应验证数据的技术条件（地理和技术适用性）是否与其预期应用的特定条件相匹配。应特别注意运输方式、车辆类型和距离方面的方法论一致性。

## Review details
清单： 内部审查通过几个迭代步骤完成，涉及原始数据验证、原始数据记录、代表性、完整性、与 ISO 14040 和 14044 有关的建模的一致性。

## Data sources
- Cadotte, M., Deschênes, L. & Samson, R. Selection of a remediation scenario for a diesel-contaminated site using LCA. Int J Life Cycle Assess 12, 239–251 (2007).
