# 测井工程 | 天然气水合物 | 饱和度测井法

Dataset: ILCD process, Unit process, single operation
Geography: GD-CN
Reference year: 1989
Classification: Materials production / Other mineralic materials
LCI method principle: Attributional
LCI method approaches: Consequential
Generated by: 康诗康, 908798159@qq.com
Review: Dependent internal review by Tiangong LCI Data Working Group
Amounts: no units in this file; such an amount is in the reference unit of its flow, which a separate flow dataset defines
copyright: false

## General comment
通过水合物电阻率实验数据分析，从电阻率-含油（气）饱和度关系一般形式出发，导出适合水合物饱和度计算的最佳简式，明确了简式中 3 项的物理意义，即分别代表水合物颗粒完全分布于地层岩石孔隙中、以颗粒方式支撑和以成层状存在时的电阻增大率，建立了相应的水合物饱和度定量评价方法

## Geography
南海

## Time period
作者首次提出

## Technology and included processes
提出了非均匀各向孔隙体积中所占的百分比。当水合物饱和度由小增大时，其电阻率测量值变化的实验规律一般如图所示， 即在双对数坐标下随着水合物饱和度增高呈单调递增形态

## Reference product
- process steam from natural gas: 1e7; log-normal; article inperiodical
  饱和度相差10%时对应的水合物储量

## Outputs
- process steam from natural gas: 1e7; log-normal; article inperiodical
  有利勘探面积
- process steam from natural gas: 0.5; log-normal; article inperiodical
  孔隙度
- process steam from natural gas: 20; log-normal; article inperiodical
  有效厚度

## Data selection and combination
含油气饱和度即油气占孔隙体积的百分比，直接决定油气储量规模，是测井评价的核心参数之一。

## Data treatment and extrapolations
岩心被完全饱和地层水后加压用油气驱替，电阻增大率随油气饱和度增加而增大。实际解释评价饱和度是其反过程，即依据测井得到的地层电阻增大率来计算饱和度

## Review details
Inventory: The internal review was done by several iteration steps concerning raw data validation, raw data documentation, representativity, completeness and consistency of modelling with regard to ISO 14040 and 14044.; Documentation: The review of the documentation was performed by Ecobilan and is in compliance with ISO 14040 and 14044. The data set documentation is correct in view of the appropriateness of the information provided. It includes all relevant information in view of data quality and scope of application of the respective LCI result.

## Data sources
- 李宁;孙文杰;李心童;冯周;武宏亮;王克文; 天然气水合物饱和度测井解释模型及方程. 石油勘探与开发 1073–1079 (2022).
