# 钻井工程 | 天然气水合物| 随钻测井

Dataset: ILCD process, Unit process, single operation
Geography: ZH-GD-CN
Reference year: 2020
Classification: Materials production / Other mineralic materials
LCI method principle: Attributional
LCI method approaches: Consequential
Generated by: 康诗康, 908798159@qq.com
Review: Dependent internal review by Tiangong LCI Data Working Group
Amounts: no units in this file; such an amount is in the reference unit of its flow, which a separate flow dataset defines
copyright: false

## General comment
在尽量不损伤天然气水合物储层条件下开展敏感性钻探非常有必要，随钻测井( logging- while drilling，LWD) 已成为钻探过程中判识天然气水合物赋存和原位测试天然气水合物储层属性的 重要手段

## Geography
南海神狐海域

## Time period
文献发表时间

## Technology and included processes
钻井是天然气水合物勘探发现最直接的手段，也是天然气水合物开发的必要环节。

## Reference product
- process steam from natural gas: 1.4986e6; log-normal; article inperiodical
  累计产气总量

## Outputs
- process steam from natural gas: 42; max 42; uniform; article inperiodical
  试采持续产气
- process steam from natural gas: 35700; log-normal; article inperiodical
  日均产气量
- process steam from natural gas: 35; min 30; max 40; uniform; article inperiodical
  钻进速率

## Data selection and combination
天然气水合物资源量巨大，且 98% 以上赋存于 海域沉积物中，其中，相对较易开采的富砂质沉 积体中的天然气水合物资源量中值约为 1 226. 4 × 10¹² m³。

## Data treatment and extrapolations
第一个实现商业化 开发的天然气水合物气田为俄罗斯的麦索亚哈 ( Messoyakha) 气田，该气田发现于 1967 年，天然气水合物与常规天然 气呈 上-下结构共存， 1969 年开始商业化开发，断续生产到 2011 年底，天 然气水合物累计产气量约 54 × 10⁸ m³ ，占总产气量 的 41. 8%。

## Review details
Inventory: The internal review was done by several iteration steps concerning raw data validation, raw data documentation, representativity, completeness and consistency of modelling with regard to ISO 14040 and 14044.; Documentation: The review of the documentation was performed by Ecobilan and is in compliance with ISO 14040 and 14044. The data set documentation is correct in view of the appropriateness of the information provided. It includes all relevant information in view of data quality and scope of application of the respective LCI result.

## Data sources
- 张金华, 樊波 & 刘瑞江. 天然气水合物钻探现状与钻井技术. 科学技术与工程 20, 14343–14351 (2020).
