# 再生纸生产;新闻纸

Dataset: ILCD process, Unit process, black box
Geography: CN
Classification: Materials production / Paper and cardboards
LCI method principle: Attributional
Generated by: 高逸翔, 22210740040@m.fudan.edu.cn
Review: Dependent internal review by 天工LCI数据工作小组
Amounts: no units in this file; such an amount is in the reference unit of its flow, which a separate flow dataset defines
copyright: false

## General comment
依据系统边界划分新闻纸产品为制浆、抄纸、化 学品生产、能源生产、运输、污水处理，搜集各阶段资 源、能源、原料消耗、环境排放原始数据。首先，直接获取实际数据，基于企业调研、厂商提供、采样监测等多元化方式搜集数据。其次，无法调研获取的数据，利用Ecoinvent数据库相关数据代替。

## Geography
在很大程度上补充了我国生命周期评价数据库。

## Reference product
- Newsprint: 1000; measured
  新闻纸（抄纸阶段）

## Inputs
All rows: measured
- hydrogen peroxide: 79
  双氧水（制浆阶段）
- Sodium silicate: 33
  硅酸钠（制浆阶段）
- sodium hydroxide: 48
  火碱（制浆阶段）
- Saponifier: 3
  皂化剂（制浆阶段）
- Waste paper: 1325
  废纸（制浆阶段）
- Filler Material: 6
  填料（抄纸阶段）
- Starch: 3
  淀粉（抄纸阶段）
- Optical Brightening Agent: 1
  增白剂（抄纸阶段）
- Papermaking Retention Aid: 0.8
  助留剂（抄纸阶段）

## Outputs
All rows: measured
- carbon dioxide: 548.3
  CO2（制浆阶段）
- Nitrogen oxides: 3.4
  NOx（制浆阶段）
- sulfur dioxide: 2.8
  SO2（制浆阶段）
- methane: 0.0052
  CH4（制浆阶段）
- non-methane volatile organic compounds: 0.2
  NMVOC（制浆阶段）
- Total Suspended Particulate: 0.8
  TSP（制浆阶段）
- chemical oxygen demand: 0.7
  COD（制浆阶段）
- biological oxygen demand: 0.038
  BOD5（制浆阶段）
- total suspended solids, unspecified: 0.3
  TSS（制浆阶段）
- Waste (solid): 99
  废弃物（制浆阶段）
- carbon dioxide: 907.3
  CO2（抄纸阶段）
- Nitrogen oxides: 5.5
  NOx（抄纸阶段）
- sulfur dioxide: 2.5
  SO2（抄纸阶段）
- methane: 0.0087
  CH4（抄纸阶段）
- non-methane volatile organic compounds: 0.4
  NMVOC（抄纸阶段）
- Total Suspended Particulate: 0.7
  TSP（抄纸阶段）
- chemical oxygen demand: 0.027
  COD（抄纸阶段）
- biological oxygen demand: 0.002
  BOD5（抄纸阶段）
- total suspended solids, unspecified: 0.016
  TSS（抄纸阶段）
- carbon dioxide: 76.9
  CO2（运输阶段）
- Nitrogen oxides: 0.6
  NOx（运输阶段）
- sulfur dioxide: 0.3
  SO2（运输阶段）
- methane: 0.2
  CH4（运输阶段）
- particles (PM10): 0.022
  PM10（运输阶段）
- non-methane volatile organic compounds: 0.06
  NMVOC（运输阶段）
- carbon dioxide: 124.8
  CO2（化学品生产阶段）
- Nitrogen oxides: 0.2
  NOx（化学品生产阶段）
- sulfur dioxide: 0.3
  SO2（化学品生产阶段）
- methane: 0.2
  CH4（化学品生产阶段）
- particles (PM10): 0.011
  PM10（化学品生产阶段）
- non-methane volatile organic compounds: 0.082
  NMVOC（化学品生产阶段）
- Total Suspended Particulate: 0.091
  TSP（化学品生产阶段）
- chemical oxygen demand: 0.2
  COD（化学品生产阶段）
- biological oxygen demand: 0.2
  BOD5（化学品生产阶段）
- nitrogen, total (excluding N2): 0.0088
  TN（化学品生产阶段）
- nitrate: 0.037
  硝酸根（化学品生产阶段）
- phosphate: 0.004
  磷酸根（化学品生产阶段）
- total suspended solids, unspecified: 0.063
  TSS（化学品生产阶段）
- carbon dioxide: 10.2
  CO2（污水处理阶段）
- Nitrogen oxides: 0.061
  NOx（污水处理阶段）
- sulfur dioxide: 0.057
  SO2（污水处理阶段）
- methane: 9.6e-5
  CH4（污水处理阶段）
- non-methane volatile organic compounds: 0.0041
  NMVOC（污水处理阶段）
- Total Suspended Particulate: 0.016
  TSP（污水处理阶段）
- nitrogen, total (excluding N2): 0.024
  TN（污水处理阶段）
- phosphorus, total: 0.079
  TP（污水处理阶段）
- Waste (solid): 35.7
  废弃物（污水处理阶段）

## Deviations from the LCI method approaches
本研究中采用阶段方法，不考虑可回收的固体废弃物（例如，煤渣、聚酯树脂和棉纤维）回收过程或再利用过程对研究目标产生的经济环境影响。

## Review details
清单： 内部审查通过几个迭代步骤完成，涉及原始数据验证、原始数据记录、代表性、完整性、与 ISO 14040 和 14044 有关的建模的一致性。

## Data sources
- 许远. 典型再循环纸产品的生命周期影响全评价. 造纸科学与技术 38, 58-61+86 (2019).
