# 污泥处理与处置|干燥焚烧发电

Dataset: ILCD process, Unit process, single operation
Geography: CN
Classification: Materials production / Other mineralic materials
Generated by: 金思甜, 2331276@tongji.edu.cn
Review: Dependent internal review by 天工LCI数据工作小组
Amounts: no units in this file; such an amount is in the reference unit of its flow, which a separate flow dataset defines

## Reference product
- Sludge: 100; input; estimated
  100 kg 污泥（含水率为70.5%）

## Outputs
- electricity from waste incineration: 54.468; measured
- carbon dioxide: 41.17
- sulfur dioxide: 0.88
- Nitrogen oxides: 0.67
- Flue dust: 0.87
- mineral waste (ash): 17.16; measured

## Review details
清单： 内部审查通过几个迭代步骤完成，涉及原始数据验证、原始数据记录、代表性、完整性、与 ISO 14040 和 14044 有关的建模的一致性。

## Data sources
- 污泥干燥焚烧发电的生命周期评价
