# 铜基混合废料回收|金、银、硒、碳酸镍等副产物|金银回收工艺|铜电解废料（阳极泥）

Dataset: ILCD process, Unit process, single operation
Geography: JX-CN
Reference year: 2020
Classification: Materials production / Other mineralic materials
Functional unit: We consider the functional unit of the recycling of copper-based mixed waste to be 1000 kg electrolytic copper.
LCI method principle: Attributional
LCI method approaches: Allocation - market value
Generated by: 王鹏, 2867919560@qq.com
Review: Dependent internal review by Tiangong LCI Data Working Group
Amounts: no units in this file; such an amount is in the reference unit of its flow, which a separate flow dataset defines
copyright: false

## Geography
典型案例是位于中国江西省的一家金属回收企业，

## Technology and included processes
金银回收工艺中，用液氨、联氨、盐酸、硫酸、铁粉、草酸、灰分、及其他辅助材料。以电力为主要能源，排放废水、废气、废渣。

## Reference product
- silver: 0.9; measured
  Silver

## Inputs
All rows: measured
- ammonia: 3.5
  Ammonia
- Anode sludge: 15
  Anode sludge需要补充
- Electricity: 72
- Hard coal, at consumer EU-27: 11.2
  Hard coal
- Hydrochloric acid: 0.3
  Hydrochloric acid(32%）需要补充
- Quicklime: 7.5
  Quicklime需要补充
- natural gas: 1.8
  Natural gas
- Oxalic acid: 0.2
  Oxalic acid需要补充resourse
- iron: 21
  Cast iron
- Sodium chlorate: 6
  Sodium carbonate需要补充
- Sodium chlorate: 6
  Sodium chlorate需要补充
- sodium chloride: 3
  Sodium chloride
- Sodium hydroxide: 1.5
- Sodium sulfite: 3
  Sodium sulfite需要补充
- Sulfuric acid(98%): 18
  Sulfuric acid(98%)需要补充resourse
- transport in t*km,transport in t*km: 1.8981
  Transport
- water: 4.2
  Water
- Zinc dust: 0.3

## Outputs
All rows: measured
- carbon dioxide: 15
  Carbon dioxide
- carbon monoxide: 70.7
  Flue gas
- mineral treatment residue (unspecified): 8
  Treatment residue
- Waste (deposited, hibernating in ground, non elementary flow): 3.4
  Waste (deposited)
- Nickel carbonate: 1.4
  Nickel carbonate需要补充
- selenium: 0.5
  Selenium

## Deviations from the LCI method approaches
使用LCA-ReCiPe 2016（Heijungs et al., 2017）表征和归一化方法（中点和端点方法），将生命周期清单转换为多个领域的影响分数。

## Data selection and combination
前台数据和后台数据。

## Data treatment and extrapolations
采用GaBi 9.0软件计算各种铜基混合废物回收工艺单位质量的库存、资源消耗和废物排放量。

## Review details
Inventory: The internal review was done by several iteration steps concerning raw data validation, raw data documentation, representativity, completeness and consistency of modelling with regard to ISO 14040 and 14044.; Documentation: The review of the documentation was performed by Ecobilan and is in compliance with ISO 14040 and 14044. The data set documentation is correct in view of the appropriateness of the information provided. It includes all relevant information in view of data quality and scope of application of the respective LCI result.

## Data sources
- Zhang, W. et al. Analyzing the environmental impact of copper-based mixed waste recycling-a LCA case study in China. Journal of Cleaner Production 284, 125256 (2021).
