# 土壤修复;;土壤异位修复;热脱附;尾气处理

Dataset: ILCD process, Unit process, single operation
Geography: CN
Reference year: 2022
Classification: Unit processes / Other Services / Repair and maintenance
Generated by: 王枫, wangfeng@caep.org.cn
Owner: 天工LCI数据工作小组
Review: Dependent internal review by 天工LCI数据工作小组
Amounts: no units in this file; such an amount is in the reference unit of its flow, which a separate flow dataset defines
copyright: false
licenseType: Free of charge for all users and uses

## General comment
异位热脱附修复1立方米污染土，热脱附后的废气经过旋风除尘器、二次燃烧室、热交换器、急冷塔、布袋除尘 器和喷淋吸收洗涤塔后达标排放，尾气处理过程除电力和水的投入外，还需要活性炭和氢氧化钠 (NaOH) 碱性溶液吸收尾气

## Geography
我国华东区域5 个污染土壤异位热脱附修复工程案例

## Technology and included processes
热脱附后的废气经过旋风除尘器、二次燃烧室、热交换器、急冷塔、布袋除尘器和喷淋吸收洗涤塔后达标排放

## Technical purpose
该修复过程旨在通过热脱附去除土壤中的污染物。该过程适用于需要在场地回收或重新开发之前清除土壤中污染物的各种污染场所。它适用于从土壤中提取挥发性和半挥发性有机化合物。热脱附后产生的废气通过旋风除尘器、二次燃烧室、热交换器、急冷塔和布袋除尘器等多个单元操作进行处理，并通过喷淋吸收洗涤塔确保干净、安全地释放到大气中。该过程通常用于环境工程和工业修复项目。

## Reference product
- Treated exhaust gas: 1; measured

## Inputs
- Electricity: 9; measured
- Activated Carbon: 0.98; measured
- sodium hydroxide: 50; measured
- Tap Water: 200; measured
- Exhaust gas: 1; missing unimportant

## Outputs
- waste water - untreated: 5000; measured

## Use advice
使用此数据集时，用户应考虑修复过程的技术适用性和预期范围。将污染物类型与热脱附效率相匹配非常关键。要考虑废气处理以满足当地环境标准的措施。在系统建模时，注意电力、水、活性炭和氢氧化钠（NaOH）在废气吸收中的输入。通过研究华东地区提出的案例研究，了解技术实施的地理差异，并适当适应当地法规和条件。

## Review details
清单： 内部审查通过几个迭代步骤完成，涉及原始数据验证、原始数据记录、代表性、完整性、与 ISO 14040 和 14044 有关的建模的一致性。

## Data sources
- 刘爽,陈盼,宋慧敏等.我国华东地区污染土壤异位热脱附修复碳排放及减排策略[J].环境工程学报,2022,16(08):2663-2671.
