# Bioethanol ; Steam explosion

Dataset: ILCD process
Classification: Energy carriers and technologies / Renewable fuels
Generated by: 袁嘉翼, jiayi_y@mail.bnu.edu.cn
Owner: 天工LCI数据工作小组
Review: Dependent internal review by 天工LCI数据工作小组
Amounts: no units in this file; such an amount is in the reference unit of its flow, which a separate flow dataset defines
licenseType: Free of charge for all users and uses

## Inputs
All rows: uniform; article inperiodical
- Electricity: 0
- heat: 3000; min 843; max 8660
- Electricity: 882; min 17.136; max 6948
- heat: 2180; min 190; max 10400
- Electricity: 4752; min 48.96; max 42480

## Outputs
- heat: 0; uniform; article inperiodical

## Review details
清单： 内部审查通过几个迭代步骤完成，涉及原始数据验证、原始数据记录、代表性、完整性、与 ISO 14040 和 14044 有关的建模的一致性。
