# 热轧卷|钢铁|钢材生产

Dataset: ILCD process, Unit process, single operation
Geography: CN
Reference year: 2006
Classification: Materials production / Other mineralic materials
Generated by: 王环宇, wanghuanyu00@126.com
Review: Dependent internal review by 天工LCI数据工作小组
Amounts: no units in this file; such an amount is in the reference unit of its flow, which a separate flow dataset defines

## Reference product
- steel hot rolled coil: 1; article inperiodical

## Inputs
- iron: 1.349; article inperiodical
- freshwater: 14.621; article inperiodical
- primary energy from solar energy: 21.64; article inperiodical

## Outputs
- carbon dioxide: 1.889; article inperiodical
- phenol,Sulphur oxides (as SO2): 0.002689; article inperiodical
- nitrous oxide: 0.002429; article inperiodical
- chemical oxygen demand: 0.000121; article inperiodical

## Review details
清单： 内部审查通过几个迭代步骤完成，涉及原始数据验证、原始数据记录、代表性、完整性、与 ISO 14040 和 14044 有关的建模的一致性。
