# 土壤和地下水修复;原位;地下水原位化学氧化;药剂制配设备

Dataset: ILCD process, Unit process, single operation
Geography: CA
Reference year: 2007
Classification: Other Services / Repair and maintenance
Generated by: 王宁, wang_ning@caep.org.cn
Owner: 天工LCI数据工作小组
Review: Dependent internal review by 天工LCI数据工作小组
Amounts: no units in this file; such an amount is in the reference unit of its flow, which a separate flow dataset defines
copyright: false
licenseType: Free of charge for all users and uses

## General comment
制药装置，包括制药储罐、混合装置

## Geography
The contaminated area was located 600 m from a river shore in the northern part of the prov-ince of Quebec， Canada.

## Technology and included processes
使用钢铁、乳胶、玻璃建造药剂制配装置

## Technical purpose
本工艺用于现场化学氧化，用于修复受污染的土壤和地下水。特别是，它应用于制药生产系统的建设中，包括安装制药储存罐和混合设备。此情景特别适用于加拿大魁北克省北部距河岸600米处的环境管理和恢复。

## Reference product
- A device for configuring solid pharmaceuticals into liquid pharmaceuticals: 1; input; estimated
  地表制药系统

## Inputs
- Steel sections: 10534; estimated
  使用铁建造地表制药系统
- Latex: 1.7; estimated
  使用乳胶造地表制药系统
- Glass (formed & finished): 167; estimated
  使用玻璃造地表制药系统

## Use advice
该数据集的用户应确保仅将其应用于地理、水文和污染特征与描述的工业过程高度相似的情景中。如果没有仔细考虑技术适用性和可能需要的方法论调整，数据集不应应用于与描述的环境大不相同的修复情景。还应注意包括适当处理可回收物的措施（如果存在），并考虑可能需要建模的任何特定场地的使用阶段行为。

## Review details
清单： 内部审查通过几个迭代步骤完成，涉及原始数据验证、原始数据记录、代表性、完整性、与 ISO 14040 和 14044 有关的建模的一致性。
