# 市政污水处理; 污水 ;循环活性污泥技术

Dataset: ILCD process, Unit process, black box
Geography: TH
Reference year: 2014
Valid until: 2014
Classification: Unit processes / End-of-life treatment / Waste water treatment
Generated by: 于晨阳, yuchenyang0506@foxmail.com
Owner: 天工LCI数据工作小组
Review: Dependent internal review by 天工LCI数据工作小组
Amounts: no units in this file; such an amount is in the reference unit of its flow, which a separate flow dataset defines
copyright: ['opt4ROkqig']
licenseType: Free of charge for all users and uses

## General comment
循环活性污泥工艺是以SBR技术基础上发展而成的一种新型的污水生物处理工艺，这种方法的应用是结合社会发展和先进科学技术为基础的一种综合性的污水处理收集措施和处理工艺，并且在其工作中有良好的工作优势与广泛的应用。截至当前，我国多个污水处理厂在工作中都纳入了这种工艺将其作为首要工作技术进行应用。

## Geography
Chongnonsi,Thailand

## Time period
2014年

## Technology and included processes
循环活性污泥技术主要包括废水与活性污泥混合反应、微生物在好氧条件下分解有机物、污水中的污染物被生物降解、沉淀过程将废水中的固体分离、以及清水经过排放口排出，实现废水的处理与净化。

## Technical purpose
该工业过程涉及使用循环活性污泥技术处理市政污水。此过程是城市卫生和环境保护的重要设施。它专为市政污水处理厂设计，能够有效去除废水中的污染物，然后将水质安全地释放回环境中，确保下游用户和生态系统的水质。

## Reference product
- Wastewater: 1; input; measured

## Inputs
- Electricity: 1.12464; measured
- transport in t*km: 4.39e-14; measured
  transport by lorry
- Polyaluminium Chloride: 5e-5; measured
  polymer

## Outputs
All rows: measured
- Waste (solid): 0.0016
- nitrogen, total (excluding N2): 0.0077
- phosphorus, total: 0.0011
- Suspended solids, unspecified,Suspended solids, unspecified,Suspended solids, unspecified: 0.0092
- chemical oxygen demand: 0.0244
- biological oxygen demand: 0.0061
- nitrous oxide: 0.0001
- methane (biogenic),methane (biogenic): 0.00117
  原文未区分biogenic和fossil，根据专家判断此处为biogenic。
- carbon dioxide (biogenic): 0.0152
  原文未区分biogenic和fossil，根据专家判断此处为biogenic。
- Sludge: 0.0248

## Use advice
在使用该数据集进行市政污水处理生命周期评估时，用户应确保数据的时间和技术背景（泰国春武里，2014年）与其研究范围相匹配。用户还应考虑自2014年以来可能发生的法规、技术和废水组成的变化。此外，数据集假设了一个'黑箱'单元过程，因此任何外推都应谨慎进行，考虑所应用技术的特定性质。

## Review details
清单： 内部审查通过几个迭代步骤完成，涉及原始数据验证、原始数据记录、代表性、完整性、与 ISO 14040 和 14044 有关的建模的一致性。

## Data sources
- Polruang, S., Sirivithayapakorn, S. & Prateep Na Talang, R. A comparative life cycle assessment of municipal wastewater treatment plants in Thailand under variable power schemes and effluent management programs. Journal of Cleaner Production 172, 635–648 (2018).
