# 煤炭井工开采;开采煤炭

Dataset: ILCD process, Unit process, black box
Geography: SQ-HEN-CN
Reference year: 2015
Classification: Energy carriers and technologies / Energetic raw materials
Generated by: 尹琳琳, yinlinlin0623@163.com
Owner: 天工LCI数据工作小组
Review: Dependent internal review by 天工LCI数据工作小组
Amounts: no units in this file; such an amount is in the reference unit of its flow, which a separate flow dataset defines
licenseType: Free of charge for all users and uses

## General comment
永城矿区开采出的煤炭主要用于能源生产，因其资源储量充足且开采条件有利。煤层的稳定赋存和较平缓的倾角有利于机械化开采方式，使得这些煤炭适用于电力发电厂、工业锅炉以及需要热能的各种制造过程。

## Geography
永城矿区的资源储量和储采比例与省内其他矿区相比具有较高的优势，现共划分 5 个勘探煤矿区、 2 个找煤预测区，永城矿区煤层的赋存较为稳定，开采技术条件也相对简单，可采煤层的倾角 比较平缓，适于机械化开采方式。

## Technology and included processes
煤炭开采环节的生产工艺流程包括井田开拓、井巷掘进、支护、回采等，井工开采主要通过井巷的开挖将埋在地下的煤炭实施开采并输送至地面。对该环节进行清单分析主要包括消耗燃料、原材料，还有废气的逸散。

## Reference product
- Hard coal, at consumer EU-27: 1.7196e9; uniform; measured
  论文通过对永城矿区井进行实地调研得到各项活动水平数据,现以新桥煤矿的 2013年的数据为例进行核算前的分析。2013年新桥煤矿矿井开采中“原煤产量”活动水平数据。

## Inputs
All rows: uniform
- Hard coal, at consumer EU-27: 3.327e6; measured
  论文通过对永城矿区井进行实地调研得到各项活动水平数据,现以新桥煤矿的 2013年的数据为例进行核算前的分析。2013年新桥煤矿矿井开采中“原煤”消耗活动水平数据。
- Gasoline (regular): 30650; measured
  论文通过对永城矿区井进行实地调研得到各项活动水平数据,现以新桥煤矿的 2013年的数据为例进行核算前的分析。2013年新桥煤矿矿井开采中“汽油”消耗活动水平数据。
- Diesel: 35200; measured
  论文通过对永城矿区井进行实地调研得到各项活动水平数据,现以新桥煤矿的 2013年的数据为例进行核算前的分析。2013年新桥煤矿矿井开采中“柴油”消耗活动水平数据。
- water: 9.34928e8; measured
  论文通过对永城矿区井进行实地调研得到各项活动水平数据,现以新桥煤矿的 2013年的数据为例进行核算前的分析。2013年新桥煤矿矿井开采中“水”消耗活动水平数据。
- Electricity: 1.86595e8; measured
  论文通过对永城矿区井进行实地调研得到各项活动水平数据,现以新桥煤矿的 2013年的数据为例进行核算前的分析。2013年新桥煤矿矿井开采中“电”消耗活动水平数据。
- Hard coal, at consumer EU-27: 2.0197; software or database
  修正排放因子,新桥煤矿2013年矿井开采“原煤修正排放因子”
- Diesel: 3.21; software or database
  修正排放因子,新桥煤矿2013年矿井开采“柴油修正排放因子”
- Gasoline (regular): 3.24; software or database
  修正排放因子,新桥煤矿2013年矿井开采“汽油修正排放因子”
- Electricity: 972.4; software or database
  修正排放因子,新桥煤矿2013年矿井开采“电修正排放因子”
- water: 0.000212; software or database
  修正排放因子,新桥煤矿2013年矿井开采“水修正排放因子”

## Use advice
在使用永城矿区的生命周期评估数据集时，需要考虑到开采技术条件相对简单和采矿过程的机械化等特定情况。存货分析应当考虑矿山过程中的燃料和原材料消耗以及废气排放。此数据集应根据区域地质特征使用，并建议定期更新数据，以反映采矿技术或环境法规的任何变化。

## Review details
清单： 内部审查通过几个迭代步骤完成，涉及原始数据验证、原始数据记录、代表性、完整性、与 ISO 14040 和 14044 有关的建模的一致性。
