# 天然气开发规划| KLS构造带|随机模拟

Dataset: ILCD process, Unit process, single operation
Geography: XJ-CN
Reference year: 2014
Classification: Materials production / Other mineralic materials
LCI method principle: Attributional
LCI method approaches: Consequential
Generated by: 康诗康, 908798159@qq.com
Review: Dependent internal review by Tiangong LCI Data Working Group
Amounts: no units in this file; such an amount is in the reference unit of its flow, which a separate flow dataset defines
copyright: false

## General comment
天然气开发规划方案风险评价需要进行大量的随机模拟，必须借助计算机实现，为此基于天然气开发规划方案风险评价理论研制了评价软件，借助软件开展 应用研究

## Geography
新疆塔里木盆地克拉苏构造带

## Time period
数据搜集时间

## Technology and included processes
软件还集成了储量、 产量和效益常用评价方法，主要是产量预测的动态分析方法和数值模拟方法， 形成不同开发阶段气田推荐方法列表

## Reference product
- natural gas: 0.31; input; min 0.28; max 0.34; uniform; article inperiodical
  内部收益率集中于28%-34%，全生命周期经济效益风险较小

## Data selection and combination
KLS构造带内探明已开发气田只有气田Ａ， 上报探明地质储量2830×10⁸，可采储量2130×10⁸，气藏类型属于中孔中渗、 底水、 异常高压、 干气气藏。２００４年１１ 月１９日投产， ２００６年底所有井完钻， 并达到方案设计的107×10⁸ 产能规模。

## Data treatment and extrapolations
待钻圈闭落实， 因此采用资源转化率法对新增储量趋势进行预测。 历史上，构造带内及周围资源转化率集中于５０％-５５％之间， 以历史为参考， 同时以资 源量评价的可靠程度界限， 即上下浮动３０％， 作为概率区间， 概率曲线函数釆用正态分布

## Review details
Inventory: The internal review was done by several iteration steps concerning raw data validation, raw data documentation, representativity, completeness and consistency of modelling with regard to ISO 14040 and 14044.; Documentation: The review of the documentation was performed by Ecobilan and is in compliance with ISO 14040 and 14044. The data set documentation is correct in view of the appropriateness of the information provided. It includes all relevant information in view of data quality and scope of application of the respective LCI result.

## Data sources
- 陆家亮. 天然气开发规划风险量化评价模型研究. (2014)
