# 猪肉生产 | 肉猪饲养

Dataset: ILCD process, Unit process, single operation
Geography: ZY-GS-CN
Reference year: 2012
Classification: Materials production / Other mineralic materials
Functional unit: 1kg pork as functional unit (FU)
Generated by: 杨瑞, 1632707028@qq.com
Review: Dependent internal review by Tiangong LCI Data Working Group
Amounts: no units in this file; such an amount is in the reference unit of its flow, which a separate flow dataset defines
copyright: false

## General comment
在生猪育肥期内，育肥猪饲料全部为精饲料

## Geography
根据作者对张掖市前进牧业石岗墩牧场调查得到平均每头奶牛每天耗水 70kg

## Time period
猪饲料成分（刘鸣达等，2012）

## Reference product
- pig: 1
  猪肉

## Inputs
- maize: 2.1; measured
  玉米
- wheat: 1.4; measured
  小麦
- soybean: 0.32; measured
  大豆
- water: 7; measured

## Data selection and combination
出栏时平均体重为 125kg（刘 鸣达等，2012），料肉比为 3：1（张颖等，2010）

## Review details
Inventory: The internal review was done by several iteration steps concerning raw data validation, raw data documentation, representativity, completeness and consistency of modelling with regard to ISO 14040 and 14044.; Documentation: The review of the documentation was performed by Ecobilan and is in compliance with ISO 14040 and 14044. The data set documentation is correct in view of the appropriateness of the information provided. It includes all relevant information in view of data quality and scope of application of the respective LCI result.

## Data sources
- 魏云. 基于生命周期评价的禽畜产品环境影响评价及对策探讨. (兰州大学, 2016).
