# 玻璃生产 ;夹层玻璃;切割

Dataset: ILCD process, Unit process, single operation
Geography: SX-ZJ-CN
Reference year: 2004
Classification: Materials production / Glass and ceramics
Generated by: 和夏夏, 18616148319@163.com
Owner: 天工LCI数据工作小组
Review: Dependent internal review by 天工LCI数据工作小组
Amounts: no units in this file; such an amount is in the reference unit of its flow, which a separate flow dataset defines
copyright: false
licenseType: Free of charge for all users and uses

## Reference product
- polyvinyl butyral PVB胶片: 19500; measured
  PVB胶片，polyvinyl butyral

## Inputs
- electricity mix: 59760; measured
- polyvinyl butyral PVB胶片: 20000; measured
  PVB胶片，polyvinyl butyral

## Outputs
- Waste (solid): 500; measured

## Review details
清单： 内部审查通过几个迭代步骤完成，涉及原始数据验证、原始数据记录、代表性、完整性、与 ISO 14040 和 14044 有关的建模的一致性。

## Data sources
- 年产5600吨钢化玻璃及250吨夹层玻璃生产线建设项目环境影响报告
