# 电力生产 ; 电力 ; 火电（54.5%）+水电（32.1%）+核电（9.3%）+风电（3.3%）+太阳能发电（0.8%）

Dataset: ILCD process, Partly terminated system
Geography: GX-CN
Reference year: 2019
Classification: Energy carriers and technologies / Electricity
LCI method principle: Other
Generated by: 熊若熙, xiongrx0126@163.com
Owner: 天工LCI数据工作小组
Review: Dependent internal review by 天工LCI数据工作小组
Amounts: no units in this file; such an amount is in the reference unit of its flow, which a separate flow dataset defines
copyright: false
licenseType: Free of charge for all users and uses

## General comment
电力产生形式包括火力发电、水力发电、核能发电、风力发电和太阳能发电

## Time period
根据2019年能源统计年鉴数据计算

## Technical purpose
该数据集描述了各种电力来源的复合电力产量百分比：火力电(54.5%)、水力电(32.1%)、核电(9.3%)、风电(3.3%)和太阳能电力(0.8%)。它旨在评估工业、住宅区和商业设施使用的电力混合。该数据适用于生命周期评估研究、碳足迹计算和能源政策制定。

## Reference product
- Electricity: 3.6; calculated

## Outputs
- carbon dioxide: 0.481; calculated
- sulfur dioxide: 8e-5; calculated
- Nitrogen oxides: 0.00012773; calculated
- Dust (unspecified, from stack): 1.6964e-5; calculated

## Data treatment and extrapolations
核算方法参考《企业温室气体排放核算方法与报告指南 发电设施》。不同形式发电量及燃料用量来自于《中国能源统计年鉴 2020》中的第三章（能源生产） 和第六章（地区能源平衡表）。用于计算二氧化碳排放因子的低位发热量、单位热值含碳量等燃料参数来自于《2019 年度中国区域电网二氧化碳基准线排放因子 OM 计算说明》、《企业温室气体排放核算方法与报告指南 发电设施》

## Use advice
用户在应用这些数据时，应确保与2019年能源统计年鉴的排放因子保持一致性，以确保准确性。在模拟过程相关排放时，应特别注意燃料单位热值含碳量和低位发热量。在使用数据时，还应考虑电力产生的技术更改和更新问题，并理解所提供的百分比是基于2020年能源生产组合的。在将这些数据应用到未来的情景或有不同能源组合的地理环境时，可能需要调整碳排放计算的假设。

## Review details
清单： 内部审查通过几个迭代步骤完成，涉及原始数据验证、原始数据记录、代表性、完整性、与 ISO 14040 和 14044 有关的建模的一致性。

## Data sources
- 熊若熙. 中国电力生产和消费二氧化碳与污染物排放因子核算. (清华大学, 2023).
