# Bioethanol ; Acid

Dataset: ILCD process
Classification: Energy carriers and technologies / Renewable fuels
Generated by: 袁嘉翼, jiayi_y@mail.bnu.edu.cn
Owner: 天工LCI数据工作小组
Review: Dependent internal review by 天工LCI数据工作小组
Amounts: no units in this file; such an amount is in the reference unit of its flow, which a separate flow dataset defines
licenseType: Free of charge for all users and uses

## Inputs
All rows: uniform; article inperiodical
- Electricity: 17.928; max 152.64
- heat: 5730; min 372; max 1570
- Electricity: 568.8; min 45; max 6840
- heat: 2080; min 244; max 5790
- Electricity: 608.4; min 65.52; max 2368.8

## Outputs
- heat: 2880; min 130; max 8400; uniform; article inperiodical

## Review details
清单： 内部审查通过几个迭代步骤完成，涉及原始数据验证、原始数据记录、代表性、完整性、与 ISO 14040 和 14044 有关的建模的一致性。
