# 开采阶段|石油|水驱产量、化学驱增油产量、稠油产量

Dataset: ILCD process, Unit process, single operation
Geography: CN
Reference year: 2016
Classification: Materials production / Other mineralic materials
LCI method principle: Attributional
LCI method approaches: Consequential
Generated by: 李梓萌, 1577978537@qq.com
Review: Dependent internal review by Tiangong LCI Data Working Group
Amounts: no units in this file; such an amount is in the reference unit of its flow, which a separate flow dataset defines
copyright: false

## Geography
文献中代称为LS油田未进行具体说明

## Outputs
- LPG - liquefied petroleum gas: 2.368e10; uniform; article inperiodical
  2003-2012合计水驱产量
- LPG - liquefied petroleum gas: 1.44e9; uniform; article inperiodical
  2003-2012合计化学驱增油产量
- LPG - liquefied petroleum gas: 41700; uniform; article inperiodical
  2003-2012合计稠油产量

## Review details
Inventory: The internal review was done by several iteration steps concerning raw data validation, raw data documentation, representativity, completeness and consistency of modelling with regard to ISO 14040 and 14044.; Documentation: The review of the documentation was performed by Ecobilan and is in compliance with ISO 14040 and 14044. The data set documentation is correct in view of the appropriateness of the information provided. It includes all relevant information in view of data quality and scope of application of the respective LCI result.

## Data sources
- 石油勘探开发投入产出优化研究 - 中国知网.
