# 电池生产

Dataset: ILCD process, Unit process, single operation
Geography: CN
Reference year: 2014
Classification: Materials production / Other mineralic materials
Functional unit: The functional unit of the LCA study was 1 kWh based on a multi-Si PV module
LCI method principle: Attributional
LCI method approaches: Allocation
Generated by: 杨锦锋, yjfzfshn@163.com
Review: Dependent internal review by Tiangong LCI Data Working Group
Amounts: no units in this file; such an amount is in the reference unit of its flow, which a separate flow dataset defines
copyright: false

## General comment
多晶硅

## Geography
本研究对中国采用多晶硅组件的光伏系统进行了生命周期评估

## Time period
文章发表

## Reference product
- Multi-Si solar cell: 1090; article inperiodical
  Multi-Si Solar cell

## Inputs
All rows: article inperiodical
- Multi-Si wafer: 3.34
  Multi-Si Wafer
- Ammonia: 0.0881
- Ethanol: 0.23
  Ethanol (99.7%)
- Hydrochloric acid: 2.57
  Hydrochloric acid (37%)
- Hydrofluoric acid: 0.78
- Nitric acid: 1.43
  Nitric acid (70%)
- dinitrogen: 7.62
  Nitrogen
- phosphoric acid: 0.00931
  Phosphoric acid (85%)
- Potassium hydroxide: 2.76
  KOH (21%)
- silver: 0.0679
  Silver
- aluminium: 0.38
  Aluminum
- Water (fresh water): 866.04
  Water
- Natural gas: 0.59
- electricity: 686.69
  Electricity
- process steam: 26.15
  Steam

## Outputs
All rows: article inperiodical
- ammonia: 0.00786
  Ammonia emissions to air
- hydrogen chloride: 0.00492
  Hydrogen chloride emissions to air
- hydrogen fluoride: 0.00393
  Hydrogen fluoride emissions to air
- Nitrogen oxides: 0.061
  Nitrogen oxides emissions to air
- non-methane volatile organic compounds: 0.03464
  NMVOC to air
- process water: 888.13
  Water

## Deviations from the LCI method approaches
本研究旨在定量评估中国光伏系统的生命周期对环境的影响，为中国光伏产业的可持续发展政策制定提供科学依据。

## Data selection and combination
库存数据，包括太阳能级产品生产过程中的材料消耗和 太阳能级硅、硅片、硅锭、电池和组件生产过程中的材料消耗和环境排放 硅、硅片、硅锭、电池和组件生产过程中涉及的材料消耗和环境排放。主要从代表中国目前多晶硅光伏技术领域的企业收集。技术的企业。能耗数据参考了 能耗数据参考了《中国太阳能光伏清洁生产报告》（Li 和 Chang，2012 年）。多晶硅生产数据来自有关中国多晶硅生产的文献。的文献资料。

## Review details
Inventory: The internal review was done by several iteration steps concerning raw data validation, raw data documentation, representativity, completeness and consistency of modelling with regard to ISO 14040 and 14044.; Documentation: The review of the documentation was performed by Ecobilan and is in compliance with ISO 14040 and 14044. The data set documentation is correct in view of the appropriateness of the information provided. It includes all relevant information in view of data quality and scope of application of the respective LCI result.

## Data sources
- Fu, Y., Liu, X. & Yuan, Z. Life-cycle assessment of multi-crystalline photovoltaic (PV) systems in China. Journal of Cleaner Production 86, 180–190 (2015).
