# 电力生产 ; 电力 ; 火电（89.8%）+水电（0.1%）+核电（3.5%）+风电（3.8%）+太阳能发电（2.8%）

Dataset: ILCD process, Partly terminated system
Geography: SD-CN
Reference year: 2019
Classification: Energy carriers and technologies / Electricity
LCI method principle: Other
Generated by: 熊若熙, xiongrx0126@163.com
Owner: 天工LCI数据工作小组
Review: Dependent internal review by 天工LCI数据工作小组
Amounts: no units in this file; such an amount is in the reference unit of its flow, which a separate flow dataset defines
copyright: false
licenseType: Free of charge for all users and uses

## General comment
电力产生形式包括火力发电、水力发电、核能发电、风力发电和太阳能发电

## Time period
根据2019年能源统计年鉴数据计算

## Technical purpose
此数据集代表工业环境中多元化的电力生产过程，电力通过火力发电（89.8%）、水力发电（0.1%）、核能发电（3.5%）、风力发电（3.8%）和太阳能发电（2.8%）的混合方式生成。它适用于需要电力生产能源组合全面概述的应用。例如，它可以用于能源规划和政策制定，以了解对不同能源源的电力生成依赖。

## Reference product
- Electricity: 3.6; calculated

## Outputs
- carbon dioxide: 0.681; calculated
- sulfur dioxide: 0.000118; calculated
- Nitrogen oxides: 0.000187809; calculated
- Dust (unspecified, from stack): 2.3641e-5; calculated

## Data treatment and extrapolations
核算方法参考《企业温室气体排放核算方法与报告指南 发电设施》。不同形式发电量及燃料用量来自于《中国能源统计年鉴 2020》中的第三章（能源生产） 和第六章（地区能源平衡表）。用于计算二氧化碳排放因子的低位发热量、单位热值含碳量等燃料参数来自于《2019 年度中国区域电网二氧化碳基准线排放因子 OM 计算说明》、《企业温室气体排放核算方法与报告指南 发电设施》

## Use advice
在利用此数据集进行生命周期评估或能源分析时，确保电力生产的背景与指定的区域能源组合一致。考虑到数据年份为2019年，鉴于能源生产技术和碳强度的快速变化，考虑数据年份的重要性。根据诸如《企业温室气体排放核算方法与报告指南 发电设施》等来源提供的方法学建议进行准确的碳排放计算。注意具体排放因素和燃料参数，如低位发热量和单位能量含碳量，特别是在与其他数据集比较或结合时。

## Review details
清单： 内部审查通过几个迭代步骤完成，涉及原始数据验证、原始数据记录、代表性、完整性、与 ISO 14040 和 14044 有关的建模的一致性。

## Data sources
- 熊若熙. 中国电力生产和消费二氧化碳与污染物排放因子核算. (清华大学, 2023).
