# 活性炭单元;地下水异位修复;P&T系统;基础设施建设

Dataset: ILCD process, Unit process, single operation
Geography: JS-CN
Reference year: 2022
Classification: Unit processes / Other Services / Repair and maintenance
Generated by: 王宁, wang_ning@caep.org.cn
Owner: 天工LCI数据工作小组
Review: Dependent internal review by 天工LCI数据工作小组
Amounts: no units in this file; such an amount is in the reference unit of its flow, which a separate flow dataset defines
copyright: false
licenseType: Free of charge for all users and uses

## General comment
使用钢铁和活性炭颗粒建造活性炭装置

## Geography
a closed pesticide manufacturing plant located in Jiangsu Province, China.

## Technical purpose
所描述的颗粒活性炭单元用于地下水异位修复，作为抽水和处理（P&T）系统的一部分。它主要设计用于江苏省一个已关闭的农药制造厂的污染地下水处理。该单元使用钢铁和活性炭颗粒建造，这表明它在环境修复项目的基础设施建设阶段有应用。

## Reference product
- Granular active carbon unit: 1; measured

## Inputs
- Activated Carbon: 900; measured
- Steel sections: 250; measured
- transport in t*km: 115; calculated

## Use advice
该数据集的用户应考虑活性炭单元的具体使用背景，包括其在针对农药污染地下水的抽水和处理（P&T）系统中的部署。考虑到位于江苏省，用户可能需要考虑当地的环境法规和修复标准。建设材料（钢铁和活性炭颗粒）应在清单分析中详细记录，并且该系统应整合到更大的考虑整个修复项目生命周期的LCA模型中，包括活性炭随时间效能变化的潜在影响。

## Review details
清单： 内部审查通过几个迭代步骤完成，涉及原始数据验证、原始数据记录、代表性、完整性、与 ISO 14040 和 14044 有关的建模的一致性。

## Data sources
- Ding, D. et al. Assessing the environmental impacts and costs of biochar and monitored natural attenuation for groundwater heavily contaminated with volatile organic compounds. Science of The Total Environment 846, 157316 (2022).
