# 土壤修复;原位修复;多相抽提;工程实施;活性炭更换

Dataset: ILCD process, Unit process, single operation
Geography: KR
Reference year: 2011
Classification: Other Services / Repair and maintenance
Generated by: 张建宾, zhangjb@caep.org.cn
Owner: 天工LCI数据工作小组
Review: Dependent internal review by 天工LCI数据工作小组
Amounts: no units in this file; such an amount is in the reference unit of its flow, which a separate flow dataset defines
copyright: false
licenseType: Free of charge for all users and uses

## General comment
采用活性炭对修复环节产生的废气进行吸附处置

## Technology and included processes
活性炭更换量估算:18000 kg

## Technical purpose
此数据集涉及使用多相抽提技术的土壤修复过程。它特别应用于原位环境清理项目中。该过程包括在修复过程中使用和更换颗粒活性炭（GAC），以吸附从受污染土壤抽提的蒸汽中的污染物，涵盖了每次操作18,000公斤的GAC。

## Reference product
- Remedied site: 200; missing unimportant

## Inputs
- Activated Carbon: 18000; missing unimportant

## Outputs
- Activated Carbon: 18000; missing unimportant

## Use advice
使用此数据集的用户应考虑颗粒活性炭使用的具体背景。应确保操作数据反映修复过程中实际更换的GAC量。用户还应考虑废气处理以及GAC生产和处置过程中相关的排放因子。根据评估范围，可能需要排除后续的GAC回收过程。

## Review details
清单： 内部审查通过几个迭代步骤完成，涉及原始数据验证、原始数据记录、代表性、完整性、与 ISO 14040 和 14044 有关的建模的一致性。

## Data sources
- Seung-Woo Jeong, Sangwon Suh. Assessment of Environmental Impacts and CO2 Emissions from Soil Remediation Technologies using Life Cycle Assessment - Case Studies on SVE and Biopile Systems -. 大韓環境工學會誌
