# 土壤和地下水修复;原位;地下水抽出处理;施工;催化氧化装置施工

Dataset: ILCD process, Unit process, single operation
Geography: JS-CN
Reference year: 2022
Classification: Other Services / Repair and maintenance
Generated by: 王宁, wang_ning@caep.org.cn
Owner: 天工LCI数据工作小组
Review: Dependent internal review by 天工LCI数据工作小组
Amounts: no units in this file; such an amount is in the reference unit of its flow, which a separate flow dataset defines
licenseType: Free of charge for all users and uses

## General comment
由铝和铁制成的催化氧化装置

## Geography
a closed pesticide manufacturing plant located in Jiangsu Province, China.

## Technical purpose
该数据集代表了位于中国江苏省一个已关闭的农药生产厂地点的地下水催化氧化装置施工阶段。该单位由铝和铁制成，用于通过抽取和处理过程处理受污染的地下水。

## Reference product
- Air stripping unit: 1; article inperiodical

## Inputs
- aluminium: 250; article inperiodical
- Steel sections: 250; article inperiodical

## Use advice
在使用该数据集进行生命周期评估时，请确保系统边界包括为构建催化氧化装置而提取和处理铝和铁。考虑装置的运行寿命和金属的潜在生命周期末期回收选项。该数据集特定于江苏省一个受污染站点的原位修复，可能无法直接应用于其他地区或原位修复过程，除非进行修改。

## Review details
清单： 内部审查通过几个迭代步骤完成，涉及原始数据验证、原始数据记录、代表性、完整性、与 ISO 14040 和 14044 有关的建模的一致性。

## Data sources
- Ding, D. et al. Assessing the environmental impacts and costs of biochar and monitored natural attenuation for groundwater heavily contaminated with volatile organic compounds. Science of The Total Environment 846, 157316 (2022).
