# 湿蒸法棉布染整加工;印染棉布;污水处理

Dataset: ILCD process, Unit process, single operation
Geography: SZ-JS-CN
Reference year: 2012
Classification: Unit processes / Materials production / Organic chemicals
Generated by: 段颖凡, 1300925579@qq.com
Owner: 天工LCI数据工作小组
Review: Dependent internal review by 天工LCI数据工作小组
Amounts: no units in this file; such an amount is in the reference unit of its flow, which a separate flow dataset defines
copyright: false
licenseType: Free of charge for all users and uses

## General comment
染整加工中产生的废水往往包含有机和无机污染物，如染料、助剂等。因此，对这些废水进行处理是非常重要的环保步骤。污水处理包括一系列物理、化学和生物处理方法，以去除或降低废水中的有害物质，确保处理后的水质符合环保标准，可以安全排放或循环使用。

## Geography
本研究选取江苏省某印染企业为重点调研对象，该企业位于长三角经济圈中的常熟。

## Technical purpose
湿蒸法棉布染整加工通常用于纺织工业中，对棉质材料进行着色和处理，以实现所需的纺织品属性。该工艺被应用于需要上色和整理的棉布，以达到用于服装、床上用品和装饰品等的特定质量标准。这一工业过程的特点在于其能够生产出色泽鲜艳、具有特定整理效果的纺织品，增强了面料的吸引力、耐用性和质感。

## Reference product
- freshwater: 20.7; input; measured

## Inputs
- Electricity: 1330; measured
- Crude coal: 1560; calculated
- Cleaned coal: 3860; calculated
- Fuel Oil: 33.3; calculated
- heavy fuel oil: 10; calculated
- Diesel oil: 45.8; calculated
- Coke Oven Gas: 61.1; calculated
- natural gas: 0.782; calculated

## Outputs
All rows: calculated
- carbon dioxide (fossil): 420
- carbon monoxide (fossil): 1.02
- sulfur dioxide: 0.38
- Nitrogen oxides: 1.92
- particles (> PM10): 3.51
- chemical oxygen demand: -212
- Suspended solids, unspecified,Suspended solids, unspecified: -13.7
- lead: 3.41e-5
- mercury: 7.16e-7
- fluorine: 6.44e-6
- cadmium: 1.26e-6
- arsenic: 2.92e-5

## Use advice
使用该数据集的用户应考虑与染整工艺相关的废水处理的环境影响。准确评估湿蒸法棉布染整加工的整体环境性能，关键在于要考虑废水排放处理。此外，在模拟棉布使用阶段时，应考虑棉布回收或降解利用作为生命周期评估的一部分。本数据具有特定的环境背景，主要与长三角等经济发达地区的纺织企业相关，因此在使用时应充分考虑地理和技术变异性。

## Review details
清单： 内部审查通过几个迭代步骤完成，涉及原始数据验证、原始数据记录、代表性、完整性、与 ISO 14040 和 14044 有关的建模的一致性。

## Data sources
- 朱亚楠. 棉布连续轧染工艺生命周期环境影响评价. (南京大学, 2012).
