# 熟料生产|熟料|高硫循环流化床还原分解磷石膏|磷石膏

Dataset: ILCD process, Unit process, black box
Geography: CN
Reference year: 2013
Classification: Materials production / Other mineralic materials
Generated by: 杨思琪
Amounts: no units in this file; such an amount is in the reference unit of its flow, which a separate flow dataset defines
copyright: false

## General comment
高硫煤循环流化床还原磷石膏制SO2和水泥熟料。磷石膏（云天化集团下属某化工厂，CaSO4的质量分数 为70.68％），高硫煤（选取云南镇雄县某煤矿，煤中硫的质量分数为2.87％）。
在流化床设备上的中试研究，考察反应温度、一次风量、二次风量和磷石膏处理量对烟气SO2浓度的影响，确定了磷石膏分解的最优条件：分解炉反应温度（1000±10）°C，一次风量220m3/h，无二次风，m（磷石膏）∶m（高硫煤）=10∶1。在此试验条件下，烟气中SO2体积分数最高达到8.18%，可以用于硫酸生产，磷石膏转化率达到90.39%，熟料中CaO质量分数达65%，分解率为95%。

## Model description
1kg水泥熟料作为功能单位；系统边界定义为水泥熟料的煅烧工艺，具体内容包括：原料的输入→不同的分解煅烧工艺→ 产物和废气的排出。

## Reference product
- clinker: 1000
  水泥熟料

## Inputs
- phosphogypsum: 2250
  磷石膏
- hard coal: 188.352
  高硫煤（选取云南镇雄县某煤矿，煤中硫的质量分数为2.87％）。原始数据为0.175kg标准煤，这里换算为硬煤，换算公式为1kg硬煤=0.929kg标准煤。

## Outputs
- carbon dioxide: 329
  CO2
- sulfur dioxide: 916
  SO2
- Nitrogen oxides: 7
  NOx
- carbon monoxide: 164
  CO

## Data sources
- 张杭, 马丽萍, 胡建红, 毛宇, 戴取秀, & 谢龙贵. (2013). 不同分解工艺下磷石膏分解制水泥熟料的LCA研究. 材料导报, 27(S1), 302–305.
