# 鸡蛋生产 | 饲料原料生产

Dataset: ILCD process, Unit process, single operation
Geography: HLJ-CN
Reference year: 2009
Classification: Materials production / Other mineralic materials
Functional unit: The main output product of laying hens is eggs, so the functional unit defined in this study is "1kg egg".
Generated by: 杨瑞, 1632707028@qq.com
Review: Dependent internal review by Tiangong LCI Data Working Group
Amounts: no units in this file; such an amount is in the reference unit of its flow, which a separate flow dataset defines
copyright: false

## General comment
蛋鸡的词料原料由玉米、 豆柏、 麸皮、 石粉等组成， 根据黑 龙 江省的实际情况， 玉米占 词料组成的60%~66% 豆柏占词料组成的20%~26% 又由于麸皮、 石粉生产的相关数据的 缺乏， 因此本文在词料原料组成上仅考虑玉米和豆柏。 词料原料生产阶段主要包括化肥的生 产阶段、 玉米和大豆的种植阶段和豆粕生产阶段。

## Geography
黑龙江省集约化蛋鸡场的生命周期评价

## Time period
黑龙江省玉米、大豆的在2009年的平均 单产量来自中国农业年鉴。

## Reference product
- egg: 1
  鸡蛋

## Inputs
- hard coal: 0.00903058; calculated

## Outputs
All rows: measured
- carbon monoxide: 1.0437e-5
- nitrogen, total (excluding N2): 0.000283551
- sulfur oxides: 0.000102912
- carbon dioxide: 0.0767573
- sulfur dioxide: 0.000383436

## Data selection and combination
本研究中玉米和大豆的种植期间化肥投入的相关数据取自高强等王伟等的资料， 基 本能代表目前黑龙江省玉米、大豆生产的实际情况。

## Review details
Inventory: The internal review was done by several iteration steps concerning raw data validation, raw data documentation, representativity, completeness and consistency of modelling with regard to ISO 14040 and 14044.; Documentation: The review of the documentation was performed by Ecobilan and is in compliance with ISO 14040 and 14044. The data set documentation is correct in view of the appropriateness of the information provided. It includes all relevant information in view of data quality and scope of application of the respective LCI result.

## Data sources
- 高雪. 黑龙江省集约化蛋鸡场的生命周期评价. (东北农业大学, 2012).
