# 熟料生产|熟料|传统回转窑|磷石膏

Dataset: ILCD process, Unit process, black box
Geography: SD-CN
Reference year: 2013
Classification: Materials production / Other mineralic materials
Generated by: 杨思琪
Amounts: no units in this file; such an amount is in the reference unit of its flow, which a separate flow dataset defines
copyright: false

## General comment
传统回转窑生产水泥熟料。
经检测得到回转窑的气体流量是32137~43251Nm3/h之间。

## Geography
鲁北化工集团股份有限公司下属某硫酸厂

## Model description
1kg水泥熟料作为功能单位；系统边界定义为水泥熟料的煅烧工艺，具体内容包括：原料的输入→不同的分解煅烧工艺→ 产物和废气的排出。

## Reference product
- clinker: 1000
  水泥熟料

## Inputs
- phosphogypsum: 2002; measured
  磷石膏
- hard coal: 558.599; measured
  标准煤。原始数据为0.519kg标准煤，这里换算为硬煤，换算公式为1kg硬煤=0.929kg标准煤。

## Outputs
- carbon dioxide: 1340; measured
  CO2
- sulfur dioxide: 975; measured
  SO2
- Nitrogen oxides: 0.9; measured
  NOx
- particles (> PM10): 0.76; measured
  粉尘。在水泥熟料生产这一环节，几乎不产生粉尘。未标明粒径，按PM>10处理。

## Sampling procedure
鲁北化工集团股份有限公司下属某硫酸厂定额实测值年产硫酸65kt/a和81kt/a水泥熟料的窑前窑后的数据。

## Data sources
- 张杭, 马丽萍, 胡建红, 毛宇, 戴取秀, & 谢龙贵. (2013). 不同分解工艺下磷石膏分解制水泥熟料的LCA研究. 材料导报, 27(S1), 302–305.
