# 水泥生产|水泥, 普通硅酸盐水泥, 42.5MPa|新型干法回转窑, 4000 t/d|混合固废

Dataset: ILCD process, Unit process, black box
Geography: BJ-CN
Classification: Materials production / Other mineralic materials
Generated by: 杨思琪
Amounts: no units in this file; such an amount is in the reference unit of its flow, which a separate flow dataset defines
copyright: false

## General comment
基于矿渣的水泥（Slag-based cement，SBC）。按照中国水泥标准（GB175-2007），SBC是一种普通硅酸盐水泥（Ordinary portland cement，OPC），由80-95%的硅酸盐水泥熟料和适量的石膏以及5-20%的高炉矿渣组成。
该工厂采用新的干法工艺和5级预热器旋转窑生产SBC。生产规模约为4000吨/天。高炉矿渣（Blast furnace slag，BFS）含量约为10％。
高炉矿渣是在高炉炉内与生铁同时产生的副产品，经过空气冷却和水淬两种方式进行处理。空气冷却矿渣通常用于低级应用，而水淬矿渣则可以与石膏一起磨细作为水泥生产中的胶凝材料。此外，将矿渣用作SBC中的外加剂可以提高技术性能，包括强度、渗透性和耐腐蚀性。

## Geography
北京现代水泥厂

## Model description
该功能单位被定义为42.5 MPa强度的1公斤水泥。
系统边界为水泥生产。

## Reference product
- cement, ordinary portland cement, 42.5MPa: 1000
  普通硅酸盐水泥，42.5MPa

## Inputs
All rows: measured
- blast furnace slag: 102
  高炉矿渣（BFS）
- sandstone: 70.2
  砂岩
- limestone, crushed, for mill: 1080
  石灰石
- dolomite: 0.000649
  白云石
- iron ore: 21.4
  铁矿
- ash: 2.96
  粉煤灰
- gypsum (desulphurized): 76.3
  石膏
- hard coal, run-of-mine: 137
  原煤
- crude oil; 42.3 MJ/kg: 0.0416
  原油

## Outputs
All rows: measured
- carbon dioxide: 744
  CO2排放：根据化石燃料和石灰石的消耗量，使用公式计算CO2排放，表达式如下：ECO2=3.67FQkα+mcx0.48x44/56。其中，ECO2是总CO2排放量（千克）；F和Q分别是化石燃料的燃烧量（千克）和热值（MJ/kg）；k是化石燃料的碳排放因子（kgC/MJ），对于煤而言，中国燃烧煤的平均值为24.74E-3kgC/MJ；α是碳燃烧的氧化率，取0.9；mc是石灰石的消耗量（千克）。
- sulfur dioxide: 0.239
  SO2排放：根据燃料中的硫含量、燃料的硫排放率以及调查工厂的相对脱硫情况，使用以下公式计算SO2排放：Eso2=2FSα（1-γ）。其中，Eso2是SO2排放量（kg）；F和S分别是燃料消耗量（kg）和燃料的硫含量（wt％）；α是燃料的SO2排放率，对于煤炭来说是1.74E-3；γ是脱硫率。由于中国水泥工业的脱硫技术仍处于研究阶段，尚未实际应用，因此假定y为零。
- Nitrogen oxides: 1.37
  NOx排放：根据化石燃料消耗量、NOx排放因子和受调查工厂的脱氮率，使用以下公式估算NOx排放：ENOx=0.001Fα（1-γ）。其中，ENOx是NOx排放量（kg）；F是燃料消耗量（kg）；α是燃料燃烧时的NOx排放因子（kg/t），煤燃烧时的NOx排放因子为9.95kg/t；γ是脱氮率。由于中国水泥厂的脱氮技术目前仍处于研究阶段，因此不考虑脱氮。
- carbon monoxide: 0.244
  CO。CO的排放量采用公式计算，表达式如下：E=FQα。其中，E是相对气体排放量（kg）；F和Q分别是化石燃料的消耗量（kg）和热值（MJ/kg）；α是气体排放因子（kg/TJ）。基于IPCC（2006）推荐的默认值，CO的气体排放因子为106kg/TJ。
- methane: 0.00184
  CH4。利用公式计算CH4的排放量，如下所示：E=FQα。其中E是相对气体排放量（千克），F和Q分别是化石燃料的消耗量（千克）和热值（MJ/kg），α是气体排放因子（千克/TJ）。根据IPCC（2006）推荐的默认值，CH4的气体排放因子为0.8kg/TJ。
- non-methane volatile organic compounds: 0.0575
  NMVOC。利用公式进行计算挥发性有机化合物（NMVOC）的排放量，表示如下：E=FQα。其中E为相对气体排放量（kg），F和Q分别为化石燃料的消耗量（kg）和热值（MJ/kg），α为气体排放因子（kg/TJ）。NMVOC的气体排放因子为25kg/TJ。

## Data selection and combination
水泥生产过程的环境数据是从北京现代水泥厂中调查和测量得出的。

## Data sources
- Yao Li et al. (2016). Environmental impact analysis of blast furnace slag applied to ordinary Portland cement production. Journal of Cleaner Production 120, 221–230 (2016).
