# 水泥生产|水泥, 普通硅酸盐水泥|硫酸渣

Dataset: ILCD process, Unit process, black box
Geography: JS-CN
Classification: Materials production / Other mineralic materials
Generated by: 杨思琪
Amounts: no units in this file; such an amount is in the reference unit of its flow, which a separate flow dataset defines
copyright: false

## General comment
普通硅酸盐水泥。水泥生产单元过程。

## Geography
江苏某水泥厂

## Model description
功能单位为 1t P·O 42.5 普通硅酸盐水泥。将普通硅酸盐水泥研究的系统边界确定为生料制备、熟料粉磨煅烧和水泥制备一直到最后的水泥储存为止，不包括水泥在使用阶段和废物回收阶段对环境的影响。

## Reference product
- cement, ordinary portland cement: 1000
  普通硅酸盐水泥

## Inputs
All rows: missing unimportant
- limestone, crushed, for mill: 1300
  石灰石
- sandstone: 300
  砂岩
- Sulfate slag: 20
  硫酸渣
- hard coal, run-of-mine: 190
  煤
- electricity, medium voltage: 370.296
  电

## Outputs
- carbon dioxide: 998.3; calculated
  CO2。水泥企业一般对于CO2的排放不做检测，故采用经验公式即锻烧水泥熟料时CO2的排放量=0.51+2.57×标准煤用量（t）。
- sulfur dioxide: 0.55; measured
  SO2。SO2、NOx和粉尘的排放数据需要监测获得。
- Nitrogen oxides: 0.843; measured
  NOx。SO2、NOx和粉尘的排放数据需要监测获得。
- particles (> PM10): 2.697; measured
  粉尘，未标明粒径，按PM>10处理。SO2、NOx和粉尘的排放数据需要监测获得。

## Data sources
- 张乐. (2009). 磷石膏基生态水泥的开发及其生命周期评价研究 [硕士, 华中科技大学].
