# 湿法制砂;砂石中碎;圆锥破碎技术

Dataset: ILCD process, Unit process, single operation
Geography: CS-HUN-CN
Reference year: 2020
Classification: Unit processes / Materials production / Other mineralic materials
Generated by: 崔航, Cuihang0716@163.com
Owner: 天工LCI数据工作小组
Review: Dependent internal review by 天工LCI数据工作小组
Amounts: no units in this file; such an amount is in the reference unit of its flow, which a separate flow dataset defines
copyright: false
licenseType: Free of charge for all users and uses

## General comment
二次破碎、筛分加工（圆锥破碎）

## Technology and included processes
鄂破后通过输送带运至圆锥破碎机进行第二次破碎，破碎后进入振动筛筛分，得到的1~2cm碎石通过输送带进入成品堆场，大于2cm的不合格产品重新回到圆锥破碎机进行破碎，制砂机进入制砂，其他部分 筛分后通过输送带送至制砂机进行制砂。

## Technical purpose
所述工业过程是建筑骨料生产链的一部分，主要用于建筑行业。湿法制砂过程包括砂石的二次破碎和加工，经过初级鄂破之后，使用圆锥破碎机进行次级破碎。该过程的终产品包括各种尺寸的碎石，通常用于混凝土搅拌、道路基础建设、铺路制造以及其他需要砂和砾石作为基础组成部分的建筑材料。

## Reference product
- gravel: 133333; measured
  中碎所产生的砂石

## Inputs
- gravel: 166667; measured
  中碎所投入的砂石
- Electricity: 1800; measured
  圆锥破碎机用电量

## Outputs
- Rolling gravel: 33333.3; measured
  中碎所产生的中骨料
- particles (> PM10),particles (> PM10): 16.667; measured
  生产过程中产生的粉尘颗粒

## Use advice
在使用该数据集进行生命周期评估时，应注意以下方法论建议：如果原材料和最终产品的运输在系统边界内占有重要地位，则确保将其纳入考虑。应用时包括建筑骨料的回收和再利用率。准确建模使用阶段，考虑不同碎石尺寸的特定终端用途。考量圆锥破碎和制砂过程的能耗和排放输出。最后，要考虑与该工业过程相关的任何上游或下游过程，这些可能会影响整体环境足迹。

## Review details
清单： 内部审查通过几个迭代步骤完成，涉及原始数据验证、原始数据记录、代表性、完整性、与 ISO 14040 和 14044 有关的建模的一致性。

## Data sources
- 年产 60 万吨机制砂建设项目环评报告
