# 土壤修复;异位修复;生物堆;工程实施;土壤调理

Dataset: ILCD process
Geography: KR
Classification: Other Services / Repair and maintenance
Generated by: 桑春晖, sangch@mail.bnu.edu.cn
Owner: 天工LCI数据工作小组
Review: Dependent internal review by 天工LCI数据工作小组
Amounts: no units in this file; such an amount is in the reference unit of its flow, which a separate flow dataset defines
licenseType: Free of charge for all users and uses

## General comment
向污染土壤中添加适量水分、营养和调节剂等，调节土壤含水率、pH和孔隙度等。

## Technical purpose
该土壤修复过程涉及异位生物堆处理，这是一种在地面上开挖并生物处理污染土壤的方法。过程包括通过添加适量的水分、营养和改良剂等来调理土壤，以调整土壤含水率、pH值和孔隙度，优化污染物的生物降解。

## Reference product
- pre-treatment soil: 3600; article inperiodical

## Inputs
- water: 67400; article inperiodical
- ammonium sulfate: 2708; article inperiodical
- Potassium sulphate: 558; article inperiodical
- Micro-organism: 4.777; article inperiodical

## Use advice
使用这些数据集的用户应考虑生物堆修复有效的具体条件。这包括污染物的类型、影响生物降解的当地气候条件以及修复的规模。应确保在生命周期清单中考虑了所有输入，例如水和营养物质。根据LCA研究的目标和范围，应清楚地记录最终处理已处理土壤的过程或从生物降解产生的排放的排除或包含。

## Review details
清单： 内部审查通过几个迭代步骤完成，涉及原始数据验证、原始数据记录、代表性、完整性、与 ISO 14040 和 14044 有关的建模的一致性。
