# 地下水修复;原位修复;可渗透反应墙;导水门建设

Dataset: ILCD process, Unit process, single operation
Geography: US
Reference year: 2011
Classification: Other Services / Repair and maintenance
Generated by: 张建宾, zhangjb@caep.org.cn
Owner: 天工LCI数据工作小组
Review: Dependent internal review by 天工LCI数据工作小组
Amounts: no units in this file; such an amount is in the reference unit of its flow, which a separate flow dataset defines
copyright: false
licenseType: Free of charge for all users and uses

## General comment
挖土后安装反应箱体，回填

## Geography
多佛空军基地

## Technology and included processes
4个直径为2.4米的圆柱型导水门

## Technical purpose
该数据集描述了一种工业地下水修复工艺，具体是位于多佛空军基地使用可渗透反应墙（PRBs）的原位处理和导水门建设。这项技术通常在环境工程中应用，用于控制和处理受污染的地下水，防止污染物的扩散，保护水资源。它涉及构建一个可渗透的障壁，地下水可以流过并通过物理、化学或生物过程进行处理。根据地下水中存在的污染物的类型和性质，选择障壁中的反应材料。

## Reference product
- Water diversion gate: 1; measured

## Inputs
- Steel sections: 37200; measured
- sand: 72100; measured
- soil: 21499; measured
- Primary energy: 731000; measured

## Use advice
使用此数据集的用户在将这些数据应用到类似的环境工程项目时，应考虑现场的具体地面条件、污染物类型及其浓度水平。在设计、建造和维护可渗透反应墙时，应仔细注意以确保其随时间的有效性。在模拟使用阶段时，需要考虑污染物配置文件和水文地质条件的潜在变化。不要将回收过程纳入此数据集，因为它仅关注PRBs的安装和初始功能。可能还需要与当地环境当局讨论，以确定特定于现场的指导方针和法规。

## Review details
清单： 内部审查通过几个迭代步骤完成，涉及原始数据验证、原始数据记录、代表性、完整性、与 ISO 14040 和 14044 有关的建模的一致性。

## Data sources
- Mark S. H. Mak and Irene M. C. Lo.Environmental Life Cycle Assessment of Permeable Reactive Barriers: Effects of Construction Methods, Reactive Materials and Groundwater Constituents[J].Environmental Science & Technology 2011, 45, 23, 10148-10154
