# 土壤修复;原位修复;生物强化修复;设备运行;生物培养基注射

Dataset: ILCD process, Unit process, single operation
Geography: SH-CN
Classification: Other Services / Repair and maintenance
Generated by: 肖萌, xiaomeng@mail
Owner: 天工LCI数据工作小组
Review: Dependent internal review by 天工LCI数据工作小组
Amounts: no units in this file; such an amount is in the reference unit of its flow, which a separate flow dataset defines
licenseType: Free of charge for all users and uses

## General comment
本数据集描述了土壤原位生物强化修复的工业过程，特别是在含氯挥发性有机化合物（CVOCs）污染场地治疗期间，用于注射生物培养基的设备操作。适用于旨在处理均匀污染含水层的环境工程项目，特别是与上海指定场地的条件相似的含水层，即表面积为20,000平方米、深度为50米的场地。

## Geography
The aquifer in a certain area in Shanghai, China, is uniformly contaminated with chlorinated volatile organic compounds (CVOCs), with a surface area of 20,000 m2 and a depth of 50 m, with the water table located at a depth of 30 m.

## Reference product
- Groundwater after biological Medium injection: 600000; measured
  注射生物培养基后的地下水

## Inputs
- Electricity: 1884.71; software or database

## Use advice
本数据集的用户应特别考虑在原位生物修复可行的修复项目中使用此过程。该技术是为深度和污染特征与上海站点所描述的类似的含水层而设计的。用户应确保与当地的水文地质条件相匹配。当将结果泛化到不同的环境条件或污染水平时，数据用户必须小心谨慎，并建议根据场地特定评估调整治疗参数，包括含水层特性和污染物浓度剖面。

## Review details
清单： 内部审查通过几个迭代步骤完成，涉及原始数据验证、原始数据记录、代表性、完整性、与 ISO 14040 和 14044 有关的建模的一致性。

## Data sources
- Ni, Z. et al. Comparative Life-Cycle Assessment of Aquifer Thermal Energy Storage Integrated with in Situ Bioremediation of Chlorinated Volatile Organic Compounds. Environ. Sci. Technol. 54, 3039–3049 (2020).
