# 玻璃生产 ;有机玻璃单体MMA生产;精馏过程

Dataset: ILCD process, Unit process, single operation
Geography: JX-CN
Classification: Materials production / Glass and ceramics
Generated by: 和夏夏, 18616148319@163.com
Owner: 天工LCI数据工作小组
Review: Dependent internal review by 天工LCI数据工作小组
Amounts: no units in this file; such an amount is in the reference unit of its flow, which a separate flow dataset defines
copyright: false
licenseType: Free of charge for all users and uses

## Reference product
- methyl methacrylate: 1015.48; measured
  MMA粗成品

## Inputs
- electricity mix: 335.52; measured
- methyl methacrylate: 997.998; measured
  MMA粗成品
- propionic acid: 17.479; measured
  精馏冷凝液

## Review details
清单： 内部审查通过几个迭代步骤完成，涉及原始数据验证、原始数据记录、代表性、完整性、与 ISO 14040 和 14044 有关的建模的一致性。

## Data sources
- 江西旺达新材料有限公司年产20000吨有机玻璃原料生产项目
