# 土壤修复;异位修复;水泥窑协同处置;准备阶段;生料制备;二氧化碳

Dataset: ILCD process, Unit process, black box
Geography: CN
Reference year: 2015
Classification: Unit processes / Other Services / Repair and maintenance
Generated by: 曹嘉萌, 2979480760@qq.com
Owner: 天工LCI数据工作小组
Review: Dependent internal review by 天工LCI数据工作小组
Amounts: no units in this file; such an amount is in the reference unit of its flow, which a separate flow dataset defines
copyright: false
licenseType: Free of charge for all users and uses

## General comment
水泥厂拥有一条4000t/d规模的现代化干法生产线，年生产水泥190万t，熟料150万t．公司自有矿山面积0.448km2，年生产石灰石能力200万t.生产工艺采用具有先进水平的RSP五级窑外分解技术．危险废物均采用汽车运输方式，配置危险品专用车辆，行车路线为货车专用线.矿山至厂区的运输距离约1.5km，废弃物的运输距离约50km．常规水泥的生产过程主要包括原辅材料的幵采及运输、生料制备、煤粉制备、熟料煅烧和水泥粉磨等阶段， 添加废弃物处置环节后， 废弃物（污染土壤、消化污泥、废油泥等）可以用作替代原料和替代燃料，以节省石灰石和煤炭等原材料。水泥窑协同处置，准备阶段，生料制备过程，主要包括石灰石、页岩等原辅料及工业废物（污染土壤、消化污泥和废催化剂等）的破碎、预均化、烘干及粉磨。

## Technical purpose
此工业过程涉及利用水泥窑进行土壤修复的异位修复和协同处置。它详细描述了一种外来修复程序，该程序包括利用污染土壤、消化污泥和废油泥等废弃物作为水泥生产原料的准备。这些废物作为替代原材料和替代燃料在生产过程中使用，提高了资源效率并减少了石灰石和煤等原材料的消耗。这个过程适用于一个拥有现代化干法生产线的水泥厂，该生产线生产水泥和熟料，并采用先进的窑外分解技术。这表明了一种可持续的水泥制造方法，同时也有助于废物管理和土壤修复工作。

## Reference product
- carbon dioxide (fossil): 51.1; measured

## Inputs
All rows: measured
- calcium carbonate: 1073.81
- shale: 1.23
- diatomite: 17.75
- Iron powder: 27.25
- Spent catalyst: 2.11
- contaminated soil: 5.26
- Digested Sludge,Digester sludge: 15.79
- Electricity: 63.648

## Use advice
在使用此数据集进行生命周期评估(LCA)时，用户应注意以下事项：验证数据对特定类型的水泥生产过程的适用性。确保LCA的范围包括使用废物作为替代资源的环境影响。注意提供的运输距离，因为它们对于确定相关排放至关重要。请注意，概述的输入和输出流不包括极少量的废气、废水或固废，如果这些对评估有关，应单独考虑它们。另外，由于提到了特定的方法技术（RSP五级窑技术），如果不针对技术差异进行调整，数据可能不会直接适用于其他水泥生产过程。

## Review details
清单： 内部审查通过几个迭代步骤完成，涉及原始数据验证、原始数据记录、代表性、完整性、与 ISO 14040 和 14044 有关的建模的一致性。

## Data sources
- 侯星宇,张芸,戚昱等.水泥窑协同处置工业废弃物的生命周期评价[J].环境科学学报,2015,35(12):4112-4119.
