# 天然气气藏开发 | 气藏储量丰富地质|多属性开发决策

Dataset: ILCD process, Unit process, single operation
Geography: SC-CN
Reference year: 2013
Classification: Materials production / Other mineralic materials
LCI method principle: Attributional
LCI method approaches: Consequential
Generated by: 康诗康, 908798159@qq.com
Review: Dependent internal review by Tiangong LCI Data Working Group
Amounts: no units in this file; such an amount is in the reference unit of its flow, which a separate flow dataset defines
copyright: false

## General comment
将多属性决策方法运用到天然气开发决策领域，构建了综合评价模型，通过模型分析及测算结果得知如何的开采序列会使效益最大化

## Geography
四川油气田是位于中国西南以四川盆地为中心的油气产区

## Time period
数据搜集时间

## Technology and included processes
以四川气田为研究对 象，从中选取的12个区块作为评价样本，依照第四章构建的指标体系和所阐述的评价方 法，对四川气田的勘探开发进行决策并作出最优的排序。

## Reference product
- natural gas: 0.8861; min 0.6362; max 0.8861; uniform; article inperiodical
  权重系数

## Data selection and combination
选取四川气田的12个区块即：新场蓬一、新场蓬二、新场沙溪庙、合兴场蓬莱 镇、合兴场须二、洛带蓬一、洛带蓬二、洛带蓬三、洛带蓬四、马井蓬莱镇、新都蓬莱 镇、东泰蓬莱镇，并用p={p1,p2,...p12}来表示。由第四章我们已经选取了8个指标作为评 价标准

## Data treatment and extrapolations
本文的重难点在于权重系数的确定，目前常用的有主观赋权法和客观赋权法两 种，但是两个方法都有其优点并存在一定的不足，为了弥补它们的不足本文采用最大离 差的组合赋权方法，将主观与客观权重综合起来确定属性的最终权重值。更具科学性。

## Review details
Inventory: The internal review was done by several iteration steps concerning raw data validation, raw data documentation, representativity, completeness and consistency of modelling with regard to ISO 14040 and 14044.; Documentation: The review of the documentation was performed by Ecobilan and is in compliance with ISO 14040 and 14044. The data set documentation is correct in view of the appropriateness of the information provided. It includes all relevant information in view of data quality and scope of application of the respective LCI result.

## Data sources
- 刘亚莉. 基于多属性决策的天然气气藏开发决策方法研究. (2012).
