# 预处理土壤;土壤异位修复;热脱附;土壤预处理;含大棚建设

Dataset: ILCD process, Unit process, black box
Geography: CN
Reference year: 2022
Classification: Unit processes / Other Services / Repair and maintenance
Generated by: 王枫, wangfeng@caep.org.cn
Owner: 天工LCI数据工作小组
Review: Dependent internal review by 天工LCI数据工作小组
Amounts: no units in this file; such an amount is in the reference unit of its flow, which a separate flow dataset defines
copyright: false
licenseType: Free of charge for all users and uses

## General comment
异位热脱附修复1立方米污染土，为防止气味逸散和二次污染，污染土壤需要在PVDF 膜材质的负压大棚内进行破碎、筛分、含水率调节等预处理工序

## Geography
我国华东区域5 个污染土壤异位热脱附修复工程案例

## Technical purpose
本工业过程应用于环境工程领域，用于修复污染土壤。具体而言，它指的是使用热脱附进行的土壤异位处理方法，以清洁污染土壤。该过程包括在具有PVDF膜材料的负压大棚内进行的破碎、筛分和含水率调节等预处理步骤。这确保了在修复过程中防止气味释放和二次污染。该方法适用于大规模土壤清理项目，特别是在中国东部地区，正如五个案例研究所示。

## Reference product
- Pre-treatment Soil: 1; measured

## Inputs
All rows: measured
- Diesel,Diesel: 0.00075
  基于我国华东区域 5 个污染土壤异位热脱附修复工程案例，得到异位热脱附修复 1 m3 污染土壤的平均能源和材料投入量
- Limestone: 6
- Steel: 0.13
- Polyvinylidene fluoride: 0.00108
  文中给出PVDF膜用量为0.0012 m2，根据填报人经验，PVDF膜密度约900 g/m2，因此此处填写0.0012*900=1.08 g。
- Concrete: 0.0054
- Electricity: 9.07
- Excavated soil,Excavated soil: 1

## Outputs
- Waste (solid): 50; measured

## Use advice
使用该生命周期评估数据的用户应考虑土壤修复过程的具体背景，包括材料特性和环境控制措施。在将数据应用于其他项目时，重要的是验证土壤类型和污染水平与中国东部地区五个案例研究中描述的是否相符。关注技术适用性，确保预处理条件相似，并使用具有PVDF膜的适当负压系统来控制气味和污染，因为不同的变化可能会导致不同的环境影响。

## Review details
清单： 内部审查通过几个迭代步骤完成，涉及原始数据验证、原始数据记录、代表性、完整性、与 ISO 14040 和 14044 有关的建模的一致性。

## Data sources
- 刘爽,陈盼,宋慧敏等.我国华东地区污染土壤异位热脱附修复碳排放及减排策略[J].环境工程学报,2022,16(08):2663-2671.
