# 水泥生产|水泥, 普通硅酸盐水泥, 42.5MPa|新型干法, 4000 t-cl/d|混合固废

Dataset: ILCD process, Unit process, black box
Geography: CN
Reference year: 2005
Classification: Materials production / Other mineralic materials
Generated by: 杨思琪
Amounts: no units in this file; such an amount is in the reference unit of its flow, which a separate flow dataset defines
copyright: false

## General comment
预分解窑干法水泥生产是新型干法的典型代表。我国日产4000t熟料的预分解窑新型干法水泥生产线的工艺流程。
来自矿山的石灰石由自卸卡车运入破碎机喂料仓，经破碎机和破碎机破碎，送入碎石库内存储，然后由裙板式喂料机、皮带输送机定量送往预均化堆场。粘土用自卸卡车输入或从工厂的粘土堆棚中用铲斗卸入粘土喂料仓，经喂料机喂入双辊破碎机破碎，经计量设备送入预配料的预均化堆场。石灰石和粘土在预配料均化堆场自动配合，并均化成均匀的混合原料。混合原料、石灰石及铁粉各自从堆场由皮带输送机送往生料磨的磨头喂料仓，经定量卸料、喂料送入烘干磨进行烘干与粉磨。烘干磨的热气体来自悬浮预热器排出的废气，启动时则借助热风炉供热风。
粉磨后的生料用气力提升泵送入两个连续性空气均化库进一步用空气搅拌均化生料和储存生料。均化库中的生料经卸料、计量、提升、定量喂入后由气力提升泵送至窑尾悬浮预热器和分解炉经预热和分解后的物料进入回转窑煅烧成熟料。回转窑和分解炉所用原煤经烘干兼粉磨后制成的煤粉并存储在煤粉仓中供给。熟料经蓖式冷却机冷却后由裙板输送机、计量称、斗式提升机分别送入熟料库中存储。
熟料、石膏经定量喂料机喂料送入水泥磨中粉磨。水泥磨带有选粉机构成所谓的圈流水泥磨粉磨时也可根据产品要求加入适量的混合材料和熟料、石膏一同粉磨。粉磨后的水泥经仓式空气输送泵送至水泥库中存储一部分水泥经包装机包装为袋装水泥用火车或卡车运输出厂另一部分由散装专用车散装出厂。

## Model description
以1千克28天抗压强度为42.5MPa的水泥所具有的使用性能为功能单位，即IFu=42.5kgMPa。
研究范围界定为：原料预处理一生料粉磨一生料煅烧一熟料粉磨一水泥均化一水泥储存。

## Reference product
- cement, ordinary portland cement, 42.5MPa: 1000
  42.5普通硅酸盐水泥

## Inputs
All rows: measured
- limestone, crushed, for mill: 1073.7
  石灰石
- gypsum (desulphurized): 51.1
  石膏
- ash: 98
  粉煤灰
- blast furnace slag: 137.6
  原文献是矿渣（即高炉矿渣）
- hard coal: 100.957
  标准煤。原始数据为0.0938kg标准煤，这里换算为硬煤，换算公式为1kg硬煤=0.929kg标准煤。
- electricity, medium voltage: 347.76
  电力

## Outputs
- particles (> PM10): 0.15; measured
  粉尘，未标明粒径，按PM>10处理。
- sulfur dioxide: 0.3501; measured
  二氧化硫。考虑到国内水泥厂运行的实际情况和未来很长时间的发展趋势，本次评价采用实测数据的统计平均值。
- Nitrogen oxides: 1.419; measured
  氮氧化物。考虑到国内水泥厂运行的实际情况和未来很长时间的发展趋势，本次评价采用实测数据的统计平均值。
- carbon dioxide: 807.3; measured
  二氧化碳。考虑到国内水泥厂运行的实际情况和未来很长时间的发展趋势，本次评价采用实测数据的统计平均值。

## Data sources
- 曹晓润. (2005). 低环境负荷型水泥的生态环境评价 [硕士, 武汉理工大学].
