# 水泥生产|水泥, 复合硅酸盐水泥|现代干法回转窑, 4000 t/d|混合固废

Dataset: ILCD process, Unit process, black box
Geography: CN
Classification: Materials production / Other mineralic materials
Generated by: 杨思琪
Amounts: no units in this file; such an amount is in the reference unit of its flow, which a separate flow dataset defines
copyright: false

## General comment
协同处置是在原料磨和窑尾位置添加废弃物作为替代原料和燃料的生产过程。以废白土、废催化剂及污染土壤等特定工业废弃物作为替代原料和燃料。
公司水泥生产线由立式原料磨、5级窑外分解炉、转窑和配有辊压机的大型球磨机（水泥磨）等主要设备组成，同时设有石灰石、石膏粉碎及输送添加等设备。该生产系统简称为“两磨一烧”系统，即原料磨、水泥磨和回转窑焚烧。

## Model description
系统边界为生料制备、煤粉制备、熟料煅烧、水泥粉磨。取1t 水泥产品为 1个功能单位。

## Reference product
- cement, portland-composite cement: 1000
  水泥

## Inputs
All rows: measured
- limestone, crushed, for mill: 1125.43
  石灰石
- shale: 1.23
  页岩
- silica stone: 17.75
  硅石
- iron, powder: 27.25
  铁粉
- gypsum (desulphurized): 52.15
  石膏
- ash: 124.24
  粉煤灰
- blast furnace slag: 203.78
  矿渣
- waste clay: 1.05
  废白土。工业废弃物。
- Coating slag: 0.16
  涂料渣。工业废弃物。
- refinery sludge: 5.26
  废油泥。工业废弃物。
- Catalyst waste: 2.11
  废催化剂。工业废弃物。
- soil, contaminated: 5.26
  污染土壤。工业废弃物。
- digester sludge: 15.79
  消化污泥。工业废弃物。
- hard coal, run-of-mine: 98.28
  煤炭
- electricity, medium voltage: 290.412
  电。电消耗单位为 kWh·t^-1，其中，原料开采、水泥磨粉阶段的电消耗以水泥计，生料制备、煤粉制备、熟料煅烧阶段以熟料计；其余资源与能源消耗、污染物排放均以水泥计。

## Outputs
All rows: measured
- carbon dioxide: 845.44
  CO2。CO2来自于石灰石煅烧和燃煤两部分，由于我国水泥企业一般未设CO2监测设备，因此，根据CO2排放公式计算得到其排放量。
- sulfur dioxide: 0.256
  SO2
- Nitrogen oxides: 0.9
  NOX
- carbon monoxide: 0.02522
  CO
- particles (> PM10): 0.5808
  粉尘（废气排放），未标明粒径，按PM>10处理。
- chloride: 2.723
  氯化物（废水）。废水主要是生产用水，排放数据来自企业监测值和Gabi数据库。
- sulfate: 0.351
  硫酸盐（废水）。废水主要是生产用水，排放数据来自企业监测值和Gabi数据库。
- blast furnace dust, for recovery: 657.39
  粉尘（固废回收）。固体废弃物主要是生产过程中产生的粉尘，经统一收集处理后回收再利用，其数据由企业实际监测得到。

## Data selection and combination
工业废弃物可替代部分煤，因此，采用热值和质量比例（即单位废弃物对应热值的煤与协同处置中物质投入总质量的比例）作为输入输出的数据分配依据，具体见式αp = W'p/（W'p + Wc + Wr）。式中，αp为废弃物在协同处置系统输入输出的分配比例；W'p为1t废弃物按热值比对应的煤质量（t）；Wc为 1t废弃物在熟料生产中需要添加的煤质量（t）； Wr为 1t 废弃物在熟料生产中需要添加的生料质量（t）。

## Data sources
- 侯星宇, 张芸, 戚昱, 蒋慧, 张琳, & 曲殿利. (2015). 水泥窑协同处置工业废弃物的生命周期评价. 环境科学学报, 35(12), 4112–4119.
