# 水泥生产|水泥, 通用硅酸盐水泥|新型干法

Dataset: ILCD process, Unit process, black box
Geography: CN
Reference year: 2011
Classification: Materials production / Other mineralic materials
Generated by: 杨思琪
Amounts: no units in this file; such an amount is in the reference unit of its flow, which a separate flow dataset defines
copyright: false

## General comment
新型干法生产通用硅酸盐水泥。2011年，新型干法水泥的比例已占到全国总量的89.0%，还处于上升期，所以基本可以代表全国的水平。

## Model description
研究只针对通用水泥，选取国内采用新型干法工艺生产1kg熟料含量为70%的通用水泥作为功能单位。

## Reference product
- cement, common portland cement: 1000
  通用水泥，孰料含量70%。

## Inputs
All rows: article inperiodical
- clinker, portland cement clinker, 52.5MPa: 700
  熟料52.5MPa。其中基准方案的产品投入数据以清洁生产指标体系的III级基准值为基础。
- electricity, medium voltage: 144
  电力。其中基准方案的产品投入数据以清洁生产指标体系的III级基准值为基础。
- hard coal, run-of-mine: 4.3
  原煤。其中基准方案的产品投入数据以清洁生产指标体系的III级基准值为基础。
- gypsum (desulphurized): 50
  石膏。其中基准方案的产品投入数据以清洁生产指标体系的III级基准值为基础。
- tap water: 2
  工业用自来水。其中基准方案的产品投入数据以清洁生产指标体系的III级基准值为基础。

## Outputs
- carbon dioxide: 8.7; article inperiodical
  二氧化碳。环境排放主要以排污系数手册、文献调查数据为主。
- chemical oxygen demand: 6e-5; article inperiodical
  化学需氧量。环境排放主要以排污系数手册、文献调查数据为主。

## Cut-off and completeness
数据不完整，只关注ECER政策目标相关的清单指标。

## Data selection and combination
调查国内水泥生产的相关文献，结合水泥行业清洁生产评价指标体系，以及排污系数手册，得到熟料生产、水泥研磨过程的清单数据。

## Data sources
- 何晓雪, 张璐, & 王洪涛. (2014). 基于生命周期节能减排评价方法的水泥行业清洁生产评价指标权重的计算. 化学工程与装备, 4, 208–211.
