# 铜基混合废料回收|粗铜|精炼工艺|黑铜

Dataset: ILCD process, Unit process, single operation
Geography: JX-CN
Reference year: 2020
Classification: Materials production / Other mineralic materials
Functional unit: We consider the functional unit of the recycling of copper-based mixed waste to be 1000 kg electrolytic copper.
LCI method principle: Attributional
LCI method approaches: Allocation - market value
Generated by: 王鹏, 2867919560@qq.com
Review: Dependent internal review by Tiangong LCI Data Working Group
Amounts: no units in this file; such an amount is in the reference unit of its flow, which a separate flow dataset defines
copyright: false

## Geography
典型案例是位于中国江西省的一家金属回收企业，

## Technology and included processes
精炼以冶炼过程中的黑铜为主要原料，以重油、煤为燃料，以氧气、石英砂等辅助材料生产阳极铜为主要产品（送电解工序） 。

## Reference product
- copper: 1200; measured
  Blister copper(98.50%)

## Inputs
All rows: measured
- Activated coke: 2.4
  Activated coke需要补充
- Anodes (used): 210
  Anodes (used)|
  Self-produced
- Black copper（90% Cu）: 1350
  Black copper|90%copper需要补充
- clay: 5.9
  Clay bricks
- Hard coal, at consumer EU-27: 23.8
  Hard coal
- heavy fuel oil: 85.5
  Heavy fuel oil (1.0wt.% S)
- magnesium: 5.9
  Magnesium powder
- oxygen: 0.3
  Oxygen (gaseous)
- quartz sand: 48.8
  Quartz sand(90%)
- Sodium silicate: 9.6
  Sodium silicate需要补充
- transport in t*km,transport in t*km: 13.0828
  Transport

## Outputs
All rows: measured
- mineral waste (ash): 31.9
  Ash |To zinc recovery
- particles (PM2.5 - PM10): 1.4
  Dust|需要补充
- Slag: 190.2
  Slag|To smelting
- mineral waste (ash): 0.1
  Ash|Emission into the air
- carbon dioxide: 151.7
  Emission into the air

## Deviations from the LCI method approaches
使用LCA-ReCiPe 2016（Heijungs et al., 2017）表征和归一化方法（中点和端点方法），将生命周期清单转换为多个领域的影响分数。

## Data selection and combination
前台数据和后台数据。

## Data treatment and extrapolations
采用GaBi 9.0软件计算各种铜基混合废物回收工艺单位质量的库存、资源消耗和废物排放量。

## Review details
Inventory: The internal review was done by several iteration steps concerning raw data validation, raw data documentation, representativity, completeness and consistency of modelling with regard to ISO 14040 and 14044.; Documentation: The review of the documentation was performed by Ecobilan and is in compliance with ISO 14040 and 14044. The data set documentation is correct in view of the appropriateness of the information provided. It includes all relevant information in view of data quality and scope of application of the respective LCI result.

## Data sources
- Zhang, W. et al. Analyzing the environmental impact of copper-based mixed waste recycling-a LCA case study in China. Journal of Cleaner Production 284, 125256 (2021).
