# 电池模块生产

Dataset: ILCD process, Unit process, black box
Geography: CN
Reference year: 2015
Classification: Materials production / Other mineralic materials
Functional unit: Therefore, to achieve the goals, 1 kWp of multi-crystalline silicon PV modules produced is used as the functional unit (FU)
LCI method principle: Attributional
LCI method approaches: Allocation
Generated by: 杨锦锋, yjfzfshn@163.com
Review: Dependent internal review by Tiangong LCI Data Working Group
Amounts: no units in this file; such an amount is in the reference unit of its flow, which a separate flow dataset defines
copyright: false

## General comment
多晶硅

## Geography
我们对中国与国际贸易相关的多晶硅光伏组件进行了生命周期环境评估。

## Time period
文章发表

## Reference product
- Solar Module: 1000; article inperiodical
  multi-crystalline silicon PV modules

## Inputs
All rows: article inperiodical
- silicon,silicon: 11.6
  Silicon
- bauxite: 59.6
  Bauxite
- Calcite: 46.2
- hard coal: 930
  Coal
- metallurgical coal: 83.6
  Crude oil
- gravel: 10.2
  Gravel
- iron: 76.5
  Iron
- Limestone: 12.1
- Natural gas: 4.18
- sodium chloride: 21.4
  Sodium chloride
- Water (fresh water): 36800
  Water
- silver: 0.106
  Silver

## Outputs
All rows: article inperiodical
- Coal ash: 113
- Slag: 31.5
  Slags
- industrial waste (unspecified): 64.4
  Industrial waste
- carbon dioxide: 1990
  二氧化碳
- methane: 9.78
  甲烷
- Nitrogen oxides: 6.85
  氮氧化物
- sulfur oxides: 1.85
  硫氧化物
- sulfate: 4.26
  Sulfate
- Biochemical Oxygen Demand: 0.691
  生物需氧量
- chemical oxygen demand: 0.731
  化学需氧量
- phosphate: 0.42
  Phosphate

## Deviations from the LCI method approaches
这项研究有两个主要目标:
评估环境影响，确定中国多晶硅光伏组件生命周期中的“热点”。
量化中国多晶硅光伏组件出口对环境影响的转变。

## Data selection and combination
通过对中国相关工厂的调查和环境影响评价报告，获得了硅矿开采、多晶硅制造、多晶硅芯片切割、光伏组件封装等方面的数据。从文献中获得了工业硅制造过程的数据。

## Review details
Inventory: The internal review was done by several iteration steps concerning raw data validation, raw data documentation, representativity, completeness and consistency of modelling with regard to ISO 14040 and 14044.; Documentation: The review of the documentation was performed by Ecobilan and is in compliance with ISO 14040 and 14044. The data set documentation is correct in view of the appropriateness of the information provided. It includes all relevant information in view of data quality and scope of application of the respective LCI result.

## Data sources
- Yang, D., Liu, J., Yang, J. & Ding, N. Life-cycle assessment of China’s multi-crystalline silicon photovoltaic modules considering international trade. Journal of Cleaner Production 94, 35–45 (2015).
