# 生料制备|生料

Dataset: ILCD process, Unit process, single operation
Geography: CS-HUN-CN
Classification: Materials production / Other mineralic materials
Generated by: 杨思琪
Amounts: no units in this file; such an amount is in the reference unit of its flow, which a separate flow dataset defines
copyright: false

## General comment
生料制备。石灰石、粘土和红土依次通过锤式破碎机和冲击式破碎机被粉碎成直径粒径低于20毫米的颗粒。接下来，所有的原材料，除了石膏以外，按照相应的比例放入原料磨中，随后被磨成一种叫做“生料”的混合物。生料在旋风分离器中在充满来自窑的高温气体的环境中干燥。在这个过程中，电力是主要的能源来源。
改性粒状铜渣（modified granulated copper slag，MGCS）制备是一个关键的阶段。原始的铜渣来自瑞典斯德哥尔摩的博利登矿物股份有限公司的冶炼厂。将其磨成颗粒直径小于0.60毫米的粒状铜渣（granulated copper slag，GCS）。CaO（99.9％纯）由长沙大诺建材有限公司供应。MGCS生产的步骤如下。GCS和CaO（20重量％）在加热温度升至约1550℃时被装入炉中，此时混合物完全熔化。然后采用水淬法形成MGCS。整个过程在氮气环境中进行，氮气流量为150毫升/分钟。这个过程在长沙矿冶研究院有限公司进行。生产出的MGCS最终被卡车运到以电力为主要能源的水泥厂。

## Geography
湖南省长沙市内某典型水泥厂

## Model description
功能单位（FU）被定义为具有42.9 MPa抗压强度的1千克混合水泥。

## Reference product
- raw meal: 1000
  生料

## Inputs
All rows: measured
- limestone, crushed, for mill: 941.658
  石灰石
- clay: 13.5107
  黏土
- laterite, mineral: 44.8311
  红土
- crude oil; 42.3 MJ/kg: 0.00103378
  原油
- electricity, medium voltage: 68.9048
  电

## Outputs
- particles (> PM10): 2.90686; measured
  PM，未标明粒径，按PM>10处理。
- carbon dioxide: 0.00190379; measured
  CO2
- carbon monoxide: 1.0747e-5; measured
  CO
- Nitrogen oxides: 1.8833e-5; measured
  NOX

## Deviations from the LCI method approaches
与背景系统相关的数据从Ecoinvent 3.1数据库中获得。

## Data selection and combination
前景系统的清单数据是直接从位于中国湖南省长沙市的水泥厂收集的。

## Data sources
- Qinli Zhang, Bingyi Zhang, & Daolin Wang. (2022). Environmental Benefit Assessment of Blended Cement with Modified Granulated Copper Slag. MATERIALS, 15(15).
