# Sediment Remediation;In-situ Remediation;Activated Carbon Remediation;Activated carbon seeding

Dataset: ILCD process, Unit process, single operation
Geography: US
Classification: Other Services / Repair and maintenance
Generated by: 王宁, wang_ning@caep.org.cn
Owner: 天工LCI数据工作小组
Review: Dependent internal review by 天工LCI数据工作小组
Amounts: no units in this file; such an amount is in the reference unit of its flow, which a separate flow dataset defines
licenseType: Free of charge for all users and uses

## General comment
该工艺描述的是活性炭修复应用。它专门用于原位的沉积物修复。通过播种、撒布和混合活性炭到受污染的沉积物中，该方法用于吸附污染物以实现环境恢复目的。

## Reference product
- Activated Carbon: 5500; input; article inperiodical

## Use advice
在使用该数据集进行原位沉积物修复的生命周期评估时，请注意活性炭的来源和受污染场地的具体条件，例如污染物的类型和浓度。考虑活性炭的有效使用寿命和再生或更换频率。确保评估包括活性炭生产和运输到修复现场的潜在环境影响。

## Review details
清单： 内部审查通过几个迭代步骤完成，涉及原始数据验证、原始数据记录、代表性、完整性、与 ISO 14040 和 14044 有关的建模的一致性。
