# 土壤修复;异位修复;生物堆;工程实施;堆体养护

Dataset: ILCD process
Geography: KR
Classification: Other Services / Repair and maintenance
Generated by: 桑春晖, sangch@mail.bnu.edu.cn
Owner: 天工LCI数据工作小组
Review: Dependent internal review by 天工LCI数据工作小组
Amounts: no units in this file; such an amount is in the reference unit of its flow, which a separate flow dataset defines
licenseType: Free of charge for all users and uses

## General comment
采用强制通风为系统514天不间断泵入氧气

## Technical purpose
这种土壤修复过程涉及采用生物堆的异位治疗，旨在工程化实施和维护那些需要通过强制通风连续供氧514天的处理系统。它适用于关注污染土壤生物修复的环境恢复项目。

## Reference product
- clean soil: 1000; article inperiodical

## Inputs
- Electricity: 229320; article inperiodical

## Use advice
数据集使用者必须确保所参考的土壤修复过程适用于评估中的特定土壤污染情景。应注意为期514天的堆体构建、养护和加氧方法。用户在应用此数据时应考虑当地的环境条件、污染物类型和浓度。根据研究目标，应对土壤再循环或处置的排除或包括进行合理化。

## Review details
清单： 内部审查通过几个迭代步骤完成，涉及原始数据验证、原始数据记录、代表性、完整性、与 ISO 14040 和 14044 有关的建模的一致性。
