# 水泥研磨|水泥, 替代成分 21-35%|立窑

Dataset: ILCD process, Unit process, single operation
Geography: CN
Classification: Materials production / Other mineralic materials
Generated by: 杨思琪
Amounts: no units in this file; such an amount is in the reference unit of its flow, which a separate flow dataset defines
copyright: false

## General comment
水泥磨系统将水泥窑产生的熟料与石膏及其他添加剂混合后磨成一定粒度的细粉，这是水泥的最终产品。该阶段完全由物理过程组成，没有涉及任何化学过程。

## Model description
系统边界为产生水泥的研磨阶段。

## Reference product
- cement, alternative constituents 6-20%: 1000
  水泥

## Inputs
- clinker: 867.679; measured
  水泥熟料
- mixed materials, mineral: 91.829; measured
  混合材料
- gypsum (desulphurized): 46.276; measured
  石膏
- Water (fresh water): 15.184; measured
  水（水含量）：输入材料中的水。

## Outputs
- particles (> PM10): 5.785; measured
  灰尘，未标明粒径，按PM>10处理。
- wastewater, unpolluted: 15.184; measured
  水

## Sampling procedure
经调查，采用立窑生产系统的水泥企业的年产能为100,000吨熟料。立窑生产线的总体特点是能耗高，生产能力有限，劳动生产率低，粉尘排放量大。立窑生产线的动态代谢分析是在正常生产水平下以1小时为单位进行的。

## Data sources
- Dan Hu, Zhen Guo, Zhen Wang, & Qiang Xiao. (2015). Metabolism analysis and eco-environmental impact assessment of two typical cement production systems in Chinese enterprises. Ecological Informatics 26, 70–77.
