# 水泥生产|水泥, 普通硅酸盐水泥, 42.5MPa|新型干法回转窑, 焚烧城市生活垃圾|粉煤灰

Dataset: ILCD process, Unit process, black box
Geography: CN
Reference year: 2008
Classification: Materials production / Other mineralic materials
Generated by: 杨思琪
Amounts: no units in this file; such an amount is in the reference unit of its flow, which a separate flow dataset defines
copyright: false

## General comment
实验室数据。城市生活垃圾作为二次燃料生产水泥。

## Model description
以1kg28天抗压强度为42.5MPa的水泥所具有的使用性能作为功能单位，即1Fu=42.5kgMPa。评价范围为生料准备、熟料煅烧和水泥制备。粘土类资源消耗造成的环境负荷暂不考虑。铁粉属于铁质校正材料，其引发的环境影响不予考虑。产品系统输出端考虑排放的废弃物主要包括氮氧化物、二氧化硫、二氧化碳及粉尘。

## Reference product
- cement, ordinary portland cement, 42.5MPa: 1000
  42.5普通硅酸盐水泥

## Inputs
- limestone, crushed, for mill: 1104.4
  石灰石
- gypsum (desulphurized): 58.7
  石膏
- ash: 362.4
  粉煤灰
- hard coal: 70.731
  标准煤。原始数据为0.065717kg标准煤，这里换算为硬煤，换算公式为1kg硬煤=0.929kg标准煤。
- electricity, medium voltage: 343.8
  电力

## Outputs
- particles (> PM10): 0.324
  粉尘，未标明粒径，按PM>10处理。
- sulfur dioxide: 0.3893
  二氧化硫
- Nitrogen oxides: 1.557
  氮氧化物
- carbon dioxide: 747.22
  二氧化碳

## Data selection and combination
结合对我国城市生活垃圾工业分析及热值分析，对所确定产品系统的输入、输出数据进行收集，并对数据进行了计算、量化。

## Data sources
- 于淼. (2008). 黑龙江水泥工业可持续发展研究 [硕士, 哈尔滨工业大学].
