# 地下水修复;原位修复;水泥液浆垂直阻隔;施工准备;材料运输

Dataset: ILCD process, Unit process, single operation
Geography: US
Classification: Other Services / Repair and maintenance
Generated by: 肖萌, xiaomeng@mail
Owner: 天工LCI数据工作小组
Review: Dependent internal review by 天工LCI数据工作小组
Amounts: no units in this file; such an amount is in the reference unit of its flow, which a separate flow dataset defines
licenseType: Free of charge for all users and uses

## General comment
该数据集描述了原位修复过程，特别是水泥浆料垂直阻隔墙的建设，用于隔离和封闭污染土壤和地下水。这种修复技术适用于需要土壤注浆以阻止危险物质（如放射性物质）扩散的情况，例如布鲁克黑文国家实验室（BNL）这样的前工业场所，由于历史污染需要进行隔离。

## Geography
For this project, a Superfund location at the Brookhaven National Laboratory (BNL) is studied. This particular case was chosen because it is representative of the scale and scenario where soil grouting would be used. It is also one of only a few sites where CS grouting has been used for full scale remediation. BNL has served as a production facility for research and development of radioisotopes for decades. The design of some of the facilities failed to provide adequate safety measures against the spread of radioactivity to the soils and groundwater beneath them and as a result, BNL was added to the Superfund National Priorities List in 1989.

## Reference product
- Equipment and Materials Arriving on Site: 37510; measured
  运输到场的相关材料（石灰石、混凝土、黏土和石膏）

## Inputs
- transport in t*km: 1139.31; software or database

## Use advice
在利用此数据集进行生命周期评估时，用户必须考虑石灰石、混凝土、砂子和石膏等材料的来源和运输距离。为了准确反映，应考虑布鲁克黑文国家实验室Superfund地点的特定条件，包括项目规模和修复情景。用户应当考虑区域实践中的方法学差异，并确保数据的技术适用性（包括设备和施工准备过程）符合其具体项目需求。

## Review details
清单： 内部审查通过几个迭代步骤完成，涉及原始数据验证、原始数据记录、代表性、完整性、与 ISO 14040 和 14044 有关的建模的一致性。

## Data sources
- Gallagher, P. M., Spatari, S. & Cucura, J. Hybrid life cycle assessment comparison of colloidal silica and cement grouted soil barrier remediation technologies. Journal of Hazardous Materials 250–251, 421–430 (2013).
