# 干法制砂;砂石粗碎;颚式破碎技术

Dataset: ILCD process, Unit process, single operation
Geography: HAIN-CN
Reference year: 2020
Classification: Unit processes / Materials production / Other mineralic materials
Generated by: 崔航, Cuihang0716@163.com
Owner: 天工LCI数据工作小组
Review: Dependent internal review by 天工LCI数据工作小组
Amounts: no units in this file; such an amount is in the reference unit of its flow, which a separate flow dataset defines
copyright: false
licenseType: Free of charge for all users and uses

## General comment
一次破碎（颚式破碎）和筛分

## Technology and included processes
先给料，然后颚式破碎机破碎，破碎后进入振动筛筛分，得到的碎石通过输送带进入成品堆场。其他部分筛后通过输送带送至圆锥破碎机（二次破碎）

## Technical purpose
所述颚式破碎技术用于干法制砂生产过程中的初级破碎。在此背景下，该过程主要用于生产用于建筑和建材的砂石骨料。该过程产生的骨料为混凝土、沥青及其他建筑相关应用提供基础材料。

## Reference product
- gravel: 41870; measured

## Inputs
- gravel: 51370; measured
- Electricity: 396; measured

## Outputs
- sand: 8373; measured
  经粗碎后产生的碎石
- Sludge: 790; measured
- particles (> PM10),particles (> PM10): 4; measured

## Data selection and combination
干法制砂的工艺过程及清单数据来自于该项目提供的经验数据

## Use advice
使用提供的过程数据时，确保在生命周期评估模型中准确地表示初级破碎和筛选阶段。考虑颚式破碎机的效率和输出尺寸可能的变化，将这些数据纳入清单分析时。考虑生产骨料的下游使用（即，运输至施工现场，纳入建筑材料）和潜在的二次破碎过程。提供的经验数据应考虑其来源的地理和技术背景，以确保相关性和准确性。

## Review details
清单： 内部审查通过几个迭代步骤完成，涉及原始数据验证、原始数据记录、代表性、完整性、与 ISO 14040 和 14044 有关的建模的一致性。

## Data sources
- 陵水海岛混凝土有限公司干法制砂项目
