# 牛奶生产 | 奶牛饲养 | 种养一体化奶牛场(IPBS)

Dataset: ILCD process, Unit process, single operation
Geography: QD-SD-CN
Reference year: 2016
Classification: Materials production / Other mineralic materials
Functional unit: The 1t FPCM corrected for protein and fat content was selected as the evaluation unit
Generated by: 杨瑞, 1632707028@qq.com
Review: Dependent internal review by Tiangong LCI Data Working Group
Amounts: no units in this file; such an amount is in the reference unit of its flow, which a separate flow dataset defines
copyright: false

## General comment
在 IPBS 中,养殖 场部分青贮玉米饲料来源于自产,所调研养殖场中, 有 3 家养殖场的青贮玉米自给率达 100%.除青贮玉 米外,2 种模式的饲养过程相同,生产资料的投入主 要有饲料、水、电、柴油等,产品有牛奶、公犊牛、 淘汰母牛、肉用牛等(表 4).具体来说,奶牛饲料主要 有浓缩饲料(含 30%的豆粕、50%的玉米粒、10%的 麦麸和 10%的其他物质)、玉米粒、麦麸、青贮玉米、 棉籽、燕麦、苜蓿和羊草等.个别奶牛场还伴随用酒 糟和菜籽粕,但其用量少对整体环境影响可忽略不 计.浓缩饲料中的其他物质用量少对整体环境影响 可忽略不计.奶牛饲养环节的温室气体排放包括外购饲料在其生产过程中的排放、养殖场能源消耗的 排放(如养殖场内饲料加工、牛舍照明和通风、水 加 热、牛奶冷藏等)和奶牛肠道气体排放及牛舍气体排 放.

## Geography
于 2020 年 7 月~8 月在山东省青岛市进行奶牛 场问卷调查.

## Time period
从 2016 年,山东开始实施青贮玉米种植补贴 政策,是国内最早实施该补贴政策的省份之一,补贴 标准为 20~50 元/t.2019 年,山东省青贮玉米种植面 积达 1.41 万 hm2,占全国的 7.3%.

## Reference product
- milk: 1000
  FPCM（IPBS模式）

## Inputs
All rows: measured
- cow: 0.1111
  泌乳牛（IPBS模式）
- cow: 0.025
  干泌乳牛（IPBS模式）
- cow: 0.072
  育成牛（IPBS模式）
- cow: 0.032
  犊牛（IPBS模式）
- feed: 228
  浓缩饲料（IPBS模式）
- maize: 111
  玉米粒（IPBS模式）
- bean pulp: 51
  豆粕（IPBS模式）
- wheat bran: 43
  麦麸（IPBS模式）
- maize: 682
  外购青贮玉米（IPBS模式）
- maize: 318
  自产青贮玉米（IPBS模式）
- alfalfa: 108
  苜蓿（IPBS模式）
- oat: 115
  燕麦（IPBS模式）
- chinese wildrye: 290
  羊草（IPBS模式）
- cottonseed: 38
  棉籽（IPBS模式）
- Electricity: 397.595
  IPBS模式
- Diesel: 0.002183
  IPBS模式
- water: 10.2
  IPBS模式
- Land Occupation: 13.975
  土地占用（IPBS模式）

## Outputs
- cow: 0.798; measured
  销售公犊牛（IPBS模式）
- cow: 11.445; measured
  销售淘汰母牛（IPBS模式）
- beef: 2.209; measured
  销售肉用牛（IPBS模式）

## Review details
Inventory: The internal review was done by several iteration steps concerning raw data validation, raw data documentation, representativity, completeness and consistency of modelling with regard to ISO 14040 and 14044.; Documentation: The review of the documentation was performed by Ecobilan and is in compliance with ISO 14040 and 14044. The data set documentation is correct in view of the appropriateness of the information provided. It includes all relevant information in view of data quality and scope of application of the respective LCI result.

## Data sources
- 黄显雷, 师博扬, 张英楠, 龙昭宇, & 尹昌斌. 基于生命周期视角的种养一体化奶牛场环境经济效益评估. 中国环境科学 41, 3944–3955 (2021).
