# 水泥生产|水泥, 硅酸盐水泥|新型悬浮预热器

Dataset: ILCD process, Unit process, single operation
Geography: CN
Classification: Materials production / Other mineralic materials
Generated by: 杨思琪
Amounts: no units in this file; such an amount is in the reference unit of its flow, which a separate flow dataset defines
copyright: false

## General comment
在新型悬浮预热器（New suspension preheater，NSP）窑的水泥磨粉阶段，熟料、石膏和其他混合材料被一起磨成特定大小的颗粒，形成最终产品——水泥。与立窑相比，NSP窑中的熟料主要来自“连续烧结和磨碎”阶段（100吨/小时），只有极少部分来自前一生产阶段的熟料储存（2吨/小时）。因此，总熟料量为102吨/小时。NSP窑的输入不含水。
NSP窑是一个高效、生产连续性好、产量高、总体能源消耗低的生产系统。此外，通过更好的除尘和降噪设备，NSP窑的生产系统可以大大减少资源消耗和污染物排放。

## Model description
系统边界为产生水泥的研磨阶段。

## Reference product
- cement, common portland cement: 1000
  水泥

## Inputs
- clinker: 850.78; measured
  水泥熟料
- mixed materials, mineral: 100.092; measured
  混合材料
- gypsum (desulphurized): 50.046; measured
  石膏

## Outputs
- particles (> PM10): 1.001; measured
  灰尘，未标明粒径，按PM>10处理。

## Data sources
- Dan Hu, Zhen Guo, Zhen Wang, & Qiang Xiao. (2015). Metabolism analysis and eco-environmental impact assessment of two typical cement production systems in Chinese enterprises. Ecological Informatics 26, 70–77.
