# 玻璃生产 ;有机玻璃单体MMA生产;干式破碎

Dataset: ILCD process, Unit process, single operation
Geography: JX-CN
Classification: Materials production / Glass and ceramics
Generated by: 和夏夏, 18616148319@163.com
Owner: 天工LCI数据工作小组
Review: Dependent internal review by 天工LCI数据工作小组
Amounts: no units in this file; such an amount is in the reference unit of its flow, which a separate flow dataset defines
copyright: false
licenseType: Free of charge for all users and uses

## Reference product
- polymethyl methacrylate (PMMA) beads: 1098.25; measured

## Inputs
- electricity mix: 349.92; measured
- polymethyl methacrylate (PMMA) beads: 1043.73; measured
- Water (fresh water): 21.9735; measured
- organic waste (unspecified): 32.96; measured

## Outputs
- Dust (unspecified, from stack): 0.412; measured

## Review details
清单： 内部审查通过几个迭代步骤完成，涉及原始数据验证、原始数据记录、代表性、完整性、与 ISO 14040 和 14044 有关的建模的一致性。

## Data sources
- 江西旺达新材料有限公司年产20000吨有机玻璃原料生产项目
