# 土壤修复;原位修复;生物强化修复;设备运行;监测

Dataset: ILCD process, Unit process, single operation
Geography: SH-CN
Classification: Other Services / Repair and maintenance
Generated by: 肖萌, xiaomeng@mail
Owner: 天工LCI数据工作小组
Review: Dependent internal review by 天工LCI数据工作小组
Amounts: no units in this file; such an amount is in the reference unit of its flow, which a separate flow dataset defines
licenseType: Free of charge for all users and uses

## General comment
该数据集代表了原位生物强化修复（ISB）用于土壤修复的使用情况，特别是针对含有氯挥发性有机化合物（CVOCs）的含水层污染。它涵盖了修复过程中专业设备的操作和现场监测工作。该过程尤其适用于处理含氯挥发性有机化合物（CVOCs）的大面积和显著土壤深度的环境修复项目。

## Geography
The aquifer in a certain area in Shanghai, China, is uniformly contaminated with chlorinated volatile organic compounds (CVOCs), with a surface area of 20,000 m2 and a depth of 50 m, with the water table located at a depth of 30 m.

## Reference product
- Monitored groundwater: 600000; measured
  监测完成的地下水

## Inputs
- Electricity: 18617; software or database

## Use advice
使用此数据集时，确保参数与特定场地条件（如污染规模和含水层深度）一致。应该包括对设备操作和监测协议的本地监管要求的考虑。用户应考虑数据集源始地（中国上海）和应用现场之间在地质和水文地质方面的可能变异。地下水位深度、CVOCs分布均匀性以及现场特有的环境因素可能会影响数据的适用性。

## Review details
清单： 内部审查通过几个迭代步骤完成，涉及原始数据验证、原始数据记录、代表性、完整性、与 ISO 14040 和 14044 有关的建模的一致性。

## Data sources
- Ni, Z. et al. Comparative Life-Cycle Assessment of Aquifer Thermal Energy Storage Integrated with in Situ Bioremediation of Chlorinated Volatile Organic Compounds. Environ. Sci. Technol. 54, 3039–3049 (2020).
