# 丙烯生产 | 丙烯 | 催化裂化路线 | 石脑油

Dataset: ILCD process, Unit process, black box
Geography: ZJ-GD-CN
Reference year: 2018
Classification: Materials production / Other mineralic materials
Functional unit: A functional unit is defined as 1 ton of propylene product
LCI method principle: Attributional
LCI method approaches: Allocation - mass
Generated by: 任亚楠, renyn15@tsinghua.org.cn
Review: Dependent internal review by Tiangong LCI Data Working Group
Amounts: no units in this file; such an amount is in the reference unit of its flow, which a separate flow dataset defines
copyright: false

## General comment
催化裂化工艺路线主要包括催化裂化和气体分馏两个过程。前者包括反应-再生、能量回收、分馏、吸收稳定、脱硝、脱硫、除尘等子过程，后者包括脱丙烷、脱乙烷、丙烯精制。催化裂化路线的主要投入包括原料(即重油和加氢柴油)、能源(即电力、淡水和蒸汽)以及催化剂氧化铝等辅料。按重量计算，丙烯占产量的33%，副产品为乙烷和丙烷、C4和C5馏分以及LPG。值得主要的是，焦炭燃烧产生的蒸汽副产品，输送到目标工厂外进行使用。此过程补偿了原料生产、能源消耗时造成的环境影响，降低了环境负担。

## Geography
催化裂化路线的案例工厂来自中国石化湛江东兴石油化工有限公司。企业位于广东省湛江市，其催化裂化制烯烃工艺建于2018年，丙烯年产能11.6万吨。

## Time period
工艺建于2018年

## Technology and included processes
工厂为炼化一体化体制，因此原材料(重油、加氢柴油)作为中间产品，不考虑运输阶段。

## Reference product
- propene (propylene): 1000; measured
  丙烯

## Inputs
All rows: measured
- heavy fuel oil: 12940
  重油
- diesel: 4310
  加氢柴油
- Aluminum oxide (alumina): 20
  催化剂
- Trisodium Phosphate: 0.02226
  磷酸三钠
- nitrogen: 20.67
  氮气
- compressed air: 0.43488
  压缩空气
- process steam: -6380
  蒸汽
- Water (fresh water): 9710
  新鲜水
- electricity mix: 348.768
  电

## Outputs
All rows: measured
- Refinery Gas: 530
  炼厂干气
- gasoline (regular): 7520
  汽油
- diesel: 4310
  催化柴油
- Slurry oil: 600
  油浆
- Ethane: 370
  乙烷
- C4 Hydrocarbon Mixture: 1650
  C4+
- carbon dioxide: 4160
  CO2
- sulfur dioxide: 0.20294
  SO2
- nitrous oxide: 0.28992
  NOx
- Dust (unspecified, from stack): 0.1837
  颗粒物
- volatile organic compound: 0.53704
  VOCs
- ammonia: 0.00081
  氨氮
- chemical oxygen demand: 0.02954
  COD

## Deviations from the LCI method approaches
采用质量分配法量化产品丙烯和副产品之间的环境负荷

## Data selection and combination
丙烯生产工艺详细的投入产出数据来自企业公开的环境影响评价报告，包括原料和辅料投入、能源和资源消耗，以及废气、废水和固体废物的排放。

## Review details
Inventory: The internal review was done by several iteration steps concerning raw data validation, raw data documentation, representativity, completeness and consistency of modelling with regard to ISO 14040 and 14044.; Documentation: The review of the documentation was performed by Ecobilan and is in compliance with ISO 14040 and 14044. The data set documentation is correct in view of the appropriateness of the information provided. It includes all relevant information in view of data quality and scope of application of the respective LCI result.

## Data sources
- 吕琳. 丙烯产品环境负荷及温室气体减排的碳税政策. (大连理工大学, 2022).
