# 地下水修复;原位修复;水泥液浆垂直阻隔;施工准备;水泥制备

Dataset: ILCD process, Unit process, single operation
Geography: US
Classification: Other Services / Repair and maintenance
Generated by: 肖萌, xiaomeng@mail
Owner: 天工LCI数据工作小组
Review: Dependent internal review by 天工LCI数据工作小组
Amounts: no units in this file; such an amount is in the reference unit of its flow, which a separate flow dataset defines
licenseType: Free of charge for all users and uses

## General comment
所述工业过程用于地下水修复，具体是使用水泥浆料垂直阻隔作为现场土壤灌浆技术的一部分，在超级基金会地点应用。该过程适用于包含及防止受影响土壤中的污染物（如放射性物质）进一步扩散到地下水中。这一流程特别适用于历史上处理放射性同位素而未采取足够安全保护措施的研究设施或生产场所，这些场所导致了污染。

## Geography
For this project, a Superfund location at the Brookhaven National Laboratory (BNL) is studied. This particular case was chosen because it is representative of the scale and scenario where soil grouting would be used. It is also one of only a few sites where CS grouting has been used for full scale remediation. BNL has served as a production facility for research and development of radioisotopes for decades. The design of some of the facilities failed to provide adequate safety measures against the spread of radioactivity to the soils and groundwater beneath them and as a result, BNL was added to the Superfund National Priorities List in 1989.

## Reference product
- cement: 22970; measured

## Inputs
All rows: measured
- Limestone: 32388
- clay: 3192.8
- sand: 780.98
- Gypsum: 1148.5
- Iron ore (Domestic): 344.55
  Iron ore（铁矿石）
- Coal: 2917.2
- Light fuel oil: 390.49
- natural gas: 436.34
- Electricity: 9344.16

## Use advice
在使用此数据集进行环境影响评估或修复项目决策时，考虑修复现场的具体情况至关重要，如污染规模和污染物的性质（例如，放射性）。这些数据应与土壤和地下水质量的地方规章标准一起使用。用户还应确保选择的水泥准备方法和水泥浆料垂直阻隔屏障的部署与现场条件和修复项目期望的结果相兼容。

## Review details
清单： 内部审查通过几个迭代步骤完成，涉及原始数据验证、原始数据记录、代表性、完整性、与 ISO 14040 和 14044 有关的建模的一致性。

## Data sources
- Gallagher, P. M., Spatari, S. & Cucura, J. Hybrid life cycle assessment comparison of colloidal silica and cement grouted soil barrier remediation technologies. Journal of Hazardous Materials 250–251, 421–430 (2013).
