# 土壤和地下水修复;原位;地下水抽出处理;到达现场的设备和材料

Dataset: ILCD process, Unit process, single operation
Geography: DK
Reference year: 2021
Classification: Other Services / Engineering and consulting
Generated by: 王宁, wang_ning@caep.org.cn
Owner: 天工LCI数据工作小组
Review: Dependent internal review by 天工LCI数据工作小组
Amounts: no units in this file; such an amount is in the reference unit of its flow, which a separate flow dataset defines
copyright: false
licenseType: Free of charge for all users and uses

## General comment
将设备与材料运输至现场

## Technology and included processes
经过400km路程，将设备和材料运输至现场

## Technical purpose
此数据集涉及用于土壤和地下水修复过程的设备和材料，专为原位地下水抽吸处理干预设计。这些材料在运输到距离400公里的现场后，适用于旨在清除土壤和地下水中污染物以将这些环境介质恢复到安全自然状态的环境修复项目。

## Reference product
- Equipment and Materials Arriving on Site: 1; estimated

## Inputs
- Equipment and Materials Arriving on Site: 400000; estimated

## Use advice
使用此数据集的用户在评估运输至现场的设备和材料的环境影响时应考虑特定的400公里运输距离。该数据集反映了一个单一的操作单元过程运输事件，并应相应地整合到更广泛的修复项目生命周期评估中。用户还应注意可能改变运输排放和资源使用的地理和基础设施变化。与整个生命周期模型的方法论一致性至关重要，这可能需要调整数据以与不同的技术适用性或改变的运输场景对齐。

## Review details
清单： 内部审查通过几个迭代步骤完成，涉及原始数据验证、原始数据记录、代表性、完整性、与 ISO 14040 和 14044 有关的建模的一致性。

## Data sources
- Sustainable remediation assessment of a chlorinated ethene plume: method evelopment, application, and assessment
