# 废纸浆造纸;瓦楞原纸

Dataset: ILCD process, Unit process, black box
Geography: CN
Classification: Materials production / Paper and cardboards
Functional unit: 1000kg of corrugated cardboare
LCI method principle: Attributional
Generated by: 高逸翔, 22210740040@m.fudan.edu.cn
Owner: 天工LCI数据工作小组
Review: Dependent internal review by 天工LCI数据工作小组
Amounts: no units in this file; such an amount is in the reference unit of its flow, which a separate flow dataset defines
copyright: false
licenseType: Free of charge for all users and uses

## General comment
本课题按废纸制浆、抄纸过程、 化学品生产、原料产品运输、废水处理 5 个过程进行数据分析处理。

## Technical purpose
废纸再生纸生产用于制造瓦楞原纸，这一工业过程包括废纸制浆、纸张制作以及化学品生产、原料及产品运输和废水处理。所产生的产品是瓦楞基础纸，主要用于包装应用。

## Reference product
- Corrugated Cardboard: 1000; measured
  瓦楞原纸

## Inputs
- Waste paper: 1099; measured
  废纸（制浆阶段）
- water: 0.79; measured
  水（制浆阶段）
- Electricity: 335.16; measured
  电力（制浆阶段）
- Cassava Starch: 48; measured
  木薯淀粉（抄纸阶段）
- Ring Crush Strengthening Agent: 8.5; measured
  环压增强剂（抄纸阶段）
- Ammonium Persulfate: 1.9; measured
  过硫酸铵（抄纸阶段）
- hard coal: 351.12; measured
  煤（抄纸阶段）
- water: 5.05; measured
  水（抄纸阶段）
- Electricity: 564.84; measured
  电力（抄纸阶段）
- Diesel: 27.92; measured
  柴油（运输阶段）
- water: 0.42; software or database
  水（化学品生产）
- Diesel: 15.08; software or database
  柴油（化学品生产）
- Electricity: 30.42; software or database
  电力（化学品生产）
- Polymeric ferric sulfate: 0.0007; measured
  聚合硫酸铁（废水处理阶段）
- water: 0.79; measured
  水（废水处理阶段）
- Electricity: 6.192; measured
  电力（废水处理阶段）

## Outputs
- carbon dioxide: 398.96; measured
  CO2（制浆阶段）
- Nitrogen oxides: 0.06; measured
  NOx（制浆阶段）
- sulfur dioxide: 0.04; measured
  SO2（制浆阶段）
- methane: 0.05; measured
  CH4（制浆阶段）
- carbon monoxide: 0.74; measured
  CO（制浆阶段）
- non-methane volatile organic compounds: 0.19; measured
  NMVOC（制浆阶段）
- Total Suspended Particulate: 0.7; measured
  TSP（制浆阶段）
- chemical oxygen demand: 0.191; measured
  CODcr（制浆阶段）
- biological oxygen demand: 0.037; measured
  BOD5（制浆阶段）
- total suspended solids, unspecified: 0.12; measured
  TSS（制浆阶段）
- Waste solid: 189.17; measured
  固体废弃物（制浆阶段）
- hazardous waste (unspecified): 0.015; measured
  危险废物（制浆阶段）
- carbon dioxide: 660.16; measured
  CO2（抄纸阶段）
- Nitrogen oxides: 0.09; measured
  NOx（抄纸阶段）
- sulfur dioxide: 0.037; measured
  SO2（抄纸阶段）
- methane: 0.009; measured
  CH4（抄纸阶段）
- carbon monoxide: 1.2; measured
  CO（抄纸阶段）
- non-methane volatile organic compounds: 0.32; measured
  NMVOC（抄纸阶段）
- Total Suspended Particulate: 0.64; measured
  TSP（抄纸阶段）
- chemical oxygen demand: 0.008; measured
  CODcr（抄纸阶段）
- biological oxygen demand: 0.002; measured
  BOD5（抄纸阶段）
- total suspended solids, unspecified: 0.008; measured
  TSS（抄纸阶段）
- hazardous waste (unspecified): 0.02; measured
  危险废物（抄纸阶段）
- carbon dioxide: 55.93; software or database
  CO2（运输阶段）
- Nitrogen oxides: 0.01; software or database
  NOx（运输阶段）
- sulfur dioxide: 0.003; software or database
  SO2（运输阶段）
- methane: 0.15; software or database
  CH4（运输阶段）
- carbon monoxide: 0.16; software or database
  CO（运输阶段）
- non-methane volatile organic compounds: 0.02; software or database
  PM10（运输阶段）
- Total Suspended Particulate: 0.06; software or database
  NMVOC（运输阶段）
- carbon dioxide: 90.78; software or database
  CO2（化学品生产）
- Nitrogen oxides: 0.01; software or database
  NOx（化学品生产）
- sulfur dioxide: 0.003; software or database
  SO2（化学品生产）
- methane: 0.13; software or database
  CH4（化学品生产）
- carbon monoxide: 0.04; software or database
  CO（化学品生产）
- particles (PM10): 0.01; software or database
  PM10（化学品生产）
- non-methane volatile organic compounds: 0.08; software or database
  NMVOC（化学品生产）
- Total Suspended Particulate: 0.01; software or database
  TSP（化学品生产）
- chemical oxygen demand: 0.053; software or database
  CODcr（化学品生产）
- biological oxygen demand: 0.12; software or database
  BOD5（化学品生产）
- nitrogen, total (excluding N2): 0.09; software or database
  TN（化学品生产）
- nitrate: 0.036; software or database
  硝酸根（化学品生产阶段）
- phosphate: 0.04; software or database
  磷酸根（化学品生产阶段）
- total suspended solids, unspecified: 0.034; software or database
  TSS（化学品生产）
- carbon dioxide: 7.39; measured
  CO2（废水处理阶段）
- sulfur dioxide: 0.001; measured
  SO2（废水处理阶段）
- methane: 0.001; measured
  CH4（废水处理阶段）
- carbon monoxide: 0.01; measured
  CO（废水处理阶段）
- non-methane volatile organic compounds: 0.01; measured
  NMVOC（废水处理阶段）
- Total Suspended Particulate: 0.02; measured
  TSP（废水处理阶段）
- nitrogen, total (excluding N2): 0.024; measured
  TN（废水处理阶段）
- phosphorus, total: 0.006; measured
  TP（废水处理阶段）
- Waste solid: 68.79; measured
  固体废弃物（废水处理阶段）

## Deviations from the LCI method approaches
利用 eFootprint 系统建立各个过程单元模块，输 入各过程单元的数据参数，通过连接各过程单元的关 系变量等操作进行清单分析。另外数据分析过程还涉及分配程序处理，首先能源生产过程中能源消耗及环 境排放需分配至不同过程单元；其次废水处理过程中 废水污染负荷分配至不同过程单元。

## Data selection and combination
初级活动水平数据。通过企业调研、上游厂 家提供、采样监测等途径进行收集，如资源能源消耗 包 括 煤 、 废 纸 、 水 、 电 力 等 ， 气 体 排 放 包 括 CO2、NOx、SO2、CO、PM10、非甲烷挥发性有机物 （Nonmethane Volatile Organic Compound，NMVOC） 等，水 体 排 放 包 括 总 悬 浮 颗 粒 物 （Total Suspended Particu⁃ late，TSP）、化学需氧量 （Chemical Oxygen Demand， COD）、 生 化 需 氧 量 （Biochemical Oxygen Demand， BOD）、 全 氮 （Total Nitrogen， TN）、 全 磷 （Total Phosphorus， TP）、 NO3 − 、PO4 3- 、总 悬 浮 固 体 （Total Suspended Solids，TSS） 等，以及纤维、污泥等固体 废弃物，液态废矿物质油等危险废物，原料产品运输 距离等数据。所收集数据为企业 2019 年全年平均统 计数据，并能反映企业的实际生产水平。2.次级活动水平数据。无法从实际调研过程中 获得的数据，如相关化学品生产、原料产品运输过程 中环境排放等数据，采用中国生命周期基础数据库 CLCD-China、欧盟生命周期数据库 ELCD 3.0、Ecoin⁃ vent，中心商用数据库 Ecoinvent 2.2 Public 或相关科 技文献数据进行替代

## Use advice
使用从废纸生产的1000公斤瓦楞原纸的生命周期评价数据，用作展示在每个过程单元的资源消耗、能源消耗和环境排放清单结果。数据收集框架主要为企业间(B2B)。通过现场调研、上游制造商提供的数据和监测采集一级活动数据。直接获得的二级活动数据由数据库如CLCD-China、ELCD 3.0、Ecoinvent或相关科学文献补充。建议使用eFootprint系统输入各个过程单元的数据参数，进行清单分析。在数据分析时应特别注意分配程序，尤其是在能源消耗和废水处理过程中的污染负荷。对于生产过程，重点关注用量大于纸张1%/t或环境影响超过整个系统1%的化学品。不考虑生产设备、建筑设施和包装材料的生产和维护过程。原料产品运输假定空载率为50%。

## Review details
清单： 内部审查通过几个迭代步骤完成，涉及原始数据验证、原始数据记录、代表性、完整性、与 ISO 14040 和 14044 有关的建模的一致性。

## Data sources
- 赵国杰, 游亚杰, & 黄起帅. 基于生命周期评价的瓦楞原纸产品碳足迹评价. 中国造纸 40, 40–44 (2021).
