# 鸡肉生产 | 肉鸡饲养

Dataset: ILCD process, Unit process, single operation
Geography: SD-CN
Reference year: 2018
Classification: Materials production / Other mineralic materials
Functional unit: The main output of broiler production is chicken, and the functional unit is 1 kg chicken
Generated by: 杨瑞, 1632707028@qq.com
Review: Dependent internal review by Tiangong LCI Data Working Group
Amounts: no units in this file; such an amount is in the reference unit of its flow, which a separate flow dataset defines
copyright: false

## General comment
肉鸡饲养阶段向环境释放的污染物主要 分为肉鸡自身和其他能源消耗。

## Geography
以山东某肉鸡养殖场为目标，对肉鸡规模化 养殖进行生命周期评价

## Reference product
- chicken: 1; measured
  鸡肉

## Inputs
- maize: 1.88; measured
  玉米
- soybean: 1.1; measured
  大豆
- Electricity: 0.54; measured
- hard coal: 0.26; measured

## Outputs
- nitrous oxide: 0.00143; measured
- ammonia: 0.0157; measured
- methane: 0.00143; measured

## Data selection and combination
根据实地调研，整合饲养阶 段数据得出

## Review details
Inventory: The internal review was done by several iteration steps concerning raw data validation, raw data documentation, representativity, completeness and consistency of modelling with regard to ISO 14040 and 14044.; Documentation: The review of the documentation was performed by Ecobilan and is in compliance with ISO 14040 and 14044. The data set documentation is correct in view of the appropriateness of the information provided. It includes all relevant information in view of data quality and scope of application of the respective LCI result.

## Data sources
- 牛学锐 & 韩美. 肉鸡规模化养殖的生命周期评价——以山东某养鸡场为例. 安徽农业科学 46, 48–52 (2018).
