# 玻璃生产 ;有机玻璃单体MMA生产;单体接收罐

Dataset: ILCD process, Unit process, single operation
Geography: JX-CN
Classification: Unit processes / Materials production / Glass and ceramics
Generated by: 和夏夏, 18616148319@163.com
Owner: 天工LCI数据工作小组
Review: Dependent internal review by 天工LCI数据工作小组
Amounts: no units in this file; such an amount is in the reference unit of its flow, which a separate flow dataset defines
copyright: false
licenseType: Free of charge for all users and uses

## General comment
该数据集涉及生产聚甲基丙烯酸甲酯(PMMA)的工业过程，通常称为有机玻璃或Plexiglas。单体接收罐是关键的单元操作，生产或交付的单体MMA（甲基丙烯酸甲酯）存储在此。这种专用设备用于化工行业，并作为PMMA生产线中的中间步骤。通过此过程生产的PMMA用于各种应用，包括制造透明结构材料，如飞机窗户、水族馆和机械加工过程的安全屏障。

## Reference product
- methyl methacrylate: 896.478; measured

## Inputs
- Electricity: 248.04; measured
- polymethyl methacrylate (PMMA) beads: 998.097; measured

## Outputs
All rows: measured
- polymethyl methacrylate (PMMA) beads: 26.062
- freshwater: 15.081
- organic waste (unspecified): 27.4685
- methanol: 8.88
- methacrylic acid: 11.9325
- methacrylate: 11.9325

## Use advice
在使用此数据集进行生命周期评估时，重要的是要考虑与PMMA生产过程中单体接收罐操作相关的能耗和排放。确保在流程分析中考虑到所有输入和输出，以反映真实的环境影响。准确模拟使用阶段行为，如存储时间和条件，因为它们会影响MMA的质量和聚合速率。考虑技术适用性，如操作规模和使用设备的现代性，以确保对正在评估的特定生产环境相关。

## Review details
清单： 内部审查通过几个迭代步骤完成，涉及原始数据验证、原始数据记录、代表性、完整性、与 ISO 14040 和 14044 有关的建模的一致性。

## Data sources
- 江西旺达新材料有限公司年产20000吨有机玻璃原料生产项目
