# Municipal wastewater treatment | Wastewater | Complete mixed activated-sludge technology

Dataset: ILCD process, Unit process, black box
Reference year: 2014
Valid until: 2014
Classification: Materials production / Other mineralic materials
Generated by: 于晨阳, yuchenyang0506@foxmail.com
Review: Dependent internal review by 天工LCI数据工作小组
Amounts: no units in this file; such an amount is in the reference unit of its flow, which a separate flow dataset defines

## Geography
Dindaeng,Thailand

## Time period
2014年

## Reference product
- Wastewater: 1

## Inputs
- electricity: 0.936
- transport in t*km: 2.82e-14
  transport by lorry

## Outputs
- Polyaluminium Chloride: 4e-5
  polymer
- Sludge: 0.0849

## Review details
清单： 内部审查通过几个迭代步骤完成，涉及原始数据验证、原始数据记录、代表性、完整性、与 ISO 14040 和 14044 有关的建模的一致性。

## Data sources
- A comparative life cycle assessment of municipal wastewater treatment plants in Thailand under variable power schemes and effluent management programs
