# 水泥研磨|水泥, 普通硅酸盐水泥

Dataset: ILCD process, Unit process, single operation
Geography: CS-HUN-CN
Classification: Materials production / Other mineralic materials
Generated by: 杨思琪
Amounts: no units in this file; such an amount is in the reference unit of its flow, which a separate flow dataset defines
copyright: false

## General comment
普通硅酸盐水泥（Ordinary portland cement，OPC）

## Geography
湖南省长沙市内某典型水泥厂

## Model description
功能单位（FU）被定义为具有42.9 MPa抗压强度的1千克混合水泥。

## Reference product
- cement, ordinary portland cement: 1000
  OPC

## Inputs
- clinker: 938; measured
  熟料
- gypsum (desulphurized): 67.6; measured
  石膏
- electricity, medium voltage: 245.88; measured
  电。电力是由热力产生的。

## Outputs
- particles (> PM10): 2.41e-5; measured
  PM，未标明粒径，按PM>10处理。

## Deviations from the LCI method approaches
与背景系统相关的数据从Ecoinvent 3.1数据库中获得。

## Data selection and combination
前景系统的清单数据是直接从位于中国湖南省长沙市的水泥厂收集的。

## Data sources
- Qinli Zhang, Bingyi Zhang, & Daolin Wang. (2022). Environmental Benefit Assessment of Blended Cement with Modified Granulated Copper Slag. MATERIALS, 15(15).
