# 页岩气生产;生产

Dataset: ILCD process
Geography: SC-CN
Classification: Energy carriers and technologies / Natural gas based fuels
Generated by: 洪溥, 15695258655@163.com
Owner: 天工LCI数据工作小组
Review: Dependent internal review by 天工LCI数据工作小组
Amounts: no units in this file; such an amount is in the reference unit of its flow, which a separate flow dataset defines
licenseType: Free of charge for all users and uses

## General comment
本数据集代表了以中国四川和重庆地区为主的页岩气生产过程。页岩气是一种存在于页岩层中的天然气，应用广泛，包括作为发电燃料、供暖以及在化工行业作为生产各种化学产品的原料。

## Geography
我国页岩气开采工作目前集中在四川及重庆地区，选取四川及重庆的数据进行LCA计算。

## Reference product
- Methane: 8.092e7; uniform; calculated
  页岩气井全生命周期产量（包含泄漏部分）

## Inputs
- Diesel: 1189; min 906; max 1479; uniform; estimated
  生产流程运输废水消耗的汽油
- Shale gas well: 1; measured
  页岩气井的数目

## Outputs
- waste water - untreated: 268000; min 205000; max 268000; uniform; estimated
  生产流程中全生命周期产生的废水

## Use advice
在使用该数据集进行涉及页岩气的产品或服务的生命周期评估(LCA)计算时，应确保地理范围与数据来源地区相符，即四川和重庆地区。在影响评估阶段应注重考虑当地环境影响类别。此外，用户在应用此数据集时，应考虑采取技术进步提高页岩气抽取技术，并注意政策变化或自然资源可用性可能导致数据的变动。

## Review details
清单： 内部审查通过几个迭代步骤完成，涉及原始数据验证、原始数据记录、代表性、完整性、与 ISO 14040 和 14044 有关的建模的一致性。

## Data sources
- Wang, J., Liu, M., McLellan, B. C., Tang, X. & Feng, L. Environmental impacts of shale gas development in China: A hybrid life cycle analysis. Resources, Conservation and Recycling 120, 38–45 (2017).
