# 电力生产 | 电力 | 火电（61.5%）+水电（4.9%）+核电（28.1%）+风电（1.4%）+太阳能发电（4.1%）

Dataset: ILCD process
Geography: HAIN-CN
Reference year: 2019
Classification: Materials production / Other mineralic materials
Generated by: Ruoxi Xiong
Amounts: no units in this file; such an amount is in the reference unit of its flow, which a separate flow dataset defines

## General comment
电力产生形式包括火力发电、水力发电、核能发电、风力发电和太阳能发电

## Time period
根据2019年能源统计年鉴数据计算

## Reference product
- electricity mix: 1; calculated

## Outputs
- carbon dioxide: 0.463; calculated
- sulfur dioxide: 0.078; calculated
- Nitrogen oxides: 0.122657; calculated
- Dust (unspecified, from stack): 0.014874; calculated

## Data treatment and extrapolations
核算方法参考《企业温室气体排放核算方法与报告指南 发电设施》。不同形式发电量及燃料用量来自于《中国能源统计年鉴 2020》中的第三章（能源生产） 和第六章（地区能源平衡表）。用于计算二氧化碳排放因子的低位发热量、单位热值含碳量等燃料参数来自于《2019 年度中国区域电网二氧化碳基准线排放因子 OM 计算说明》、《企业温室气体排放核算方法与报告指南 发电设施》

## Data sources
- 熊若熙. 中国电力生产和消费二氧化碳与污染物排放因子核算. (清华大学, 2023).
