# 土壤修复;异位修复;生物堆;工程实施;土壤清挖

Dataset: ILCD process
Geography: KR
Classification: Other Services / Repair and maintenance
Generated by: 桑春晖, sangch@mail.bnu.edu.cn
Owner: 天工LCI数据工作小组
Review: Dependent internal review by 天工LCI数据工作小组
Amounts: no units in this file; such an amount is in the reference unit of its flow, which a separate flow dataset defines
licenseType: Free of charge for all users and uses

## General comment
污染源区面积200 m2，污染深度5 m，污染土壤清挖

## Technical purpose
该土壤修复过程适用于使用生物堆工程技术对受污染土壤进行异位处理。它涉及从面积为200平方米、污染深度为5米的污染源区域挖掘土壤，适用于类似规模的土地污染。

## Reference product
- contaminated soil: 1000; article inperiodical

## Inputs
- Diesel: 0.803; article inperiodical

## Use advice
在将此数据集用于生命周期评估时，用户应确保包括从挖掘到处理的生物堆过程的所有相关阶段。考虑地理和技术上下文以保持准确性至关重要。针对不同污染水平或区域的站点，可能需要进行规模调整。应根据项目的具体情况证明排除回收过程的合理性。

## Review details
清单： 内部审查通过几个迭代步骤完成，涉及原始数据验证、原始数据记录、代表性、完整性、与 ISO 14040 和 14044 有关的建模的一致性。
