# 土壤和地下水修复;原位;地下水抽出处理;施工;建造监测井

Dataset: ILCD process, Unit process, single operation
Geography: JS-CN
Reference year: 2022
Classification: Other Services / Repair and maintenance
Generated by: 王宁, wang_ning@caep.org.cn
Owner: 天工LCI数据工作小组
Review: Dependent internal review by 天工LCI数据工作小组
Amounts: no units in this file; such an amount is in the reference unit of its flow, which a separate flow dataset defines
licenseType: Free of charge for all users and uses

## General comment
使用聚氯乙烯、膨润土、硅石、柴油和钢材建造三口监测井

## Geography
a closed pesticide manufacturing plant located in Jiangsu Province, China.

## Technical purpose
该数据集表示在位于中国江苏省的一个已关闭的农药制造厂进行的地下水修复过程中，使用聚氯乙烯(PVC)、膨润土、硅石、柴油和钢材建造的三口监测井的施工。这些监测井用于监测地下水质量，并评估修复工作的效果。

## Reference product
- Monitoring well: 3; article inperiodical

## Inputs
All rows: article inperiodical
- Polyvinyl chloride: 54.86
- bentonite: 644.53
- quartz sand: 3222.64
- Steel sections: 15
- diesel: 0.01152

## Use advice
使用者需注意，此数据集专门针对地下水修复项目中监测井的建构和使用。将此数据应用于其它项目时，需要考虑可能影响其相关性和准确性的地理位置、技术和规模差异。此外，如当地材料的可用性和环境法规等问题，也可能影响数据的适用性。建议咨询当地关于构建监测井的指南，并确保符合该地区相关的环境标准，以防需要对方法论进行调整。

## Review details
清单： 内部审查通过几个迭代步骤完成，涉及原始数据验证、原始数据记录、代表性、完整性、与 ISO 14040 和 14044 有关的建模的一致性。

## Data sources
- Ding, D. et al. Assessing the environmental impacts and costs of biochar and monitored natural attenuation for groundwater heavily contaminated with volatile organic compounds. Science of The Total Environment 846, 157316 (2022).
