# 土壤和地下水修复;原位;地下水原位化学氧化;地下水得到修复

Dataset: ILCD process, Unit process, single operation
Geography: CA
Reference year: 2007
Classification: Other Services / Repair and maintenance
Generated by: 王宁, wang_ning@caep.org.cn
Owner: 天工LCI数据工作小组
Review: Dependent internal review by 天工LCI数据工作小组
Amounts: no units in this file; such an amount is in the reference unit of its flow, which a separate flow dataset defines
copyright: false
licenseType: Free of charge for all users and uses

## General comment
药物制剂、注射系统运行，地下水得到修复

## Geography
The contaminated area was located 600 m from a river shore in the northern part of the prov-ince of Quebec， Canada.

## Technology and included processes
使用醋酸、硫酸亚铁、双氧水制备氧化药剂，使用电力驱动地下水原位氧化系统，使地下水得到修复

## Technical purpose
此原位化学氧化过程用于环境修复，特别是处理土壤和地下水污染。它旨在将环境污染物降解为较不危险的化合物，并且主要用于污染物威胁水道的区域，比如加拿大魁北克省河岸600米处的场地。

## Reference product
- Remediated groundwater: 110067; estimated
  运行地下水原位氧化系统得到修复后的地下水

## Inputs
All rows: estimated
- Electricity: 166000
  消耗电力使地下水原位氧化系统运行
- acetic acid: 2280
  消耗醋酸使地下水原位氧化系统运行
- hydrogen peroxide: 4406
  消耗双氧水使地下水原位氧化系统运行
- iron sulphate: 9844
  消耗硫酸亚铁使地下水原位氧化系统运行
- Water (fresh water): 9844
  消耗水使地下水原位氧化系统运行

## Use advice
在利用这一数据集进行生命周期评估时，必须考虑污染情况和修复现场的具体特点。确保地理相关性与生命周期评估研究的位置相匹配。在原位氧化系统的操作阶段，考虑潜在的环境效益和影响。用户在没有适当调整的情况下不应将结果外推至不同的污染情景或位置。

## Review details
清单： 内部审查通过几个迭代步骤完成，涉及原始数据验证、原始数据记录、代表性、完整性、与 ISO 14040 和 14044 有关的建模的一致性。
