# 东北水稻生产 | 原料开采

Dataset: ILCD process, Unit process, single operation
Geography: SY-LN-CN
Reference year: 2016
Valid until: 2017
Classification: Materials production / Other mineralic materials
Functional unit: 1t
LCI method principle: Attributional
LCI method approaches: Consequential
Generated by: 张浩然, hrzhang@whu.edu.cn
Review: Dependent internal review by Tiangong LCI Data Working Group
Amounts: no units in this file; such an amount is in the reference unit of its flow, which a separate flow dataset defines
copyright: false

## Reference product
- rice: 1000

## Inputs
- Hard coal, at consumer EU-27: 10.85
- Diesel: 3.51, 0.41 (2 entries)
- Natural gas, at consumer EU-27: 1.63
- Electricity: 78.408
- water: 0.2
- crude oil; 42.3 MJ/kg: 7.66
- potassium chloride: 37.98
- phosphorus: 15.64

## Outputs
- carbon monoxide: 1.22
- carbon dioxide: 44.81
- nitrous oxide: 5.15
- sulfur dioxide: 0.72
- Nitrogen oxides: 0.28
- methane (fossil): 0.05
- chemical oxygen demand: 0.02
- cadmium: 0.0001
- nickel: 0.0013
- vanadium: 0.0005
- zinc: 0.0001
- arsenic: 0.0003

## Deviations from the LCI method approaches
规定起始边界为生产化肥农药的矿石和化石能源开采，终止边界为水稻种植阶段的污染物排放

## Data selection and combination
共调查农户62户，调查内容包括化肥种类及用量、农药种类及用量、机械耗油、生产耗电、灌溉水
量等相关信息

## Data treatment and extrapolations
采用当量系数法将同类污染物转化为参照物的
环境影响潜力[22]，评价水稻生产的环境影响。

## Review details
Inventory: The internal review was done by several iteration steps concerning raw data validation, raw data documentation, representativity, completeness and consistency of modelling with regard to ISO 14040 and 14044.; Documentation: The review of the documentation was performed by Ecobilan and is in compliance with ISO 14040 and 14044. The data set documentation is correct in view of the appropriateness of the information provided. It includes all relevant information in view of data quality and scope of application of the respective LCI result.

## Data sources
- 常俊彦,宋明阳,于晓曼等.沈阳地区水稻生产的生态环境影响研究[J].农业环境科学学报,2018,37(08):1793-1801.
