# 油气藏评价| 三类预探区带| 资源价值计算

Dataset: ILCD process, Unit process, single operation
Geography: SC-CN
Reference year: 2015
Classification: Materials production / Other mineralic materials
LCI method principle: Attributional
LCI method approaches: Consequential
Generated by: 康诗康, 908798159@qq.com
Review: Dependent internal review by Tiangong LCI Data Working Group
Amounts: no units in this file; such an amount is in the reference unit of its flow, which a separate flow dataset defines
copyright: false

## General comment
根据预探区带的模板及参数对四川盆地的 5 个预 探区带的资源战略价值进行评价。为了便于比较和对比，我们根据四川盆地预探区带的勘探现状进行了评价指数的归一化

## Geography
四川盆地预探区带

## Time period
文献发表时间

## Technology and included processes
基于勘探风险 分析技术建立了“油气发现概率 － 资源战略价值”的预探区带评价模板，提出了对应的评价参数、赋值标准、计算公式及结果分类标准，实现了统一平台下的预探区带评价优选。

## Reference product
- natural gas: 1e12; input; min 1e12; max 3e13; normal; article inperiodical
  各个区带的资源量均值与其的比值

## Inputs
- natural gas: 3e11; max 3e11; uniform; article inperiodical
  潜在资源量
- natural gas: 0.34; log-normal; article inperiodical
  油气发现率

## Data selection and combination
其中区带的油气发现概率评价参数包括地质 成藏关键因素( 烃源岩、圈闭、储层、保存和油气配套史) 及工程技术适用性，资源战略价值评价参数包括资源潜 力、资源规模、勘探战略意义和探井成功率

## Data treatment and extrapolations
评价时考虑可发现的资源规模、潜力、探井成功率以及勘 探的战略意义等因素的影响，利用资源量指数、潜在资 源量指数、探井成功率指数和勘探战略价值 4个参数 综合反映预探区带的资源价值的相对大小，定量化表示资源潜力和价值

## Review details
Inventory: The internal review was done by several iteration steps concerning raw data validation, raw data documentation, representativity, completeness and consistency of modelling with regard to ISO 14040 and 14044.; Documentation: The review of the documentation was performed by Ecobilan and is in compliance with ISO 14040 and 14044. The data set documentation is correct in view of the appropriateness of the information provided. It includes all relevant information in view of data quality and scope of application of the respective LCI result.

## Data sources
- 刘超英;闫相宾;高山林;闵斌; 油气预探区带评价优选方法及其应用. 石油与天然气地质 314-318+329 (2015).
