# 电力生产 ; 电力 ; 火电（96.4%）+风电（1.5%）+太阳能发电（2%）

Dataset: ILCD process, Partly terminated system
Geography: TJ-CN
Reference year: 2019
Classification: Energy carriers and technologies / Electricity
LCI method principle: Other
Generated by: 熊若熙, xiongrx0126@163.com
Owner: 天工LCI数据工作小组
Review: Dependent internal review by 天工LCI数据工作小组
Amounts: no units in this file; such an amount is in the reference unit of its flow, which a separate flow dataset defines
copyright: false
licenseType: Free of charge for all users and uses

## General comment
电力产生形式包括火力发电、水力发电、风力发电和太阳能发电

## Time period
根据2019年能源统计年鉴数据计算

## Technical purpose
本数据集描述了一个以热电为主（96.4%），并有部分风电（1.5%）和太阳能发电（2%）的电力产生工业过程。这种混合型的电力生成通常用于满足电网供应的能源需求，为住宅、商业、工业和公共用户提供电力。热电通常依赖化石燃料，由于其可靠性和持续可用性，被用于基载电力供应，而风能和太阳能作为可再生能源，用于补充基荷，以减少环境影响。

## Reference product
- Electricity: 3.6; calculated

## Outputs
- carbon dioxide: 0.7; calculated
- sulfur dioxide: 0.000112; calculated
- Nitrogen oxides: 0.000173325; calculated
- Dust (unspecified, from stack): 2.5396e-5; calculated

## Data treatment and extrapolations
核算方法参考《企业温室气体排放核算方法与报告指南 发电设施》。不同形式发电量及燃料用量来自于《中国能源统计年鉴 2020》中的第三章（能源生产） 和第六章（地区能源平衡表）。用于计算二氧化碳排放因子的低位发热量、单位热值含碳量等燃料参数来自于《2019 年度中国区域电网二氧化碳基准线排放因子 OM 计算说明》、《企业温室气体排放核算方法与报告指南 发电设施》

## Use advice
使用此数据集的用户应参照《企业温室气体排放核算方法与报告指南 发电设施》来获取方法论框架。应注重不同形式的电力生成在应用此数据时的组合，以及根据2019年能源统计年鉴计算的具体碳排放因子。确保准确代表发电形式及其相关燃料消耗量在模拟电力生成的碳足迹或环境影响评估时至关重要。为了精确报告和分析，与地区因素和指南的方法学一致性是必要的。

## Review details
清单： 内部审查通过几个迭代步骤完成，涉及原始数据验证、原始数据记录、代表性、完整性、与 ISO 14040 和 14044 有关的建模的一致性。

## Data sources
- 熊若熙. 中国电力生产和消费二氧化碳与污染物排放因子核算. (清华大学, 2023).
