# 土壤修复;异位修复;生物堆;工程实施;废气处置

Dataset: ILCD process
Geography: KR
Classification: Other Services / Repair and maintenance
Generated by: 桑春晖, sangch@mail.bnu.edu.cn
Owner: 天工LCI数据工作小组
Review: Dependent internal review by 天工LCI数据工作小组
Amounts: no units in this file; such an amount is in the reference unit of its flow, which a separate flow dataset defines
licenseType: Free of charge for all users and uses

## General comment
采用活性炭对修复环节产生的废气进行吸附

## Technical purpose
所描述的工业过程用于异位生物堆土壤修复。它涉及使用生物降解方法对被挖掘出并堆放成大型生物堆的受污染土壤进行工程化处理。该过程专门用于清除受有机污染物影响的土壤。在修复周期期间，使用活性炭吸附处理修复过程中产生的废气以管理任何排放。

## Reference product
- Activated Carbon: 1368; article inperiodical

## Inputs
- Activated Carbon: 1368; article inperiodical

## Use advice
在使用此数据进行生命周期评估时，请确保系统边界包括异地土壤处理以及通过活性炭吸附管理排放。考虑土壤到修复现场及从修复现场返回的运输、治疗过程中消耗的能源，以及最终处理或再生用过的活性炭。排除修复本身可能带来的任何环境效益，因为重点应该是评估修复过程的影响。

## Review details
清单： 内部审查通过几个迭代步骤完成，涉及原始数据验证、原始数据记录、代表性、完整性、与 ISO 14040 和 14044 有关的建模的一致性。
