# 土壤修复;异位修复;水泥窑协同处置;运行阶段;水泥粉磨;水泥

Dataset: ILCD process, Unit process, single operation
Geography: CN
Reference year: 2015
Classification: Other Services / Repair and maintenance
Generated by: 曹嘉萌, 2979480760@qq.com
Owner: 天工LCI数据工作小组
Review: Dependent internal review by 天工LCI数据工作小组
Amounts: no units in this file; such an amount is in the reference unit of its flow, which a separate flow dataset defines
copyright: false
licenseType: Free of charge for all users and uses

## General comment
水泥厂拥有一条4000t/d规模的现代化干法生产线，年生产水泥190万t，熟料150万t．公司自有矿山面积0.448km2，年生产石灰石能力200万t.生产工艺采用具有先进水平的RSP五级窑外分解技术．危险废物均采用汽车运输方式，配置危险品专用车辆，行车路线为货车专用线.矿山至厂区的运输距离约1.5km，废弃物的运输距离约50km．常规水泥的生产过程主要包括原辅材料的幵采及运输、生料制备、煤粉制备、熟料煅烧和水泥粉磨等阶段， 添加废弃物处置环节后， 废弃物（污染土壤、消化污泥、废油泥等）可以用作替代原料和替代燃料，以节省石灰石和煤炭等原材料。水泥窑协同处置，运行阶段，水泥粉磨过程，主要是石灰石、石膏的破碎、混合及水泥粉磨过程。

## Technology and included processes
水泥粉磨过程，主要是石灰石、石膏的破碎、混合及水泥粉磨过程。

## Technical purpose
该数据集描述了一家水泥厂的异位土壤修复过程运行阶段，包括水泥窑协同处置和水泥粉磨。配备4000t/d产能的生产线运用了RSP五级窑外分解技术生产常规水泥和熟料。还包括了废弃物处置步骤，允许使用污染土壤、消化污泥和废油泥作为替代原料和燃料，从而节约石灰石和煤炭资源。该数据集适用于模拟使用替代物料的水泥生产的环境方面，并评估集成废物协同处置的水泥生产的生命周期影响。

## Reference product
- cement: 1000; measured

## Inputs
All rows: measured
- calcium carbonate: 51.62
- gypsum: 52.15
- Fly ash: 124.24
- Slag: 203.78
- cement clinker: 1000
- Electricity: 116.856

## Use advice
使用此数据集时，用户应注意水泥生产过程的具体上下文。必须考虑使用替代材料（废物）代替传统原材料的环境效益。在生命周期阶段进行方法论考虑时，确保废物处置、使用阶段行为以及这些过程中的任何排放都得到准确捕捉。原材料和废物运输的距离也应反映在整体评估中。用户应将废物输入模型作为替代原料或燃料，并注意输入和输出流不包含大量的废气、废水或固体废物。

## Review details
清单： 内部审查通过几个迭代步骤完成，涉及原始数据验证、原始数据记录、代表性、完整性、与 ISO 14040 和 14044 有关的建模的一致性。

## Data sources
- 侯星宇,张芸,戚昱等.水泥窑协同处置工业废弃物的生命周期评价[J].环境科学学报,2015,35(12):4112-4119.
