# 土壤修复;原位修复;多相抽提;施工准备;基础设施建设

Dataset: ILCD process, Unit process, single operation
Geography: KR
Reference year: 2011
Classification: Other Services / Repair and maintenance
Generated by: 张建宾, zhangjb@caep.org.cn
Owner: 天工LCI数据工作小组
Review: Dependent internal review by 天工LCI数据工作小组
Amounts: no units in this file; such an amount is in the reference unit of its flow, which a separate flow dataset defines
copyright: false
licenseType: Free of charge for all users and uses

## General comment
办公室、仓库及SVE系统基础

## Technology and included processes
砾石9.6 m3，混凝土19 m3，钢丝网96 m2 -巴克霍柴油机21升

## Technical purpose
该工艺用于对污染土壤进行原位修复，即在污染土壤原地（不需要运输土壤到其他地点）进行修复。多相抽提技术旨在通过物理抽取移除例如固体、液体或气体等不同形态的污染物，以此降低环境风险，并为未来使用土壤做准备。该过程主要支持环境管理行业，特别是需要对污染场地进行土壤修复的建设准备阶段。基础设施建设包括为办公室、仓库和土壤气体抽提（SVE）系统建造基础设施，这些都是确保有适当工作空间、材料存储以及修复操作效能的重要组成部分。

## Reference product
- Multiphase extraction facilities: 1; measured

## Inputs
- gravel: 9.6; measured
- cement: 19; measured
- Wire Mesh: 96; measured
- diesel: 0.021; measured

## Use advice
在使用此数据集进行生命周期评估时，请考虑原位修复工艺对环境影响的具体要求。确保包含所有基础设施和材料的输入，比如砾石、混凝土和钢丝网，以及机械操作所消耗的柴油。还需要特别注意多相抽提设备使用阶段行为的建模，并确保土壤气体抽提系统的运行和效率得到准确的体现。这些数据应该在整个场地从基础建设到修复过程完整生命周期的背景下进行整合。

## Review details
清单： 内部审查通过几个迭代步骤完成，涉及原始数据验证、原始数据记录、代表性、完整性、与 ISO 14040 和 14044 有关的建模的一致性。

## Data sources
- Seung-Woo Jeong, Sangwon Suh. Assessment of Environmental Impacts and CO2 Emissions from Soil Remediation Technologies using Life Cycle Assessment - Case Studies on SVE and Biopile Systems -. 大韓環境工學會誌
