# 土壤修复;原位修复;电修复;修复措施准备;水;

Dataset: ILCD process, Unit process, single operation
Geography: KR
Reference year: 2014
Classification: Other Services / Repair and maintenance
Generated by: 浩骅, wangyp@caep.org.cn
Owner: 天工LCI数据工作小组
Review: Dependent internal review by 天工LCI数据工作小组
Amounts: no units in this file; such an amount is in the reference unit of its flow, which a separate flow dataset defines
copyright: false
licenseType: Free of charge for all users and uses

## General comment
系统的运行和维护

## Technical purpose
所描述的土壤修复过程用于原位电动力修复，这是一种通过施加电流从土壤中移除污染物的技术。这个特定的过程涉及系统操作和维护方面，包括为维修工作人员提供交通工具。这个过程适用于处理受污染的土地，其中传统的挖掘和处置方法不可行或成本效益不高，例如在城市地区、近基础设施或污染物分散的地方。

## Reference product
- Water for industrial use: 50; input; measured
  2 m3 /month

## Inputs
- Sodium hydroxide: 10; measured
  Chemical (0.01 M)
- Electricity: 21600; measured
  Pump, power supply, etc
- EDTA: 36.5; measured
- Diesel: 0.0927; measured
  Vehicle (onetime/week, 19.3 km, 10 km/1 L)

## Outputs
- Greenhouse Gases: 4340; measured
- Nitrogen oxides: 10.1; measured
- SOx: 11.2; measured
- particles (> PM10): 0.037; measured

## Use advice
在使用原位电动力土壤修复过程的数据集时，应注意修复区域的范围，因为这种方法的有效性可能会因土壤类型、污染物属性和当地地质条件而异。用户还应考虑修复过程中电力使用的能源消耗和环境影响。此外，在评估过程的整体环境影响时，还应考虑维修人员的交通运输。

## Review details
清单： 内部审查通过几个迭代步骤完成，涉及原始数据验证、原始数据记录、代表性、完整性、与 ISO 14040 和 14044 有关的建模的一致性。

## Data sources
- Environmental assessment on electrokinetic remediation of multimetal-contaminated site: a case study
