# 开采阶段|原油|地震勘探、钻井、修井

Dataset: ILCD process, Unit process, single operation
Geography: BJ-CN
Reference year: 2004
Classification: Materials production / Other mineralic materials
LCI method principle: Attributional
LCI method approaches: Consequential
Generated by: 朱睿希, z2958242159@163.com
Review: Dependent internal review by Tiangong LCI Data Working Group
Amounts: no units in this file; such an amount is in the reference unit of its flow, which a separate flow dataset defines
copyright: false

## General comment
石油在勘探开采阶段要进行的主要工程类别有地 震勘探、钻井、修井、油气集储等。按照开采地域的不 同又分为陆上石油的开采和海洋石油的开采。在这 些过程中对环境产生的影响主要有噪音、废水、废气 和固体废弃物等但最主要的是废水、固体废弃物这两 个部分。以下对它们所产生的影响及所要消耗的能量 进行分析

## Geography
江汉油田

## Inputs
- LPG - liquefied petroleum gas: 2500; uniform; article inperiodical
  原油生产耗水量

## Deviations from the LCI method approaches
（1）从能耗表中可以看到在开采和炼制阶段石 油损耗率较大因此有必要采取措施减少在此过程中 的损耗量。 （2）在石油的开采和使用过程中废水的数量较 多故须对水回收再利用以减少废水污染并节约用 水。 （3）从整个生命周期来看石油的利用污染比较大。但是其应用广泛产品众多所以在短时期内还没 有可替代品。

## Review details
Inventory: The internal review was done by several iteration steps concerning raw data validation, raw data documentation, representativity, completeness and consistency of modelling with regard to ISO 14040 and 14044.; Documentation: The review of the documentation was performed by Ecobilan and is in compliance with ISO 14040 and 14044. The data set documentation is correct in view of the appropriateness of the information provided. It includes all relevant information in view of data quality and scope of application of the respective LCI result.

## Data sources
- 董志强,马晓茜,张凌 石油利用对环境影响的生命周期分析
