# 熟料生产|熟料|立窑

Dataset: ILCD process, Unit process, single operation
Geography: CN
Classification: Materials production / Other mineralic materials
Generated by: 杨思琪
Amounts: no units in this file; such an amount is in the reference unit of its flow, which a separate flow dataset defines
copyright: false

## General comment
在煅烧熟料的阶段中，生料（主要是CaCO3）与燃料如煤混合。通过向窑中加入空气进行煅烧，使得生料在高温下分解为熟料（主要是CaO）。在这个过程中会产生各种污染物。

## Model description
系统边界为产生熟料的煅烧阶段。

## Reference product
- clinker: 1000
  熟料

## Inputs
All rows: measured
- raw meal: 2042.5
  生料球
- limestone, crushed, for mill: 1165.83
  石灰石
- clay: 242.5
  黏土
- hard coal, run-of-mine: 195
  煤炭。煤1.94；添加煤0.4。
- iron, powder: 56.667
  铁粉
- Water (fresh water): 416.667
  水
- oxygen: 373.333
  O2

## Outputs
All rows: measured
- particles (> PM10): 27.5
  灰尘，未标明粒径，按PM>10处理。
- carbon dioxide: 914.167
  二氧化碳
- sulfur dioxide: 2.5
  SO2
- Nitrogen oxides: 4.167
  NOX
- wastewater, unpolluted: 416.667
  水
- Waste, solid, from cement production: 73.753
  其他物质。原文没有指明是什么物质，所以我们假设它是固体废物。

## Sampling procedure
经调查，采用立窑生产系统的水泥企业的年产能为100,000吨熟料。立窑生产线的总体特点是能耗高，生产能力有限，劳动生产率低，粉尘排放量大。立窑生产线的动态代谢分析是在正常生产水平下以1小时为单位进行的。

## Data sources
- Dan Hu, Zhen Guo, Zhen Wang, & Qiang Xiao. (2015). Metabolism analysis and eco-environmental impact assessment of two typical cement production systems in Chinese enterprises. Ecological Informatics 26, 70–77.
