# 电力生产 ; 电力 ; 火电（88.4%）+水电（5.0%）+风电（3.0%）+太阳能发电（3.5%）

Dataset: ILCD process, Partly terminated system
Geography: HEN-CN
Reference year: 2019
Classification: Energy carriers and technologies / Electricity
LCI method principle: Other
Generated by: 熊若熙, xiongrx0126@163.com
Owner: 天工LCI数据工作小组
Review: Dependent internal review by 天工LCI数据工作小组
Amounts: no units in this file; such an amount is in the reference unit of its flow, which a separate flow dataset defines
copyright: false
licenseType: Free of charge for all users and uses

## General comment
电力产生形式包括火力发电、水力发电、风力发电和太阳能发电

## Time period
根据2019年能源统计年鉴数据计算

## Technical purpose
此数据集描述了电力生成来源的混合体，包括火力发电、水力发电、风力发电和太阳能发电，各自的份额为88.4%、5.0%、3.0%和3.5%。数据代表了电网供电典型能源生产组合，在区域或特定电力消费概况相关的评估中适用，例如在环境产品声明、能源审计、温室气体清单和其他工业能源分析中。

## Reference product
- Electricity: 3.6; calculated

## Outputs
- carbon dioxide: 0.681; calculated
- sulfur dioxide: 0.000118; calculated
- Nitrogen oxides: 0.000187784; calculated
- Dust (unspecified, from stack): 2.3338e-5; calculated

## Data treatment and extrapolations
核算方法参考《企业温室气体排放核算方法与报告指南 发电设施》。不同形式发电量及燃料用量来自于《中国能源统计年鉴 2020》中的第三章（能源生产） 和第六章（地区能源平衡表）。用于计算二氧化碳排放因子的低位发热量、单位热值含碳量等燃料参数来自于《2019 年度中国区域电网二氧化碳基准线排放因子 OM 计算说明》、《企业温室气体排放核算方法与报告指南 发电设施》

## Use advice
使用此数据集的用户必须参考《企业温室气体排放核算方法与报告指南 发电设施》中关于排放核算的方法论。不同形式发电及其燃料使用量的详细信息来源于《中国能源统计年鉴 2020》，具体为第三章和第六章。计算二氧化碳排放因子所需的如低位发热量和单位热值含碳量等参数取自包括《2019年度中国区域电网二氧化碳基准线排放因子OM计算说明》在内的文档和相关企业指南。在评估环境影响和能源消耗时，应用适当的换算因子至关重要，以确保报告的准确性和符合监管框架的要求。

## Review details
清单： 内部审查通过几个迭代步骤完成，涉及原始数据验证、原始数据记录、代表性、完整性、与 ISO 14040 和 14044 有关的建模的一致性。

## Data sources
- 熊若熙. 中国电力生产和消费二氧化碳与污染物排放因子核算. (清华大学, 2023).
