# LFP先进的湿法冶金术

Dataset: ILCD process, Unit process, single operation
Geography: CN
Reference year: 2020
Classification: Materials production / Metals and semimetals
Functional unit: using 1 kWh as the functionalunit
Generated by: 彭菲, pengfei24@email.ncu.edu.cn
Owner: 天工LCI数据工作小组
Review: Dependent internal review by 天工LCI数据工作小组
Amounts: no units in this file; such an amount is in the reference unit of its flow, which a separate flow dataset defines
copyright: false
licenseType: Free of charge for all users and uses

## General comment
采用湿法工艺进行材料回收前，对废旧磷酸铁锂电池进行安全放电、拆分、热解、机械破碎，分选得到粉末状含锂废料。 含锂物料加入浸出溶剂进行浸出，过滤分离得到含锂溶液，加入净化剂进行反应后，过滤，浓缩，在一定的反应条件下，加入沉淀剂充分反应后结晶沉淀，经过滤、洗涤、干燥后得到电池级碳酸锂。

## Technical purpose
所描述的LFP先进湿法冶金技术专门用于回收废旧磷酸铁锂电池中的材料。最终产品为电池级碳酸锂，是制造新锂铁磷电池及其他基于锂的化学产品的关键原材料。

## Reference product
- EoL LFP battery: 3.6; input; article inperiodical

## Inputs
- sodium hydroxide: 2.04; article inperiodical
  氢氧化钠，生产混合物/EU-28
- Hydrogen peroxide (30%): 0.29; article inperiodical
  过氧化氢生产混合物/DE
- Citric Acid: 14.38; software or database
  柠檬酸，基于GREET/CN的新工艺
- Sodium carbonate（95%）: 0.9; article inperiodical
  苏打 (Na2CO3)
- Electricity: 4.58; article inperiodical
- natural gas: 11.79, 11.79 (2 entries); article inperiodical

## Outputs
- carbon dioxide: 0.16; article inperiodical
- aluminium: 0.8; measured
- copper: 1.01; measured
- iron: 0.92; measured
- Lithium carbonate: 0.63; measured
  碳酸锂

## Data selection and combination
The data come from multiple papers and are difficult to distinguish.

## Use advice
涉及LFP电池先进湿法冶金工艺的生命周期评估数据应谨慎使用，考虑到回收过程的独特性。该数据集的功能单位是1 kWh的电池容量。用户需要确保在相似的基础和规模上进行比较或评估。应注意方法论选择，例如在回收产品和原始废物流之间分配环境影响的分配。重要的是要注意，数据来自多篇论文，可能包含可能影响分析结果的可变性。

## Review details
清单： 内部审查通过几个迭代步骤完成，涉及原始数据验证、原始数据记录、代表性、完整性、与 ISO 14040 和 14044 有关的建模的一致性。

## Data sources
- Wang, Y. et al. Environmental impact assessment of second life and recycling for LiFePO4 power batteries in China. Journal of Environmental Management 314, 115083 (2022).
