# 电力生产 ; 电力 ; 火电（68.3%）+水电（29.9%）+风电（1.4%）+太阳能发电（0.4%）

Dataset: ILCD process, Partly terminated system
Geography: CQ-CN
Reference year: 2019
Classification: Energy carriers and technologies / Electricity
LCI method principle: Other
Generated by: 熊若熙, xiongrx0126@163.com
Owner: 天工LCI数据工作小组
Review: Dependent internal review by 天工LCI数据工作小组
Amounts: no units in this file; such an amount is in the reference unit of its flow, which a separate flow dataset defines
copyright: false
licenseType: Free of charge for all users and uses

## General comment
电力产生形式包括火力发电、水力发电、风力发电和太阳能发电

## Time period
根据2019年能源统计年鉴数据计算

## Technical purpose
该数据集代表了特定地区电力生产的组合，其中包括火电（主要来自煤炭）、水电、风电和太阳能发电。这种混合电能通常提供给公共和工业部门，用途涵盖从居民能源供应到驱动制造过程等各种应用。

## Reference product
- Electricity: 3.6; calculated

## Outputs
- carbon dioxide: 0.544; calculated
- sulfur dioxide: 9.1e-5; calculated
- Nitrogen oxides: 0.000146851; calculated
- Dust (unspecified, from stack): 1.8834e-5; calculated

## Data treatment and extrapolations
核算方法参考《企业温室气体排放核算方法与报告指南 发电设施》。不同形式发电量及燃料用量来自于《中国能源统计年鉴 2020》中的第三章（能源生产） 和第六章（地区能源平衡表）。用于计算二氧化碳排放因子的低位发热量、单位热值含碳量等燃料参数来自于《2019 年度中国区域电网二氧化碳基准线排放因子 OM 计算说明》、《企业温室气体排放核算方法与报告指南 发电设施》

## Use advice
使用此数据集进行生命周期评估（LCA）的用户应特别注意有关区域能源组合及其相关温室气体排放的方法选择。在计算碳足迹时，必须引用适当的基线年份（根据提供的2019年数据）和标准（《企业温室气体排放核算方法与报告指南 发电设施》）。应考虑能源组合比例随时间的潜在变化，并在可用时结合最新年度统计年鉴的更新，以获得更准确的LCA结果。

## Review details
清单： 内部审查通过几个迭代步骤完成，涉及原始数据验证、原始数据记录、代表性、完整性、与 ISO 14040 和 14044 有关的建模的一致性。

## Data sources
- 熊若熙. 中国电力生产和消费二氧化碳与污染物排放因子核算. (清华大学, 2023).
