# 勘探潜力分析| 海相烃源岩 |有机地球化学分析

Dataset: ILCD process, Unit process, single operation
Geography: SC-CN
Reference year: 1940
Classification: Materials production / Other mineralic materials
LCI method principle: Attributional
LCI method approaches: Consequential
Generated by: 康诗康, 908798159@qq.com
Review: Dependent internal review by Tiangong LCI Data Working Group
Amounts: no units in this file; such an amount is in the reference unit of its flow, which a separate flow dataset defines
copyright: false

## General comment
选取8条露头剖面对川西北地区下震旦统陡山沱组、上震 旦统灯三段、下寒武统筇竹寺组、下志留统龙马溪组、中泥盆统、中二叠统茅口组、上二叠统龙潭 组/吴家坪组和大隆组8套海相烃源岩进行了系统的有机地球化学分析，探讨了该区天然气勘探潜 力。

## Geography
川西北地区四川盆地

## Time period
自20世纪40年代至今，川西北地区天然气 勘探持续不断

## Technology and included processes
基于上述烃源岩厚度和有机碳的分析数据，对 川西北地区8套烃源岩总生气强度进行了评价

## Reference product
- natural gas: 6.5e9; input; min 1.3e10; max 4e9; uniform; article inperiodical
  总生气强度

## Inputs
- natural gas: 20; min 10; max 30; uniform; article inperiodical
  总体厚度
- natural gas: 0.0108; min 0.0104; max 0.0112; uniform; article inperiodical
  等效镜质体反射率，范围取均值

## Data selection and combination
烃源岩有机质丰度 、烃源岩有机质类型 、烃源岩有机质成熟度

## Data treatment and extrapolations
通过对川西北地区各套烃源岩地球化学及烃 源岩纵横向厚度展布分析，下寒武统筇竹寺组、上 二叠统龙潭组和大隆组发育高有机质丰度的优质 烃源岩，并且具有厚度大、分布广特征征，

## Review details
Inventory: The internal review was done by several iteration steps concerning raw data validation, raw data documentation, representativity, completeness and consistency of modelling with regard to ISO 14040 and 14044.; Documentation: The review of the documentation was performed by Ecobilan and is in compliance with ISO 14040 and 14044. The data set documentation is correct in view of the appropriateness of the information provided. It includes all relevant information in view of data quality and scope of application of the respective LCI result.

## Data sources
- 胡国艺;贺飞;米敬奎;袁懿琳;郭谨豪; 川西北地区海相烃源岩地球化学特征、分布规律及天然气勘探潜力. 天然气地球科学 319–333 (2021).
