# 熟料生产|熟料

Dataset: ILCD process, Unit process, black box
Geography: ZZ-SD-CN
Classification: Materials production / Other mineralic materials
Generated by: 杨思琪
Amounts: no units in this file; such an amount is in the reference unit of its flow, which a separate flow dataset defines
copyright: false

## General comment
传统熟料生产。

## Geography
山东申丰水泥集团有限公司

## Model description
定义了两个功能单元，分别为1吨熟料和生产1吨熟料所需的食物垃圾和残余废物数量。
系统边界包括煤粉制备、生料制备和熟料煅烧。

## Reference product
- clinker: 1000
  熟料

## Inputs
- limestone, crushed, for mill: 1353.4; estimated
  石灰石
- sandstone: 101.905; estimated
  砂岩
- shale: 75.555; estimated
  页岩
- iron, powder: 26.941; estimated
  铁粉
- hard coal, run-of-mine: 125; estimated
  煤炭
- electricity, medium voltage: 219.02; article inperiodical
  电力。各阶段的耗电量是根据水泥生产的电力消耗指标进行计算的(Wang, 2013)。背景过程数据来自GaBi数据库：electricity production, “CN: Electricity grid mix PE”。

## Outputs
- carbon dioxide: 760.538; calculated
  CO2。E_(CO_2 )=E_"coal" +E_(CaCO_3 ), E_coal=NCV×FC×CC×OF×44/10, E_(C"a" CO_3 )=(FR_1-FR_10)×44/56+(FR_2-FR_20)×44/40. 其中，E_(CO_2 )表示水泥窑炉的CO2排放量（t），E_"coal"表示煤燃烧的CO2排放量（t），E_(CaCO_3 )表示原材料的碳酸盐分解引起的CO2排放量（t）， NCV是煤炭的低位热值（19.570 GJ/t），FC是煤炭的消耗量（t），CC是煤炭单位热值的碳含量（0.0261 t C/GJ），OF是煤炭的碳氧化率（98%），FR1是熟料中CaO的含量（%），FR10是熟料中非碳酸盐分解产生的CaO的含量（%），FR2是熟料中MgO的含量（%），FR20是熟料中非碳酸盐分解产生的MgO的含量（%），44/56和44/40分别是CO2和CaO、MgO之间的分子量转换因子。FR_10=(FS_10)/((1-L)×F_"c" ), FR_20=(FS_20)/((1-L)×F_"c" ). 其中，Fc是熟料中非碳酸盐形式的煤灰含量的转换因子（1.04），FS10是生料中非碳酸盐形式的CaO含量（%），FS20是生料中非碳酸盐形式的MgO含量（%）。FS_10=(∑_"n" ▒〖(m_n×r_10n)〗)/m, FS_20=(∑_"n" ▒〖(m_n×r_20n)〗)/m.其中，mn是第n个除石灰石外的原材料的质量（kg），r10n是第n个除石灰石外的原材料中的CaO含量（%），r20n是第n个除石灰石外的原材料中的MgO含量（%），m是熟料消耗量（kg）。
- sulfur oxides: 0.411575; calculated
  SOx。P_(SO_2 )=64/80×"m"×SO_3 (1-X)×〖10〗^3, 其中 P_(SO_2 ) 表示水泥窑中的SO2排放量（千克），64/80是SO2与SO3的分子量比，m是熟料消耗量（吨），SO3是生料中的SO3含量（%），X是生料中的SO3吸收率（88%）。
- Nitrogen oxides: 1.325; calculated
  NOx。P_(NO_x )=(R_Y×16+R_L×7)×m_coal×〖10〗^(-3)，其中 P_(NO_x ) 表示水泥窑中的NOx排放量（千克），R_L和R_Y分别是旋转窑和预煅器中使用的燃料比例（分别为0.6和0.4），m_coal是熟料生产中的煤炭消耗量（千克）。

## Cut-off and completeness
水泥企业的废水来自循环冷却水和喷淋水，主要污染物只含少量水垢，几乎没有废水从工厂排放。因此，未考虑熟料生产过程中的废水。

## Data selection and combination
首先假定原材料消耗比例，然后根据公式计算煤的消耗量、煤灰掺入率、生料配比、点火后生料配比、熟料配比以及熟料质量参数，包括石灰饱和度系数（KH）、硅酸盐模数（SM）和铝酸盐模数（IM）。熟料质量参数为KH=0.89±0.02，SM=2.5±0.1，IM=1.5±0.1。用公式计算了湿物料的数量。各阶段的电力消耗按水泥生产的电力消耗指数计算。

## Data sources
- Xuemin Liang, Wenling Dang, Guangling Yang, & Yueling Zhang. (2023). Environmental feasibility evaluation of cement co-production using classified domestic waste as alternative raw material and fuel: A life cycle perspective. Journal of Environmental Management 326, 116726.
