# 修复后土壤;土壤修复;原位热脱附;工程实施

Dataset: ILCD process, Unit process, black box
Geography: CN
Reference year: 2022
Classification: Unit processes / Other Services / Repair and maintenance
Generated by: 张今英, zhangjy@caep.org.cn
Owner: 天工LCI数据工作小组
Review: Dependent internal review by 天工LCI数据工作小组
Amounts: no units in this file; such an amount is in the reference unit of its flow, which a separate flow dataset defines
copyright: false
licenseType: Free of charge for all users and uses

## General comment
高风险区施工运行周期约为 200 天，分为两部分：①热脱附，包括加热、抽提井施工、热脱附设备安装及加热脱附等工作；

## Technical purpose
此工艺用于高风险区域受污染土壤的修复，通过原位热脱附（ISTD）来实施。它包括加热土壤以挥发污染物并通过井来提取。这种技术应用于环境工程项目，其中土壤污染物构成了重大的健康或环境风险，需要去除以满足监管标准或为土地再开发作准备。

## Reference product
- Remediated soil: 30413; measured

## Inputs
All rows: measured
- natural gas,natural gas: 766514
- Electricity: 1.296e6
- Diesel: 38.806
- water: 115
- Cast Iron: 310265
- Concrete: 2270
- cement, unspecified: 1513
- Diesel,Diesel: 6.162
- contaminated soil: 30413
- Prepared site: 1

## Outputs
- Exhaust gas: 1; measured
- waste water - untreated: 1; measured

## Use advice
使用此数据集进行生命周期评估（LCA）的用户应确保计入原位热脱附施工和操作阶段的所有相关输入和输出。这包括燃料、电力、其他能源（如天然气）以及材料（如混凝土和钢铁）的消耗。必须包括这些输入的运输，以及土壤修复过程中发生的任何输出或排放。数据所涵盖的使用持续时间为200天，LCA实践者应当考虑项目的具体情况，以使数据与LCA研究的时间范围保持一致。

## Review details
清单： 内部审查通过几个迭代步骤完成，涉及原始数据验证、原始数据记录、代表性、完整性、与 ISO 14040 和 14044 有关的建模的一致性。

## Data sources
- 刘文晓等.基于修复效果的污染土壤修复工程环境足迹分析[J].环境科学研究 35,2367-2377（2022）.
