# 水泥生产|水泥, 复合硅酸盐水泥, 42.5MPa|高掺灰渣干法|混合固废

Dataset: ILCD process, Unit process, black box
Geography: WH-HUB-CN
Reference year: 2005
Classification: Materials production / Other mineralic materials
Generated by: 杨思琪
Amounts: no units in this file; such an amount is in the reference unit of its flow, which a separate flow dataset defines
copyright: false

## General comment
高掺灰渣干法生产工艺的数据来自武汉华新水泥宜都有限公司技改后的工业指标，其生产的42.5等级硅酸盐复合水泥中各种工业废渣掺入量达到50%以上（其中矿渣和粉煤灰的掺入量不低于40%）。

## Geography
武汉华新水泥宜都有限公司

## Model description
以1千克28天抗压强度为42.5MPa的水泥所具有的使用性能为功能单位，即IFu=42.5kgMPa。
研究范围界定为：原料预处理一生料粉磨一生料煅烧一熟料粉磨一水泥均化一水泥储存。

## Reference product
- cement, portland-composite cement, 42.5MPa: 1000
  42.5等级硅酸盐复合水泥

## Inputs
All rows: measured
- limestone, crushed, for mill: 786.4
  石灰石
- gypsum (desulphurized): 45.1
  石膏
- ash: 200
  粉煤灰
- blast furnace slag: 200
  原文献是矿渣（即高炉矿渣）
- hard coal: 88.472
  标准煤。原始数据为0.0822kg标准煤，这里换算为硬煤，换算公式为1kg硬煤=0.929kg标准煤。
- electricity, medium voltage: 370.8
  电力

## Outputs
- particles (> PM10): 0.15; measured
  粉尘，未标明粒径，按PM>10处理。
- sulfur dioxide: 0.000562; measured
  二氧化硫。考虑到国内水泥厂运行的实际情况和未来很长时间的发展趋势，本次评价采用实测数据的统计平均值。
- Nitrogen oxides: 0.004627; measured
  氮氧化物。考虑到国内水泥厂运行的实际情况和未来很长时间的发展趋势，本次评价采用实测数据的统计平均值。
- carbon dioxide: 559.1; measured
  二氧化碳。考虑到国内水泥厂运行的实际情况和未来很长时间的发展趋势，本次评价采用实测数据的统计平均值。

## Data sources
- 曹晓润. (2005). 低环境负荷型水泥的生态环境评价 [硕士, 武汉理工大学].
