# 水泥生产|水泥, 硅酸盐水泥

Dataset: ILCD process, Unit process, black box
Geography: CN
Reference year: 1998
Classification: Materials production / Other mineralic materials
Generated by: 杨思琪
Amounts: no units in this file; such an amount is in the reference unit of its flow, which a separate flow dataset defines
copyright: false

## General comment
研究对象为硅酸盐水泥，原料采用石灰石、粘土及石膏，1吨水泥料耗：石灰石1.3t、粘土0.3t、石膏50kg，不考虑工业废渣的利用。

## Model description
功能单位为1m^3标准混凝土所用水泥重量。1m^3标准混凝土配比为：270kg水泥、60kg飞灰、1850kg集料。研究范围：水泥制造。

## Reference product
- cement, common portland cement: 1000
  硅酸盐水泥

## Inputs
- limestone, crushed, for mill: 1300; missing unimportant
  石灰石
- clay: 300; missing unimportant
  粘土
- gypsum (desulphurized): 50; missing unimportant
  石膏
- electricity, medium voltage: 443.867; article inperiodical
  电耗。水泥生产能耗数据来自文献，燃煤热值以5500kcal/kg计，固定碳以50%计。电力生产污染物数据是按我国发电能耗平均值0.424kg标煤／kWh，折合为热值24244kJ／kg燃煤计算。
- hard coal, run-of-mine: 204.407; article inperiodical
  煤耗（即原煤耗）。水泥生产能耗数据来自文献，燃煤热值以5500kcal/kg计，固定碳以50%计。

## Outputs
- carbon dioxide: 885.185; calculated
  CO2。燃煤CO2由固定碳计算而来原料CO2按碳酸钙Cao含量为50%计算得到。
- carbon monoxide: 0.0114815; calculated
  CO。由于缺乏来源，其它污染数据参考电厂燃煤按能耗换算得到。
- hydrocarbons (unspecified): 0.0274074; calculated
  CxHy。由于缺乏来源，其它污染数据参考电厂燃煤按能耗换算得到。
- Nitrogen oxides: 1.53333; calculated
  NOx。NOx、SO2量由建材行业平均排放因子计算。
- sulfur dioxide: 0.355556; calculated
  SO2。NOx、SO2量由建材行业平均排放因子计算。
- particles (> PM10): 40; estimated
  固体废物（即粉尘）。水泥生产固体废物以水泥产量4%计。未标明粒径，按PM>10处理。

## Data sources
- 刘顺妮. (2003). 水泥-混凝土体系环境影响评价及其应用研究 [博士, 武汉理工大学].
