# 牛肉生产 | 肉牛生产

Dataset: ILCD process, Unit process, single operation
Geography: ZY-GS-CN
Reference year: 2009
Classification: Materials production / Other mineralic materials
Functional unit: 1kg of beef is a functional unit (FU), and the system boundaries of beef production include fertilizer production, feed crop (wheat, corn, soybean) cultivation, and beef cattle feeding stage.
Generated by: 杨瑞, 1632707028@qq.com
Review: Dependent internal review by Tiangong LCI Data Working Group
Amounts: no units in this file; such an amount is in the reference unit of its flow, which a separate flow dataset defines
copyright: false

## General comment
规模肉牛养殖场存栏量一般在 1000 头左右，架子牛体重一般为 350~400kg， 育肥期一般在三到四个月，出栏时体重在 500~550kg

## Geography
作者对甘肃省张掖市前进牧业石岗墩牧场调查得到出栏肉牛的出栏平均体 重为 500kg，每头肉牛平均每天饮水 20~30kg，取平均值 25kg，出肉率为体重的 48%左右。

## Reference product
- beef: 1
  牛肉

## Inputs
- water: 15.2; measured
- maize: 13.75; article inperiodical
  玉米
- wheat: 1.31; article inperiodical
  小麦
- soybean: 0.94; article inperiodical
  大豆

## Outputs
- manure: 18.25; article inperiodical
  粪便

## Review details
Inventory: The internal review was done by several iteration steps concerning raw data validation, raw data documentation, representativity, completeness and consistency of modelling with regard to ISO 14040 and 14044.; Documentation: The review of the documentation was performed by Ecobilan and is in compliance with ISO 14040 and 14044. The data set documentation is correct in view of the appropriateness of the information provided. It includes all relevant information in view of data quality and scope of application of the respective LCI result.

## Data sources
- 魏云. 基于生命周期评价的禽畜产品环境影响评价及对策探讨. (兰州大学, 2016).
