# 玻璃生产 ;夹层玻璃;加温加压

Dataset: ILCD process, Unit process, single operation
Geography: SX-ZJ-CN
Reference year: 2004
Classification: Unit processes / Materials production / Glass and ceramics
Generated by: 和夏夏, 18616148319@163.com
Owner: 天工LCI数据工作小组
Review: Dependent internal review by 天工LCI数据工作小组
Amounts: no units in this file; such an amount is in the reference unit of its flow, which a separate flow dataset defines
copyright: false
licenseType: Free of charge for all users and uses

## General comment
该数据集代表夹层玻璃的生产过程，包括单元过程中的加热和加压操作。该过程可能用于需要安全防护特性的应用，例如在汽车挡风玻璃、建筑玻璃和各种交通方式的防护玻璃中。

## Reference product
- Glass (formed & finished): 250000; measured

## Inputs
- Electricity: 1488.96; measured
- Glass (formed & finished): 250160; measured
  夹层玻璃粗成品

## Outputs
- cullet float glass: 160; measured

## Use advice
在应用此数据集时，用户应确保准确模拟夹层玻璃生产过程中加热和加压步骤的能耗和排放。应注意地理位置和所用能源组合，以及可能影响整体环境影响的潜在终生回收过程。数据应该放在特定产品生命周期的背景下来正确表示其可持续性能。

## Review details
清单： 内部审查通过几个迭代步骤完成，涉及原始数据验证、原始数据记录、代表性、完整性、与 ISO 14040 和 14044 有关的建模的一致性。

## Data sources
- 年产5600吨钢化玻璃及250吨夹层玻璃生产线建设项目环境影响报告
