# 水泥生产|水泥, 普通硅酸盐水泥, 42.5MPa|新型干法|混合固废

Dataset: ILCD process, Unit process, black box
Geography: CN
Reference year: 2004
Classification: Materials production / Other mineralic materials
Generated by: 杨思琪
Amounts: no units in this file; such an amount is in the reference unit of its flow, which a separate flow dataset defines
copyright: false

## General comment
假设稳定碎石所用水泥为P·O 42.5硅酸盐水泥。水泥生产采用新型干法生产工序。原料采用石灰石、粘土及石膏等。生产过程的能源消耗包括各生产工序的电耗和煤耗。污染物则包括颗粒物、SO2、NOX、CO2等。

## Model description
功能单元为1t P·O 42.5硅酸盐水泥。

## Reference product
- cement, ordinary portland cement, 42.5MPa: 1000
  P.O.42.5硅酸盐水泥

## Inputs
All rows: article inperiodical
- limestone, crushed, for mill: 1073.7
  石灰石
- clay: 216.8
  粘土
- gypsum (desulphurized): 51.1
  石膏
- iron, powder: 28.5
  铁粉
- ash: 98
  粉煤灰
- blast furnace slag: 137.6
  矿渣
- electricity, medium voltage: 350.64
  电耗
- hard coal, run-of-mine: 116
  煤耗
- diesel: 0.0002
  柴油。运输水泥原料假设采用5t自卸汽车，5t柴油车运输1km的耗油量为0.2L，运输距离假设1km。

## Outputs
- carbon dioxide: 781; article inperiodical
  CO2
- Nitrogen oxides: 1.53; article inperiodical
  NxO
- methane: 3.414; article inperiodical
  CH4

## Data sources
- 杜丽. (2012). 基于生命周期评价方法半刚性基层施工过程中温室气体排放分析研究 [硕士, 长安大学].
