# 聚氯乙烯生产|聚氯乙烯|干法乙炔发生工艺 20万t/a

Dataset: ILCD process, Unit process, black box
Geography: CN
Reference year: 2010
Classification: Materials production / Other mineralic materials
Functional unit: 1-ton polyvinyl chloride
Generated by: 程晓宇, chengxiaoyu-0@qq.com
Review: Dependent internal review by 天工LCI数据工作小组
Amounts: no units in this file; such an amount is in the reference unit of its flow, which a separate flow dataset defines
copyright: false

## General comment
该工艺流程包括：电石干法制乙炔，乙炔氯化加氢制氯乙烯，采用日本 CHISSO 聚合技术实现氯乙烯悬浮法制 PVC，糊树脂制 PVC 采用聚合技术工艺包。

## Geography
我国东南地区某大型石化集团聚氯乙烯生产子公司

## Time period
文献发表时间

## Technology and included processes
本文的技术环节包括：电石干法制乙炔、电解食盐水制氯化氢、乙炔和氯化氢加成制氯乙烯、氯乙烯聚合制聚氯乙烯。

## Reference product
- Polyvinyl Chloride: 1000; measured

## Inputs
All rows: measured
- Calcium carbide: 1440
- Water for industrial use: 11780
- acetylene: 440
- hydrogen chloride: 610
- vinyl chloride: 1010
- Electricity: 778.14
  电能
- process steam: 240.2
  蒸汽消耗（折煤）

## Outputs
- carbon dioxide: 247.17; article inperiodical
- carbon monoxide: 1.1; article inperiodical
- Nitrogen oxides: 2.52; article inperiodical
- sulfur dioxide: 3.37; measured
- Flue dust: 2.2; article inperiodical
- hydrocarbons (unspecified): 0.0192; article inperiodical
- hydrogen chloride: 0.0046; article inperiodical
- acetylene: 0.096; article inperiodical
- Vinyl Chloride Monomer: 0.274, 0.00247 (2 entries); article inperiodical
- PVC Waste Gas: 0.441; article inperiodical
- chemical oxygen demand: 0.454; article inperiodical
- Divalent lead ion: 2e-5; article inperiodical
- Suspended solids, unspecified: 0.359; measured
- sulfide: 0.00147; article inperiodical
- gasoline (regular): 0.00894; article inperiodical
- Hg2+/Total Mercury: 7.25e-6; article inperiodical
- Ash: 0.00623; measured
- Dregs: 0.00367; article inperiodical
- Sludge (from processing): 4.18; measured
- Hazardous Solid Waste: 0.578; measured

## Review details
清单： 内部审查通过几个迭代步骤完成，涉及原始数据验证、原始数据记录、代表性、完整性、与 ISO 14040 和 14044 有关的建模的一致性。

## Data sources
- 伍跃辉, 陈爱燕, 王震 & 孙德智. 聚氯乙烯生产过程生命周期评价. 环境科学与技术 33, 202–205 (2010).
