# 水泥生产|水泥, 通用硅酸盐水泥|立窑|混合固废

Dataset: ILCD process, Unit process, black box
Geography: GS-CN
Classification: Materials production / Other mineralic materials
Generated by: 杨思琪
Amounts: no units in this file; such an amount is in the reference unit of its flow, which a separate flow dataset defines
copyright: false

## General comment
立窑。100％的水泥粉尘得到了回收利用。

## Geography
永靖县金河顺发建材有限责任公司

## Model description
以生产1吨普通硅酸盐水泥作为功能单位，该种水泥在中国约占总产量的98%。
立窑的系统边界。通常考虑三个阶段，即原材料破碎、熟料生成和水泥磨。熟料生成阶段包括混合水、制球和在窑中烧成。每个过程都考虑了原材料、能源消耗、道路运输、直接排放（即二氧化碳、二氧化硫、氮氧化物和颗粒物）和基础设施。

## Reference product
- cement, common portland cement: 1000
  普通硅酸盐水泥

## Inputs
All rows: article inperiodical
- calcium carbonate: 1180
  石灰石
- gypsum: 42.9
  石膏
- water: 850
  水
- dolomite: 53.68
  白云岩
- clay: 33.66
  红粘土
- iron, powder: 18.32
  铁粉
- Magnesium slag: 71.01
  镁矿渣
- blast furnace slag: 32.17
  炉渣
- hard coal, run-of-mine: 183.63
  煤炭
- electricity, medium voltage: 435.6
  电力

## Outputs
All rows: article inperiodical
- carbon dioxide: 850
  二氧化碳。CO2排放按照公式(Eq.)计算（Wu等，2006年）：E = 3.67a x k x Mcoal x Q + 0.38 x Mlimestone，其中E，a，k，Mcoal，Q和Mlimestone分别表示每吨水泥生产的CO2排放量，煤炭的碳氧化效率（0.93，国家发展和改革委员会，2011年），煤炭的碳排放因子（26.1 x 10-3，国家发展和改革委员会，2011年），每吨水泥生产所需的煤炭质量，煤炭的发热值，以及每吨水泥生产所需的石灰石质量。本研究中考虑的煤炭发热值为24.48 MJ/kg。
- electricity, medium voltage: 1.2
  SO2。排放数据来自中国水泥行业清洁剂标准（HJ467-2009）。
- Nitrogen oxides: 2.4
  NOx。排放数据来自中国水泥行业清洁剂标准（HJ467-2009）。
- particles (> PM10): 5.4
  颗粒物，未标明粒径，按PM>10处理。大气排放数据来自宏达水泥厂（中国云南）。
- wastewater, unpolluted: 0.71
  废水。废水被送往市政府废水处理厂进行处理。

## Data selection and combination
立窑方案，数据取自文献。水泥行业清洁生产技术的应用研究来自兰州大学的硕士论文。由于前者缺乏信息，直接大气排放数据来自云南宏达水泥厂。此外，中国水泥行业清洁生产标准（HJ 467-2009）被用来确定直接SO2和NOx排放。

## Data sources
- Wei Chen, Jinglan Hong, & Changqing Xu. (2015). Pollutants generated by cement production in China, their impacts, and the potential for environmental improvement. JOURNAL OF CLEANER PRODUCTION, 103, 61–69.
