# 土壤和地下水修复;原位;土壤生物通风;设备和材料到场

Dataset: ILCD process, Unit process, single operation
Geography: CA
Reference year: 2007
Classification: Other Services / Engineering and consulting
Generated by: 王宁, wang_ning@caep.org.cn
Owner: 天工LCI数据工作小组
Review: Dependent internal review by 天工LCI数据工作小组
Amounts: no units in this file; such an amount is in the reference unit of its flow, which a separate flow dataset defines
copyright: false
licenseType: Free of charge for all users and uses

## General comment
将所需材料运输至现场

## Geography
The contaminated area was located 600 m from a river shore in the northern part of the prov-ince of Quebec， Canada.

## Technology and included processes
消耗柴油汽油将设备与材料运输到项目现场

## Technical purpose
该数据集代表了一种用于原位土壤和地下水生物修复的工艺，具体为土壤生物通风。它适用于污染接近敏感生态系统（如河岸）的环境修复项目。数据涉及到生物修复过程所需设备和材料的动员，包括运输到遭受土壤污染的现场。

## Reference product
- Equipment and Materials Arriving on Site: 1; estimated
  到达现场的材料和设备

## Inputs
- Diesel: 0.5; estimated
  将所需材料和设备运至现场所需要的柴油

## Use advice
将此数据集用于土壤及地下水修复项目的生命周期评估(LCA)时，用户应确保考虑工艺的地理特定性，因为它基于加拿大魁北克省的一个场景。LCA实践者应包括与项目背景相关的运输距离和方式。应根据实际距离和使用的设备调整用于运输的柴油消耗量。数据集假设为与河岸600米处的定位；如果LCA研究的污染地点有不同特征，则应作出调整。

## Review details
清单： 内部审查通过几个迭代步骤完成，涉及原始数据验证、原始数据记录、代表性、完整性、与 ISO 14040 和 14044 有关的建模的一致性。
