# 传统湿法回收废旧动力电池生产镍钴锰酸锂

Dataset: ILCD process, Unit process, single operation
Geography: CN
Reference year: 2015
Classification: Materials production / Other mineralic materials
Functional unit: 1 000 kg of lithium nickel cobalt manganese oxide (ternary material) as a functional unit.
Generated by: 胡志康, hzk2503593129@163.com
Review: Dependent internal review by 天工LCI数据工作小组
Amounts: no units in this file; such an amount is in the reference unit of its flow, which a separate flow dataset defines
copyright: false

## General comment
该方法包括预处理、碱洗、浸出、除杂、沉淀、烧结工序。

## Reference product
- Ternary cathode material: 1000; measured
  镍钴锰酸锂（三元材料）

## Inputs
All rows: measured
- Battery: 3330
  废旧动力电池
- Sulfuric acid(98%): 3660
  H2SO4（98%）
- Hydrochloric acid (30%): 133.08
  盐酸（30%）
- sodium hydroxide: 7260
  氢氧化钠（30%）
- Sodium carbonate: 69.86
  碳酸钠
- Ammonia (28%): 373.35
  氨水（28%）
- 2-ethylhexyl hydrogen -2-ethylhexylphosphonate: 6.66
  P507 萃取剂
- Kerosene: 16.27
  煤油
- hydrogen peroxide: 1220
  双氧水
- Water (fresh water): 46580
  工业用水
- Lithium carbonate: 402.51
  碳酸锂
- Electricity: 27924
  电能
- natural gas: 465.79
  天然气

## Outputs
All rows: measured
- Water (river water from technosphere, cooling water): 33270
  废水
- Ammonia Nitrogen: 0.19962
  氨氮
- nickel: 0.013308
  镍
- carbon dioxide: 224
  废气（CO2）
- Other Solid Waste: 1170
  残渣和灰烬
- Plastic (unspecified),Plastic (unspecified): 133.08
  塑料 PP
- copper: 332.7
  铜
- iron: 598.86
  钢铁

## Review details
清单： 内部审查通过几个迭代步骤完成，涉及原始数据验证、原始数据记录、代表性、完整性、与 ISO 14040 和 14044 有关的建模的一致性。

## Data sources
- 谢英豪, 余海军, 欧彦楠, & 李长东. 废旧动力电池回收的环境影响评价研究. 无机盐工业 47, 43-46+61 (2015).
