# 蔬菜生产 | 耕作（塑料大棚）

Dataset: ILCD process, Unit process, single operation
Geography: XA-SAX-CN
Classification: Materials production / Other mineralic materials
Functional unit: 1000 kg tomatoes
Generated by: 张浩然, hrzhang@whu.edu.cn
Review: Dependent internal review by Tiangong LCI Data Working Group
Amounts: no units in this file; such an amount is in the reference unit of its flow, which a separate flow dataset defines
copyright: false

## Technology and included processes
数据分别取10个日光温室和5个塑料大棚的平均值.根据建材的一般使用年限, 建设日光温室和塑料大棚消耗的建材和能源按使用寿命15年、PVC输水管按使用寿命5年棚膜按使用寿命1年 (塑料大棚按3年) 、防寒膜 (塑料大棚的裙膜) 按使用寿命3年分别折算为1年的用量.塑料大棚1年的建材消耗量平均分配给番茄和西瓜,

## Reference product
- tomato: 1000
  塑料大棚

## Inputs
- water: 53.33
  塑料大棚
- Electricity: 338.31
  塑料大棚

## Outputs
- Rice Seeds: 5.8e-5
  日光温室 土壤
- carbon dioxide (fossil): 25.432
  塑料大棚
- carbon monoxide: 0.034
  塑料大棚
- methane (fossil): 0.071
  塑料大棚
- non-methane volatile organic compounds: 0.011
  塑料大棚
- sulfur dioxide: 0.218
  塑料大棚
- Nitrogen oxides: 0.173
  塑料大棚
- ammonia: 0.11
  塑料大棚
- nitrous oxide: 0.333
  塑料大棚
- nitrate: 0.412
  塑料大棚
- cadmium: 0.000276
  塑料大棚
- lead: 0.009096
  塑料大棚
- calcium: 0.03656
  塑料大棚
- zinc: 0.302396
  塑料大棚
- arsenic: 0.00587
  塑料大棚
- nickel: 0.010398
  塑料大棚
- Rice Seeds: 1.7e-5
  塑料大棚 空气
- Rice Seeds: 8e-6
  塑料大棚 水
- Rice Seeds: 7.8e-5
  塑料大棚 土壤

## Deviations from the LCI method approaches
本研究定义的系统边界包括设施构筑物建设和日常运行 (下文简称为设施构筑物) 所需材料 (水泥、钢材、砖和棚膜等) 的生产，农资 (化肥、地膜、杀菌剂和杀虫剂) 生产、番茄种植 (育苗、翻地、定植、覆膜、施肥、喷药、灌溉、收获) 及各过程使用能源的生产和消耗,不包括农用机械的生产、番茄运输到市场销售和消费者消费的过程.

## Data selection and combination
能源生产和使用过程的环境影响数据取自文献 (Di et al., 2007;胡志远等, 2006) ;生产钢材、水泥、砖、棚膜、防寒膜、地膜、PVC输水管和化肥的资源、能源和环境排放数据分别取自文献以及《磷肥行业清洁生产指标体系》《氮肥行业清洁生产指标体系》由于缺乏详尽的研究数据, 杀虫剂和杀菌剂生产过程只考虑能耗和CO2排放量, 以有效成分质量表示, 数据采用West等 (2002) 的研究结果.

## Sampling procedure
本研究选择了10个日光温室 (面积均为6 m×90 m) 和5个塑料大棚 (面积均为9 m×110 m) 为研究对象, 调查了日光温室和塑料大棚建设及日常运行的物资消耗

## Review details
Inventory: The internal review was done by several iteration steps concerning raw data validation, raw data documentation, representativity, completeness and consistency of modelling with regard to ISO 14040 and 14044.; Documentation: The review of the documentation was performed by Ecobilan and is in compliance with ISO 14040 and 14044. The data set documentation is correct in view of the appropriateness of the information provided. It includes all relevant information in view of data quality and scope of application of the respective LCI result.

## Data sources
- 王效琴,吴庆强,周建斌,陈妍,吴发启.设施番茄生产系统的环境影响生命周期评价[J].环境科学学报,2014,34(11):2940-2947.
