# 传统湿法冶金工艺（工艺 D）

Dataset: ILCD process, Unit process, single operation
Geography: CN
Reference year: 2013
Valid until: 2017
Classification: Materials production / Other mineralic materials
Functional unit: FU is a typical type of LIB electrode material of 100 kg
Generated by: 马清源, m1120498928@163.com
Review: Dependent internal review by Tiangong LCI Data Working Group
Amounts: no units in this file; such an amount is in the reference unit of its flow, which a separate flow dataset defines
copyright: false

## General comment
采用强酸加还原剂对废旧电极材料进行浸出， 特点是价格低，但强酸对于电极中的各种金属浸出没有选择性，随后的分离过程 较为困难，产物纯度较低，造成了一部分有价资源浪费。

## Time period
数据来源于2013-2017

## Reference product
- Electrolyte: 100; input; article inperiodical
  Electrode paste

## Inputs
All rows: article inperiodical
- Sulfuric acid: 78.2
- Hydrogen peroxide（25%）: 16
- sodium hydroxide: 5
- water,water: 420
- natural gas: 0.00711739
  Natural gas:8500 kCal
- Electricity: 68.04
  Electric power

## Outputs
All rows: article inperiodical
- Lithium carbonate: 12.5
- Graphite: 17
  Graphite powder
- Al/Cu foil: 2.4
- Nickel salt: 14
  Ni salt/metal
- Cobalt salt: 17.5
  Co salt/ metal
- Manganese salt: 13
  Mn salt/metal
- Ternary precursor: 5.3
  Precursor
- sodium sulfate: 57
- Sulfuric acid: 12
- Slag (deposited, hibernating in ground, non elementary flow): 3
- carbon dioxide: 6
- sulfur dioxide: 3
- waste water - treated: 400

## Data selection and combination
工艺的投入产出来自文献综述所报道数据的平均结果，体现了“坟墓”到 “摇篮” 的代表性过程。本研究不考虑塑料及金属外壳的回收或处理，人工成本、 工厂建设费用及其对环境的影响亦不包括在此分析中。

## Data treatment and extrapolations
值得注意的是，欧盟的数据并非针对于某个行业的计算，部分进出口数据和回收信息不适合中国的 情况。因此，改进后的 CRMs 评价方法还结合了中国官方数据、文献报道和来自 贸易/行业协会等其它利益集团数据，对主要的 LIB 制造商、回收公司、中国的官方管理机构等利益相关方的数据进行了最佳估计。在数据的时效性方面，CRMs 评估中使用的数据的参考期是基于最近的 4 年平均值（即 2013 年-2016 年）。

## Review details
Inventory: The internal review was done by several iteration steps concerning raw data validation, raw data documentation, representativity, completeness and consistency of modelling with regard to ISO 14040 and 14044.; Documentation: The review of the documentation was performed by Ecobilan and is in compliance with ISO 14040 and 14044. The data set documentation is correct in view of the appropriateness of the information provided. It includes all relevant information in view of data quality and scope of application of the respective LCI result.

## Data sources
- 宋佳丽. 面向能源金属高效回收的资源关键性评价模型与应用. (天津大学, 2019).
