# 电力生产 ; 电力 ; 火电（97.0%）+风电（2.0%）+太阳能发电（1.0%）

Dataset: ILCD process, Partly terminated system
Geography: SH-CN
Reference year: 2019
Classification: Energy carriers and technologies / Electricity
LCI method principle: Other
Generated by: 熊若熙, xiongrx0126@163.com
Owner: 天工LCI数据工作小组
Review: Dependent internal review by 天工LCI数据工作小组
Amounts: no units in this file; such an amount is in the reference unit of its flow, which a separate flow dataset defines
copyright: false
licenseType: Free of charge for all users and uses

## General comment
电力产生形式包括火力发电、风力发电和太阳能发电

## Time period
根据2019年能源统计年鉴数据计算

## Technical purpose
此混合电力主要用于包括住宅、商业和工业电力供应在内的多种应用。电力主要通过火力发电（97％）产生，并包括风力（2％）和太阳能（1％）等可再生能源。它能满足需要稳定和连续电力供应的能源需求，并整合小部分可再生能源以支持可持续实践。

## Reference product
- Electricity: 3.6; calculated

## Outputs
- carbon dioxide: 0.746; calculated
- sulfur dioxide: 0.000118; calculated
- Nitrogen oxides: 0.000188192; calculated
- Dust (unspecified, from stack): 2.6133e-5; calculated

## Data treatment and extrapolations
核算方法参考《企业温室气体排放核算方法与报告指南 发电设施》。不同形式发电量及燃料用量来自于《中国能源统计年鉴 2020》中的第三章（能源生产） 和第六章（地区能源平衡表）。用于计算二氧化碳排放因子的低位发热量、单位热值含碳量等燃料参数来自于《2019 年度中国区域电网二氧化碳基准线排放因子 OM 计算说明》、《企业温室气体排放核算方法与报告指南 发电设施》

## Use advice
在应用此数据进行生命周期评估或碳足迹计算时，准确归因火力、风力和太阳能发电的各自比例至关重要。确保碳排放因子是最新的，并来源于可靠的数据来源，如示例中指出的2019年能源统计年鉴。应特别关注《企业温室气体排放核算方法与报告指南 发电设施》和《2019中国区域电网CO2基准线排放因子计算说明OM》中引用的方法论指南。用户还应意识到能源生产和消费的地区差异可能会影响评估的准确性和区域特异性。

## Review details
清单： 内部审查通过几个迭代步骤完成，涉及原始数据验证、原始数据记录、代表性、完整性、与 ISO 14040 和 14044 有关的建模的一致性。

## Data sources
- 熊若熙. 中国电力生产和消费二氧化碳与污染物排放因子核算. (清华大学, 2023).
