# 熟料生产|熟料, 硅酸盐水泥熟料, 52.5MPa|新型干法

Dataset: ILCD process, Unit process, black box
Geography: CN
Reference year: 2011
Classification: Materials production / Other mineralic materials
Generated by: 杨思琪
Amounts: no units in this file; such an amount is in the reference unit of its flow, which a separate flow dataset defines
copyright: false

## General comment
新型干法生产硅酸盐水泥熟料。2011年，新型干法水泥的比例已占到全国总量的89.0%，还处于上升期，所以基本可以代表全国的水平。

## Model description
研究只针对通用水泥，选取国内采用新型干法工艺生产1kg强度等级为52.5MPa的水泥熟料（假设全国的平均水平为52.5Mpa）作为功能单位。另外在建立生命周期模型时，还考虑了原料的运输过程。

## Reference product
- clinker, portland cement clinker, 52.5MPa: 1000
  熟料52.5MPa

## Inputs
All rows: article inperiodical
- hard coal, run-of-mine: 156.8
  原煤。其中基准方案的产品投入数据以清洁生产指标体系的III级基准值为基础。
- electricity, medium voltage: 230.4
  电力。其中基准方案的产品投入数据以清洁生产指标体系的III级基准值为基础。
- limestone, crushed, for mill: 1328
  石灰石。其中基准方案的产品投入数据以清洁生产指标体系的III级基准值为基础。
- tap water: 750
  工业用自来水。其中基准方案的产品投入数据以清洁生产指标体系的III级基准值为基础。
- transport, freight, lorry, unspecified: 0.0141
  公路运输。其中基准方案的产品投入数据以清洁生产指标体系的III级基准值为基础。
- iron ore: 184.5
  铁矿石。其中基准方案的产品投入数据以清洁生产指标体系的III级基准值为基础。
- clay: 180.9
  粘土。其中基准方案的产品投入数据以清洁生产指标体系的III级基准值为基础。

## Outputs
- carbon dioxide: 832; article inperiodical
  二氧化碳。环境排放主要以排污系数手册、文献调查数据为主。
- Nitrogen oxides: 1.67; article inperiodical
  氮氧化物。环境排放主要以排污系数手册、文献调查数据为主。
- sulfur dioxide: 0.21; article inperiodical
  二氧化硫。环境排放主要以排污系数手册、文献调查数据为主。

## Cut-off and completeness
数据不完整，只关注ECER政策目标相关的清单指标。

## Data selection and combination
调查国内水泥生产的相关文献，结合水泥行业清洁生产评价指标体系，以及排污系数手册，得到熟料生产、水泥研磨过程的清单数据。

## Data sources
- 何晓雪, 张璐, & 王洪涛. (2014). 基于生命周期节能减排评价方法的水泥行业清洁生产评价指标权重的计算. 化学工程与装备, 4, 208–211.
