# 地震预测 | 太原组石灰岩储层 | 微断层精细刻画技术

Dataset: ILCD process, Unit process, single operation
Geography: EEDS-NMG-CN
Reference year: 1987
Valid until: 2022
Classification: Materials production / Other mineralic materials
LCI method principle: Attributional
LCI method approaches: Consequential
Generated by: 康诗康, 908798159@qq.com
Review: Dependent internal review by Tiangong LCI Data Working Group
Amounts: no units in this file; such an amount is in the reference unit of its flow, which a separate flow dataset defines
copyright: false

## General comment
微断层精细刻画地震处理技术流程由3部分组成：①在层位约束下对原始地震资料进行构造导向滤波处理，并抑制背景噪声的干扰，突出断层断点； ②开展神经网络深度学习，得到深度学习相干体（断层）、曲率体（裂缝），建立从地震数据到微断层的非线性映射关系；③选择优势信息进行加权融合，实现隐蔽性小、微断层精细识别。

## Geography
鄂尔多斯盆地中东部太原组石灰岩

## Time period
20世纪80年代开始勘探

## Technology and included processes
地震处理采用“导向滤波＋人工智能＋关键地震信息融合”相结合的手段，断层预测结果具有更好的连续性、清晰的边界和更高的置信度。

## Inputs
- natural gas: 1.5e9; max 1.5e9; uniform; article inperiodical
  微断层精细刻画

## Data selection and combination
鄂尔多斯盆地太原组石灰岩天然气勘探始于 20 世纪 80 年代，勘探历程可大致分为 3 个阶段。初期勘探阶段为 1987—1999 年， 第二勘探阶段为 2000—2005 年，第三勘探阶段为 2019 年至今

## Data treatment and extrapolations
通过加大盆地中东部太原组石灰岩取心，证实太原组石灰岩发育生屑滩和生物丘有利相带，通过二次测井解释，重新复查气层井 300 余口，结合成藏条件分析， 认为太原组石灰岩具有优越的“三明治”成藏模式。

## Review details
Inventory: The internal review was done by several iteration steps concerning raw data validation, raw data documentation, representativity, completeness and consistency of modelling with regard to ISO 14040 and 14044.; Documentation: The review of the documentation was performed by Ecobilan and is in compliance with ISO 14040 and 14044. The data set documentation is correct in view of the appropriateness of the information provided. It includes all relevant information in view of data quality and scope of application of the respective LCI result.

## Data sources
- 刘新社;张涛;黄道军;董国栋;王康乐;付勋勋;赵小会;卢子兴;于洲;荆雪媛;张君莹; 鄂尔多斯盆地中东部太原组石灰岩天然气勘探新突破及勘探方向. 天然气工业 1–11 (2023).
