# 水泥生产|水泥, 普通硅酸盐水泥, 52.4MPa|湿法长窑|炼铁高炉矿渣

Dataset: ILCD process, Unit process, black box
Geography: CN
Reference year: 2001
Classification: Materials production / Other mineralic materials
Generated by: 杨思琪
Amounts: no units in this file; such an amount is in the reference unit of its flow, which a separate flow dataset defines
copyright: false

## General comment
湿法厂属于二级重点企业，工艺过程相对也比较成熟，主要生产过程包括泥浆制备和贮存、原料粉磨、料浆的制备、熟料煅烧等。

## Model description
研究范围界定为由原料进厂、原料预处理、生料粉磨、生料煅烧、熟料粉磨，直至水泥均化、储存为止。未包括矿山开采、运输过程、水泥包装等具体过程。

## Reference product
- cement, ordinary portland cement, 52.4MPa: 1000
  水泥平均标号524号

## Inputs
All rows: measured
- limestone, crushed, for mill: 1243.89
  石灰石
- clay: 129.923
  粘土
- iron, powder: 21.472
  铁粉
- gypsum (desulphurized): 44.3374
  石膏
- fluorspar, 97% purity: 3.00822
  萤石
- blast furnace slag: 88.8605
  原文献中标记为水渣（即炼铁高炉矿渣）。
- Water (fresh water): 1262.36
  新鲜水
- hard coal: 194.117
  标准煤。原始数据为75.742kt标准煤，这里换算为硬煤，换算公式为1kg硬煤=0.929kg标准煤。
- electricity, medium voltage: 399.572
  电力

## Outputs
- particles (> PM10): 5.69176; measured
  粉尘，未标明粒径，按PM>10处理。
- particles (> PM10): 0.0256521; measured
  烟尘，未标明粒径，按PM>10处理。
- sulfur dioxide: 0.0574254; measured
  二氧化硫
- Nitrogen oxides: 0.0162439; measured
  氮氧化物
- carbon dioxide: 1073.45
  二氧化碳

## Data treatment and extrapolations
CO2数据处理：根据1个功能单元的CO2排放数据，计算出生产419849 t水泥的CO2排放量。

## Data sources
- 狄向华. (2001). 材料环境协调性评价的标准流程方法研究 [硕士, 北京工业大学].
