# 污泥处理与处置|好氧发酵

Dataset: ILCD process, Unit process, single operation
Geography: QHD-HEB-CN
Classification: Materials production / Other mineralic materials
Generated by: 金思甜, 2331276@tongji.edu.cn
Review: Dependent internal review by 天工LCI数据工作小组
Amounts: no units in this file; such an amount is in the reference unit of its flow, which a separate flow dataset defines

## Reference product
- Sludge: 1000; input; estimated
  1t湿污泥( 含水率为 80% )

## Inputs
- Electricity: 103.68; calculated
- Diesel: 0.22; calculated

## Outputs
- ammonia: 0.0032
- hydrogen sulfide: 0.011
- carbon dioxide: 42; calculated

## Review details
清单： 内部审查通过几个迭代步骤完成，涉及原始数据验证、原始数据记录、代表性、完整性、与 ISO 14040 和 14044 有关的建模的一致性。

## Data sources
- 城镇污水处理厂污泥处理处置工艺生命周期评价
