# 硅矿石开采 ; 二氧化硅含量为98.02%~98.52%的硅石 ; 露天开采

Dataset: ILCD process, Unit process, single operation
Geography: GS-CN
Reference year: 2013
Classification: Materials production / Non-energetic raw materials
Functional unit: 1 kg solar grade multi-Si
LCI method principle: Attributional
LCI method approaches: Allocation
Generated by: 杨锦锋, yjfzfshn@163.com
Review: Dependent internal review by 天工LCI数据工作小组
Amounts: no units in this file; such an amount is in the reference unit of its flow, which a separate flow dataset defines
copyright: false

## General comment
多晶硅

## Geography
甘肃省硅矿开采企业较多，且开采技术较为先进，在国内硅矿开釆企业中具有较好的代表性

## Time period
文章发表

## Technology and included processes
企业主要生产工艺是利用小型潜孔钻机进行穿孔，采用中深孔多排微差爆破法进行矿石开采，对爆堆中较大块矿石进行粉碎，较小的矿石采用挖掘机，装入汽车运至临时堆场，在临时堆场进行破碎和选矿，最终将符合规格的桂石储存待售

## Reference product
- silicon,silicon: 9e7; article inperiodical
  硅矿石

## Inputs
- Water (fresh water): 1.0185e7; article inperiodical
  水
- Explosive: 5e6; article inperiodical
  炸药
- Gasoline: 36000; article inperiodical
  汽油、柴油
- electricity: 1.944e6; article inperiodical
  电能

## Outputs
All rows: article inperiodical
- carbon monoxide: 374364
  CO
- sulfur dioxide: 855690
  二氧化硫
- Nitrogen oxides: 615027
  氮氧化物
- hydrogen sulfide: 427845
  硫化氢
- ammonia: 227292
  氨气
- Dust (unspecified, from stack): 14727
  粉尘
- industrial waste (unspecified): 6000
  固体废弃物

## Deviations from the LCI method approaches
以太阳能级多晶硅为研究对象，运用 LCA的评价方法，定量计算国内普遍生产水平下，太阳能级多晶硅生命周期过程的资源、能源投入和环境排放值

## Data selection and combination
根据企业生产过程的数据资料收集整理

## Review details
清单： 内部审查通过几个迭代步骤完成，涉及原始数据验证、原始数据记录、代表性、完整性、与 ISO 14040 和 14044 有关的建模的一致性。

## Data sources
- 何洋. 太阳能级多晶硅的生命周期评价. (西南交通大学, 2013).
