# 水泥生产|水泥, 普通硅酸盐水泥|新型干法, 5000 t/d|纯低温余热发电技术|混合固废

Dataset: ILCD process, Unit process, black box
Geography: CN
Classification: Materials production / Other mineralic materials
Generated by: 杨思琪
Amounts: no units in this file; such an amount is in the reference unit of its flow, which a separate flow dataset defines
copyright: false

## General comment
配备有5000t/d新型干法水泥熟料生产线，采用先进的强化型悬浮预热器五级窑外分解技术以及立式原料磨、配有辊压机的大型球磨机等先进的水泥生产设备。案例采用了纯低温余热发电技术。来自于冷机的窑头废气用于加热AQC（Air Quenching Cooler）锅炉，来自于预热器的窑尾废气用于加热锅炉，通过高效余热锅炉将废气中的热能转化为过热蒸汽，推动蒸汽发电机组发电。

## Geography
东北两座水泥厂

## Model description
系统边界为水泥厂水泥生产系统。

## Reference product
- cement, ordinary portland cement: 1000
  水泥产品

## Inputs
All rows: measured
- limestone, crushed, for mill: 1150
  石灰石
- clay: 191.111
  粘土
- ash: 123.333
  粉煤灰
- copper slag: 30.6111
  铜矿渣
- gypsum (desulphurized): 70
  石膏
- blast furnace slag: 58.8889
  矿渣
- hard coal: 150.722
  烟煤。年耗煤用能=(2.713E+8)kg×(2.1502E+7)J/kg(平均低位热值)=(5.83E+15)J
- electricity, medium voltage: 290.6
  总耗电量。年耗电能=（1.453E+8）kWh×（3.60E+6）J/kWh=（5.23E+14）J。
- tap water: 983.516
  总水量

## Outputs
All rows: measured
- particles (> PM10): 0.441209
  粉尘，未标明粒径，按PM>10处理。
- nitrogen dioxide: 2.45604
  NO2
- sulfur dioxide: 0.653846
  SO2
- carbon dioxide: 409.341
  CO2
- electricity, medium voltage: 122.4
  年发电量。年发电能=（6.12E+7）kwh×（3.60E+6）J/kWh=（2.20E+14）J。在水泥熟料嫩烧过程中，从窑头冷机和窑尾预热器排出的废气中蕴含着大量的热量，其中400C以下的低温废气所含的热量占水泥熟料烧总耗热量的三分之一左右。余热发电技术通过回收这一部分的余热，可以节约大量的资源、能源，并且不会对环境产生二次污染，因此，余热发电技术已成为水泥行业的新兴技术，是实现其减污、降耗、增效以及可持续发展的有效途径。

## Data sources
- 邵帅. (2016). 基于Emergy和Em-LCA的水泥企业可持续发展水平评价 [硕士, 大连理工大学].
