# 电力生产 ; 电力 ; 火电（70.7%）+水电（7.3%）+核电（17.8%）+风电（0.9%）+太阳能发电（3.4%）

Dataset: ILCD process, Partly terminated system
Geography: ZJ-CN
Reference year: 2019
Classification: Energy carriers and technologies / Electricity
LCI method principle: Other
Generated by: 熊若熙, xiongrx0126@163.com
Owner: 天工LCI数据工作小组
Review: Dependent internal review by 天工LCI数据工作小组
Amounts: no units in this file; such an amount is in the reference unit of its flow, which a separate flow dataset defines
copyright: false
licenseType: Free of charge for all users and uses

## General comment
电力产生形式包括火力发电、水力发电、核能发电、风力发电和太阳能发电

## Time period
根据2019年能源统计年鉴数据计算

## Technical purpose
所述工业过程用于电力生产，包括火力发电、水力发电、核能发电、风力发电和太阳能发电等多种方法。能源组合中较大比例为火力发电（70.7%），其次为核电（17.8%）、水电（7.3%）、太阳能发电（3.4%）和风力发电（0.9%）。这种电力生产组合意在供普遍消费，为居民、商业、工业和运输部门通过电网供应能源。

## Reference product
- Electricity: 3.6; calculated

## Outputs
- carbon dioxide: 0.467; calculated
- sulfur dioxide: 8e-5; calculated
- Nitrogen oxides: 0.000123996; calculated
- Dust (unspecified, from stack): 1.5794e-5; calculated

## Data treatment and extrapolations
核算方法参考《企业温室气体排放核算方法与报告指南 发电设施》。不同形式发电量及燃料用量来自于《中国能源统计年鉴 2020》中的第三章（能源生产） 和第六章（地区能源平衡表）。用于计算二氧化碳排放因子的低位发热量、单位热值含碳量等燃料参数来自于《2019 年度中国区域电网二氧化碳基准线排放因子 OM 计算说明》、《企业温室气体排放核算方法与报告指南 发电设施》

## Use advice
在使用此电力生产生命周期评价(LCA)数据时，重要的是要考虑评估中的具体能源组合。碳排放因子是基于2019年能源统计年鉴数据计算的，用户应参照《企业温室气体排放核算方法与报告指南 发电设施》以确保数据的准确表述。应适当考虑《中国能源统计年鉴2020》（第三章和第六章）中列出的不同形式发电及其特定燃料消耗。使用《2019年度中国区域电网二氧化碳基准线排放因子OM计算说明》中的燃料参数来准确确定CO2排放因子。

## Review details
清单： 内部审查通过几个迭代步骤完成，涉及原始数据验证、原始数据记录、代表性、完整性、与 ISO 14040 和 14044 有关的建模的一致性。

## Data sources
- 熊若熙. 中国电力生产和消费二氧化碳与污染物排放因子核算. (清华大学, 2023).
