# 水泥生产|水泥, 粉煤灰硅酸盐水泥, 44.6MPa|干法预分解窑|粉煤灰

Dataset: ILCD process, Unit process, black box
Geography: CN
Reference year: 2001
Classification: Materials production / Other mineralic materials
Generated by: 杨思琪
Amounts: no units in this file; such an amount is in the reference unit of its flow, which a separate flow dataset defines
copyright: false

## General comment
干法预分解窑生产水泥。采用新型干法预分解技术，主要生产设施为一条日产熟料2000吨窑外分解生产线，设计能力为年产水泥70万吨工艺流程。

## Model description
研究范围界定为由原料进厂、原料预处理、生料粉磨、生料煅烧、熟料粉磨，直至水泥均化、储存为止。未包括矿山开采、运输过程、水泥包装等具体过程。

## Reference product
- cement, portland fly-ash cement, 44.6MPa: 1000
  水泥平均标号446号

## Inputs
All rows: measured
- limestone, crushed, for mill: 1199.08
  石灰石
- sandstone: 0.0082496
  砂岩
- iron, powder: 28.5861
  铁粉
- gypsum (desulphurized): 52.917
  石膏
- ash: 159.373
  粉煤灰
- Water (fresh water): 402.239
  新鲜水
- hard coal: 139.857
  标准煤。原始数据为93.882kt标准煤，这里换算为硬煤，换算公式为1kg硬煤=0.929kg标准煤。
- electricity, medium voltage: 396.406
  电力

## Outputs
- particles (> PM10): 0.0188322; measured
  粉尘，未标明粒径，按PM>10处理。
- particles (> PM10): 0.00844125; measured
  烟尘，未标明粒径，按PM>10处理。
- sulfur dioxide: 0.00930531; measured
  二氧化硫
- Nitrogen oxides: 0.0150381; measured
  氮氧化物
- carbon monoxide: 0.0135564; measured
  一氧化碳
- carbon dioxide: 886.733
  二氧化碳
- wastewater, unpolluted: 157.581; measured
  原文是工业废水（即水泥生产废水）。

## Data treatment and extrapolations
CO2数据处理：根据1个功能单元的CO2排放数据，计算出生产722168 t水泥的CO2排放量。

## Data sources
- 狄向华. (2001). 材料环境协调性评价的标准流程方法研究 [硕士, 北京工业大学].
