# 土壤修复;原位修复;多相抽提;施工准备;材料运输

Dataset: ILCD process, Unit process, single operation
Geography: KR
Reference year: 2011
Classification: Other Services / Repair and maintenance
Generated by: 张建宾, zhangjb@caep.org.cn
Owner: 天工LCI数据工作小组
Review: Dependent internal review by 天工LCI数据工作小组
Amounts: no units in this file; such an amount is in the reference unit of its flow, which a separate flow dataset defines
copyright: false
licenseType: Free of charge for all users and uses

## General comment
场地1000 m3 TPH污染土壤修复所需材料和药剂共计99.8吨，总运输距离30公里

## Technical purpose
该工业过程数据集描述了一种土壤修复技术，专门用于现场多相抽提处理。它适用于旨在清洁1000立方米总石油碳氢化合物（TPH）污染土壤的环境工程项目。该过程涉及施工现场的准备和必要材料与试剂的运输，总重99.8吨，往返距离30公里。

## Reference product
- Equipment and Materials Arriving on Site: 99800; measured

## Inputs
- transport in t*km: 2994; measured

## Use advice
在使用此数据进行生命周期评估时，用户必须考虑修复项目的具体背景，如当地土壤条件、污染物类型和监管要求。重要的是调整数据以包括运输排放、抽提过程的能源消耗，以及场地准备过程中任何可能使用的化学品。请注意，此数据集仅反映修复过程的操作阶段，用户可能需要用材料生产和修复后土地使用等上游和下游过程的数据来补充它。

## Review details
清单： 内部审查通过几个迭代步骤完成，涉及原始数据验证、原始数据记录、代表性、完整性、与 ISO 14040 和 14044 有关的建模的一致性。

## Data sources
- Seung-Woo Jeong, Sangwon Suh. Assessment of Environmental Impacts and CO2 Emissions from Soil Remediation Technologies using Life Cycle Assessment - Case Studies on SVE and Biopile Systems -. 大韓環境工學會誌
