# 电力生产 ; 电力 ; 火电（11.8%）+水电（62.8%）+风电（7.5%）+太阳能发电（17.9%）

Dataset: ILCD process, Partly terminated system
Geography: QH-CN
Reference year: 2019
Classification: Energy carriers and technologies / Electricity
LCI method principle: Other
Generated by: 熊若熙, xiongrx0126@163.com
Owner: 天工LCI数据工作小组
Review: Dependent internal review by 天工LCI数据工作小组
Amounts: no units in this file; such an amount is in the reference unit of its flow, which a separate flow dataset defines
copyright: false
licenseType: Free of charge for all users and uses

## General comment
电力产生形式包括火力发电、水力发电、风力发电和太阳能发电

## Time period
根据2019年能源统计年鉴数据计算

## Technical purpose
本电力生成数据集旨在用于需要电力混合比例的产品或服务的生命周期评估（LCA）应用。所产生的电力应用于各个行业，从工业制造到商业运营再到居民能源消费都有涉及。所描述的电力生成方式包含火电、水电、风电和太阳能发电，每种各自对整体电力混合比例有所贡献。

## Reference product
- Electricity: 3.6; calculated

## Outputs
- carbon dioxide: 0.097; calculated
- sulfur dioxide: 1.7e-5; calculated
- Nitrogen oxides: 2.6373e-5; calculated
- Dust (unspecified, from stack): 3.172e-6; calculated

## Data treatment and extrapolations
核算方法参考《企业温室气体排放核算方法与报告指南 发电设施》。不同形式发电量及燃料用量来自于《中国能源统计年鉴 2020》中的第三章（能源生产） 和第六章（地区能源平衡表）。用于计算二氧化碳排放因子的低位发热量、单位热值含碳量等燃料参数来自于《2019 年度中国区域电网二氧化碳基准线排放因子 OM 计算说明》、《企业温室气体排放核算方法与报告指南 发电设施》

## Use advice
在使用此数据集进行LCA时，用户应考虑所呈现的具体电力混合比例（火电11.8%，水电62.8%，风电7.5%，太阳能发电17.9%），以反映该地区的能源概况。碳排放因子根据2019年能源统计年鉴数据计算，核算方法遵循《企业温室气体排放核算方法与报告指南 发电设施》。在考虑多产出过程时，确保使用适当的分摊方法，并包括对地区能源生产和碳强度差异的考虑。方法论还必须包括使用低位发热量和单位热值含碳量等参数评估燃料消耗。

## Review details
清单： 内部审查通过几个迭代步骤完成，涉及原始数据验证、原始数据记录、代表性、完整性、与 ISO 14040 和 14044 有关的建模的一致性。

## Data sources
- 熊若熙. 中国电力生产和消费二氧化碳与污染物排放因子核算. (清华大学, 2023).
