# 运输到场的设备和材料;农田修复;原位钝化;设备运输

Dataset: ILCD process, Unit process, single operation
Geography: NJ-YN-CN
Reference year: 2023
Classification: Unit processes / Other Services / Repair and maintenance
Generated by: 肖萌, xiaomeng@mail
Owner: 天工LCI数据工作小组
Review: Dependent internal review by 天工LCI数据工作小组
Amounts: no units in this file; such an amount is in the reference unit of its flow, which a separate flow dataset defines
copyright: false
licenseType: Free of charge for all users and uses

## General comment
稳定化修复施工准备阶段，设备运输过程。

## Geography
云南省怒江州受铅锌矿污染某耕地土壤 污染修复工程

## Technical purpose
该数据集代表了运输到场的设备和材料所涉及的过程，这些设备和材料是为云南省怒江州16公顷受铅锌矿污染的耕地土壤进行修复的必需品。具体涵盖了原位钝化/稳定化技术修复准备阶段的过程。该过程的目的是确保农作物中的Cd和Pb浓度100%符合标凤且土壤中有效态的Cd和Pb浓度降低70%以上。

## Reference product
- Equipment and Materials Arriving on Site: 2050; measured
  运输到场的设备

## Inputs
- transport in t*km: 10.25; measured

## Use advice
在使用该数据进行生命周期评估时，确保分析范围包括农田修复所需的设备和材料的运输过程。该数据集应仅适用于涉及由铅锌矿业活动污染的土壤并采用原位固化/稳定化修复技术的情景。用户还应考虑修复过程指定的效果，包括在作物中实现Cd和Pb的标准浓度以及在土壤中显著降低这些金属的生物有效性。将此数据集用于其他类型的环境或工业过程时应谨慎，并可能需要额外的背景信息。

## Review details
清单： 内部审查通过几个迭代步骤完成，涉及原始数据验证、原始数据记录、代表性、完整性、与 ISO 14040 和 14044 有关的建模的一致性。

## Data sources
- 肖萌 et al. 农田污染钝化修复环境影响定量评估方法与案例分析. 中国环境科学 43, 3571–3581 (2023).
