# 染料制造 | 还原靛蓝

Dataset: ILCD process, Unit process, black box
Geography: CN
Reference year: 2021
Classification: Materials production / Other mineralic materials
Functional unit: the production of 1 ton indigo
Generated by: 玲俐, calinly@163.com
Review: Dependent internal review by Tiangong LCI Data Working Group
Amounts: no units in this file; such an amount is in the reference unit of its flow, which a separate flow dataset defines
copyright: false

## General comment
无流程图

## Geography
本手册仅用于《国民经济行业分类》（GB/T 4754-2017）中 2645 染料制造行业使用系数法核算工业污染物产生量和排放量的工业企 业。

## Time period
手册印发日期

## Reference product
- indigo: 1000; software or database
  靛蓝

## Outputs
All rows: software or database
- Exhaust gas: 124000
  工业废气量
- waste water - untreated: 80000
  工业废水
- chemical oxygen demand: 320
  化学需氧量
- nitrogen, total (excluding N2): 52
  总氮
- Ammonia Nitrogen: 26
  氨氮
- particles (PM10): 10
  颗粒物
- sulfur dioxide: 0.22
  二氧化硫
- nitrogen dioxide: 0.84
  氮氧化物
- industrial waste (unspecified): 40
  一般工业固废
- hazardous waste (unspecified): 10
  危险废物（染料废物HW12）

## Review details
Inventory: The internal review was done by several iteration steps concerning raw data validation, raw data documentation, representativity, completeness and consistency of modelling with regard to ISO 14040 and 14044.; Documentation: The review of the documentation was performed by Ecobilan and is in compliance with ISO 14040 and 14044. The data set documentation is correct in view of the appropriateness of the information provided. It includes all relevant information in view of data quality and scope of application of the respective LCI result.

## Data sources
- 生态环境部.2645染料制造行业系数手册.(2021).
