# 土壤修复;原位修复;电修复;长期监测;电;

Dataset: ILCD process, Unit process, single operation
Geography: KR
Reference year: 2014
Classification: Other Services / Repair and maintenance
Generated by: 浩骅, wangyp@caep.org.cn
Owner: 天工LCI数据工作小组
Review: Dependent internal review by 天工LCI数据工作小组
Amounts: no units in this file; such an amount is in the reference unit of its flow, which a separate flow dataset defines
copyright: false
licenseType: Free of charge for all users and uses

## General comment
系统监控

## Technology and included processes
场地中污染物的在线实时监测

## Technical purpose
该电动力修复过程适用于原位土壤去污染。 它适用于受重金属、放射性核素或有机污染物污染的场地，这些场地需要仔细控制的条件和系统监控。 在传统修复方法不可行或成本效益不高时通常采用。 在线监控功能允许实时调整并确保修复过程遵守环境安全标准。

## Reference product
- Electricity: 720; input; measured
  Equipment etc

## Outputs
- Greenhouse Gases: 90; measured
- Nitrogen oxides: 0.239; measured
- SOx: 0.326; measured

## Use advice
在使用该数据集进行生命周期评估时，重要的是要考虑修复现场的具体情况，包括污染物类型及其浓度。 用户应确保系统的边界包括所有相关的输入和输出，例如电动力过程的能耗和提取污染物的处理。 还应考虑修复后污染物的命运，因为它可能会影响整体环境效益。 应仔细关注系统监控数据，因为它可以直接告知修复过程的效率和效果。

## Review details
清单： 内部审查通过几个迭代步骤完成，涉及原始数据验证、原始数据记录、代表性、完整性、与 ISO 14040 和 14044 有关的建模的一致性。

## Data sources
- Environmental assessment on electrokinetic remediation of multimetal-contaminated site: a case study
