# 铜生产|阴极铜|闪速熔炼法|硫化矿

Dataset: ILCD process, Unit process, single operation
Geography: CN
Reference year: 2014
Classification: Materials production / Other mineralic materials
Functional unit: functional unit was defined as the production of 1 t of refined copper (i.e., cathode copper).
LCI method principle: Attributional
LCI method approaches: Allocation - market value
Generated by: 王鹏, 2867919560@qq.com
Review: Dependent internal review by 天工LCI数据工作小组
Amounts: no units in this file; such an amount is in the reference unit of its flow, which a separate flow dataset defines
copyright: false

## Geography
中国西部的一家铜厂

## Technology and included processes
火法冶金工艺包括采矿、选矿、冶炼、转炉、火法精炼（包括阳极铸造）和电解精炼，其中冶炼是关键阶段。我国冶炼厂主要有两种类型，即闪速冶炼厂和浴式冶炼厂

## Reference product
- copper ore/(0.81%): 128977; input; measured
  copper ore/(0.81%)需要补充

## Inputs
- copper ore/(1.02%): 0; measured
  copper ore/(1.02%)需要补充
- waste wire: 0; software or database
  waste wire需要补充
- Limestone: 0; software or database
  imestone
- quartz sand: 574.59; software or database
- oxygen: 1007.38; software or database
- Sulfuric acid(98%): 9.9; software or database
  sulfuric acid需要补充resourse
- steam: 600; software or database
  steam需要补充
- AC electricity: 14890.6; software or database
  AC electricity需要补充
- DC electricity: 849.6; software or database
  DC electricity需要补充
- hard coal: 1987.3; software or database
  coal
- coke: 0; software or database
  coke需要补充
- diesel oil: 11743.2; software or database
  diesel oil需要补充
- Heavy fuel oil (1.0 wt.% S): 9886.17; software or database
  heavy fuel oil

## Outputs
All rows: software or database
- carbon dioxide: 2092.26
  CO2
- sulfur oxides: 75.46
  SO2
- chemical oxygen demand: 56.79
  COD需要补充
- particles (PM2.5): 64.82
  dust需要补充
- Slag: 2187
  slag

## Deviations from the LCI method approaches
Eco-Indicator 99（EI99）是生命周期影响评估中广泛使用的一种以损害为导向的影响评估方法[22]。影响评估采用 EI99 方法（层级论视角）进行。

## Data selection and combination
铜生产库存数据主要来源于两个采用不同设备和工艺的工厂，辅以其他公开文献。部分辅助材料的库存数据来自PE-GaBi数据库。

## Data treatment and extrapolations
本研究中使用 GaBi 4 软件对铜生产过程进行建模并确定环境负担。

## Review details
清单： 内部审查通过几个迭代步骤完成，涉及原始数据验证、原始数据记录、代表性、完整性、与 ISO 14040 和 14044 有关的建模的一致性。

## Data sources
- Song, X., Yang, J., Lu, B., Li, B. & Zeng, G. Identification and assessment of environmental burdens of Chinese copper production from a life cycle perspective. Front. Environ. Sci. Eng. 8, 580–588 (2014).
