# 地下水异位修复;地下水抽出处理;地下水得到修复

Dataset: ILCD process, Unit process, single operation
Geography: CA
Reference year: 2007
Classification: Unit processes / Other Services / Repair and maintenance
Generated by: 王宁, wang_ning@caep.org.cn
Owner: 天工LCI数据工作小组
Review: Dependent internal review by 天工LCI数据工作小组
Amounts: no units in this file; such an amount is in the reference unit of its flow, which a separate flow dataset defines
copyright: false
licenseType: Free of charge for all users and uses

## General comment
消耗电力使抽提井和废水处置设施运行，地下水得到修复

## Geography
The contaminated area was located 600 m from a river shore in the northern part of the prov-ince of Quebec， Canada.

## Technology and included processes
使用电力驱动地下水抽出处理系统，使受污染的地下水得到修复

## Technical purpose
该过程描述了一种地下水异位修复方法，特别是用于净化地下水的“抽取和处理”技术。所述用途适用于地下水已被污染并需要修复的区域，如在加拿大魁北克省北部河岸600米处指定的位置。使用电力驱动的抽水井和废水处理设施来抽取受污染的水，处理去除污染物，然后将修复后的水返回到环境中或返回到地下水系统中。

## Reference product
- Remediated groundwater: 4.2705e6; estimated
  得到修复的地下水

## Inputs
- Electricity: 6.701e7; estimated
  消耗电力使抽出-处理系统运行
- contaminated groundwater: 4.2705e6; estimated
  受污染的地下水
- Extraction wel: 3; estimated
- Treatment facilities: 1; estimated

## Use advice
使用该数据集时，用户应考虑抽取和处理系统运行的具体条件，包括电力消耗和效率、地下水污染的性质和程度，以及与河流等敏感生态系统的接近度。通过验证修复技术是否适合存在的污染物类型和浓度，来确保技术适用性。同时，重要的是考虑修复效果可能由于季节或气候变化而产生的变化。此外，用户必须确保抽取水的处理和处置不会造成二次污染。

## Review details
清单： 内部审查通过几个迭代步骤完成，涉及原始数据验证、原始数据记录、代表性、完整性、与 ISO 14040 和 14044 有关的建模的一致性。

## Data sources
- Cadotte, M., Deschênes, L. & Samson, R. Selection of a remediation scenario for a diesel-contaminated site using LCA. Int J Life Cycle Assess 12, 239–251 (2007).
