# 土壤样品;样品检测;农田修复;原位钝化

Dataset: ILCD process, Unit process, single operation
Geography: NJ-YN-CN
Reference year: 2023
Classification: Unit processes / Other Services / Repair and maintenance
Generated by: 肖萌, xiaomeng@mail
Owner: 天工LCI数据工作小组
Review: Dependent internal review by 天工LCI数据工作小组
Amounts: no units in this file; such an amount is in the reference unit of its flow, which a separate flow dataset defines
copyright: false
licenseType: Free of charge for all users and uses

## General comment
稳定化修复的后端处置阶段，采用火焰原子吸收光谱法进行样品检测。

## Geography
云南省怒江州受铅锌矿污染某耕地土壤 污染修复工程

## Technical purpose
该数据集代表了通过原位固化/稳定化技术的农田修复工程。它适用于环境工程和土地修复，特别是对于被镉(Cd)和铅(Pb)等重金属污染的农业土壤。该过程旨在降低土壤中Cd和Pb的生物可用浓度，从而允许种植满足重金属含量健康标准的作物。

## Reference product
- Soil Sample: 1000; input; measured
  运输到场检测的样土

## Inputs
- calcium chloride: 0.5; measured
- Electricity: 2880; measured

## Outputs
- Soil complete test: 1000; measured
  检测完成的土壤

## Use advice
使用此数据集时，请确保正确考虑修复技术应用的具体环境，因为原位固化/稳定化的有效性可能因土壤成分、污染物特性和当地环境条件而异。如果用于比较研究，调整数据以反映区域差异。考虑到毒素减少的成功率，如指示（生物可用的Cd和Pb降低了70%以上），对于准确的影响评估至关重要。应保持与提供的测试方法（火焰原子吸收光谱法）的方法论一致性。

## Review details
清单： 内部审查通过几个迭代步骤完成，涉及原始数据验证、原始数据记录、代表性、完整性、与 ISO 14040 和 14044 有关的建模的一致性。

## Data sources
- 肖萌 et al. 农田污染钝化修复环境影响定量评估方法与案例分析. 中国环境科学 43, 3571–3581 (2023).
