# 水泥生产|水泥, 普通硅酸盐水泥, 42.5MPa|新型干法, 2000 t/d|粉煤灰

Dataset: ILCD process, Unit process, black box
Geography: CN
Reference year: 2005
Classification: Materials production / Other mineralic materials
Generated by: 杨思琪
Amounts: no units in this file; such an amount is in the reference unit of its flow, which a separate flow dataset defines
copyright: false

## General comment
两条2000t/d新型干法生产线。

## Time period
2005-2006年

## Model description
选取1吨28天抗压强度为42.5MPa的42.5#普通硅酸盐水泥所具有的使用性能为一个功能单元，32.5#水泥则按照1:1.25的比例换算为42.5#水泥，即看成1个单位的32.5#水泥与1.25个单位的42.5#水泥具有类似的环境影响。研究范围为生料制备、熟料煅烧及水泥粉磨，其余的则排除在系统边界之外，主要涉及的原料消耗有石灰石、粘土质原料、石膏等、消耗的能源有煤、电力及一定量的燃料油，并对外排放粉尘及二氧化碳、二氧化硫等环境污染性气体。

## Reference product
- cement, ordinary portland cement, 42.5MPa: 1000
  42.5普通硅酸盐水泥

## Inputs
All rows: measured
- limestone, crushed, for mill: 1270
  石灰石
- clay: 70.4
  粘土质原料
- iron, powder: 25.1
  铁质矫正原料
- gypsum (desulphurized): 57.9
  石膏
- ash: 139
  粉煤灰
- electricity, medium voltage: 388.8
  电力
- hard coal, run-of-mine: 134
  原煤
- heavy fuel oil: 0.0455
  原文献是燃料油（即重油）

## Outputs
- carbon dioxide: 798
  CO2。由于没有完善的监测机制和统计制度，调研数据表中某些企业在污染物排放上的填写存在很多不足，集中表现为二氧化碳、二氧化硫、氮氧化物及一氧化碳等排放数量缺失。对于生命周期评价而言，主要污染物排放物的数量缺失严重影响了评价的精度，因此需要采用一定的估算方法进行估算。采用当前通用的或是有关文献中关于水泥生产污染物排放的研究，对几种主要污染物的排放数量予以估算，以弥补调研数据的不足。
- Carbon monoxide, non-fossil: 4.17
  CO。由于没有完善的监测机制和统计制度，调研数据表中某些企业在污染物排放上的填写存在很多不足，集中表现为二氧化碳、二氧化硫、氮氧化物及一氧化碳等排放数量缺失。对于生命周期评价而言，主要污染物排放物的数量缺失严重影响了评价的精度，因此需要采用一定的估算方法进行估算。采用当前通用的或是有关文献中关于水泥生产污染物排放的研究，对几种主要污染物的排放数量予以估算，以弥补调研数据的不足。
- Nitrogen oxides: 1.34
  NOx。由于没有完善的监测机制和统计制度，调研数据表中某些企业在污染物排放上的填写存在很多不足，集中表现为二氧化碳、二氧化硫、氮氧化物及一氧化碳等排放数量缺失。对于生命周期评价而言，主要污染物排放物的数量缺失严重影响了评价的精度，因此需要采用一定的估算方法进行估算。采用当前通用的或是有关文献中关于水泥生产污染物排放的研究，对几种主要污染物的排放数量予以估算，以弥补调研数据的不足。
- sulfur dioxide: 1.25
  SO2。由于没有完善的监测机制和统计制度，调研数据表中某些企业在污染物排放上的填写存在很多不足，集中表现为二氧化碳、二氧化硫、氮氧化物及一氧化碳等排放数量缺失。对于生命周期评价而言，主要污染物排放物的数量缺失严重影响了评价的精度，因此需要采用一定的估算方法进行估算。采用当前通用的或是有关文献中关于水泥生产污染物排放的研究，对几种主要污染物的排放数量予以估算，以弥补调研数据的不足。
- particles (> PM10): 1.25; calculated
  粉尘，未标明粒径，按PM>10处理。

## Sampling procedure
主要调研2004~2007年其材料生产的环境负荷信息，将每年可考察的一条材料生产线或多条生产线作为研究对象。经统计，总计调研了115家建材企业，共234个研究对象。具体而言，水泥行业37家企业，其中新型干法企业32家，立窑企业5家，共96个研究对象。

## Data sources
- 张群. (2009). 材料生命周期分析网络数据库的研究与开发 [硕士, 北京工业大学].
