# 湿法制砂;砂石粗碎;颚式破碎技术

Dataset: ILCD process, Unit process, single operation
Geography: CS-HUN-CN
Reference year: 2020
Classification: Unit processes / Materials production / Other mineralic materials
Generated by: 崔航, Cuihang0716@163.com
Owner: 天工LCI数据工作小组
Review: Dependent internal review by 天工LCI数据工作小组
Amounts: no units in this file; such an amount is in the reference unit of its flow, which a separate flow dataset defines
copyright: false
licenseType: Free of charge for all users and uses

## General comment
一次破碎（颚式破碎）和筛分

## Technology and included processes
先给料，然后颚式破碎机破碎，破碎后进入振动筛筛分，得到的2~4cm碎石通过输送带进入成品堆场。其他部分筛后通过输送带送至圆锥破碎机（二次破碎）

## Technical purpose
该工业过程采用颚式破碎技术，主要应用于湿法制砂和砂石粗碎。通常产出2~4厘米的碎石，广泛用于建筑应用，包括混凝土搅拌、道路基层和其他基础设施工程。它也是骨料准备的第一步，供进一步加工或使用。

## Reference product
- gravel: 166667; measured
  经粗碎后产生的砂石

## Inputs
- gravel: 204400; measured
- Electricity: 792; measured
  振动给料筛、颚式破碎机s所使用的电力

## Outputs
- sand: 33333; measured
  经粗碎后产生的碎石
- Sludge: 1310; measured
  经粗碎后产生的污泥
- particles (> PM10),particles (> PM10): 8; measured
  生产过程中产生的粉尘颗粒

## Data selection and combination
湿法制砂的工艺过程及清单数据来自于该项目提供的经验数据

## Use advice
使用该工艺的生命周期评估数据时，需考虑湿法制砂生产的特定背景，包括任何区域性环境影响以及特定于颚式破碎技术的能源消耗。如果碎石进入二次破碎等后续加工流程，或因应用特殊要求影响其环境足迹，则需准确核算其排放和资源使用情况。确保项目中的经验数据反映当前的技术和实践，定期更新数据集以反映技术进步。

## Review details
清单： 内部审查通过几个迭代步骤完成，涉及原始数据验证、原始数据记录、代表性、完整性、与 ISO 14040 和 14044 有关的建模的一致性。

## Data sources
- 年产 60 万吨机制砂建设项目环评报告
