# 一个实木复合门的生产 | 用纤维板（稻草基）和水力发电

Dataset: ILCD process, Unit process, single operation
Geography: JS-CN
Reference year: 2023
Valid until: 2043
Classification: Materials production / Other mineralic materials
LCI method principle: Attributional
LCI method approaches: Allocation
Generated by: 谭惋月, tanwanyue@foxmail.com
Review: Dependent internal review by Tiangong LCI Data Working Group
Amounts: no units in this file; such an amount is in the reference unit of its flow, which a separate flow dataset defines
copyright: false

## General comment
中国木门市场的巨大规模导致了一系列必须解决的环境问题。本文利用生命周期评估（LCA）对实木复合门进行了评估。

## Geography
本研究的对象是住宅室内使用的实木复合门。我们在中国江苏省的一家大型木门制造商处进行了实地调研，以获取生产数据。

## Time period
木门的使用寿命从 5 年到 20 年不等，具体取决于生产商和当前情况。

## Technology and included processes
木门的整个生命周期分为三个阶段，分别进行分析，即生产阶段、使用阶段和报废阶段。本研究的生产阶段包括四个子阶段：原材料阶段、运输阶段、木工车间阶段和油漆车间阶段。木门保养所需的木蜡油、干燥所需的电力和一级运输成本是木门使用阶段的主要投入。本研究考虑了三种情况，以确定最佳处理方法：回收、100% 填埋和 100% 焚烧。
为了找到更环保的生产模式，普通密度板被纤维板（稻草基）取代，火力发电的供电方式被水力发电取代。

## Reference product
- solid wood composite door: 1; measured
  The functional unit is a solid wood composite door in the paper.

## Inputs
- medium density fiberboard: 0.047456; measured
  This is the input flow called common density boards in the paper.
- lumber core plywood: 12.51; measured
  This is the input flow called lumber core plywood in the paper.
- plywood: 0.02832; measured
  This is the input flow called Common plywood in the paper.
- Polyvinyl acetate: 1.2638; measured
  This is the input flow called Polyvinyl acetate (PVAc) in the paper.
- primer: 0.82; measured
  This is the input flow called Waterborne primer in the paper.
- Wood top-coat: 1.7; measured
  This is the input flow called Waterborne top-coat in the paper.
- wood veneer: 1.2; measured
  This is the input flow called Wood veneer in the paper.
- wood; 14.7 MJ/kg: 0.0103675; measured
  The "wood 14.7 MJ/kg" is selected here, which substitutes for the solid wood strips in the paper.
- corrugated board boxes: 5.74; measured
  The "corrugated board boxes" are selected here, which substitute for the Corrugated paper packaging in the paper.
- transport in t*km: 10.3245, 36.2248, 1.34 (3 entries); article inperiodical
- Electricity: 138.096, 0.52, 0.108 (3 entries); article inperiodical
- Water for industrial use: 1.0044; article inperiodical
  The "water for industrial use" is selected here, which substitutes for "Tap water" in the paper.
- wood wax oil: 20; measured
  This is the output flow called wood wax oil in the paper.
- landfill of wood products (OSB, particle board): 67.21; article inperiodical
  The landfill of wood products (OSB, particle board) is selected here, which substitutes for the landfill of wooden door in the paper.

## Data selection and combination
前景数据主要通过对一家大型木门工厂的实地调研获得，其余数据则通过环境影响评估报告、行业年鉴和科学文献获得。

## Review details
Inventory: The internal review was done by several iteration steps concerning raw data validation, raw data documentation, representativity, completeness and consistency of modelling with regard to ISO 14040 and 14044.; Documentation: The review of the documentation was performed by Ecobilan and is in compliance with ISO 14040 and 14044. The data set documentation is correct in view of the appropriateness of the information provided. It includes all relevant information in view of data quality and scope of application of the respective LCI result.

## Data sources
- Deng, N., Wang, J., Sun, J. & Cao, N. Life cycle assessment and optimization scenario of solid wood composite doors: A case study in the east of China. Science of The Total Environment 868, 161494 (2023).
