# 多晶硅铸锭 | 定向凝固法和硅片制造 | 多线切割

Dataset: ILCD process, Unit process, single operation
Geography: CN
Reference year: 2014
Classification: Materials production / Other mineralic materials
Functional unit: The functional unit selected for this paper is a 1 kWp
LCI method principle: Attributional
LCI method approaches: Allocation
Generated by: 杨锦锋, yjfzfshn@163.com
Review: Dependent internal review by Tiangong LCI Data Working Group
Amounts: no units in this file; such an amount is in the reference unit of its flow, which a separate flow dataset defines
copyright: false

## General comment
多晶硅

## Geography
对中国生产的单晶硅和多晶硅光伏系统进行生命周期评价

## Time period
文章发表

## Technology and included processes
国内大多采用的多晶硅锭的制造方法是定向凝
固法，硅片的制备多采用多线切割

## Reference product
- Multi-Si wafer: 1; article inperiodical
  多晶硅锭及硅片

## Inputs
All rows: article inperiodical
- Solar grade multi-Si: 2.74
  太阳能级硅
- Silicon carbide: 4.72
  碳化硅
- Quartz Crucible: 0.7
  石英坩埚
- Steel Wire,Cable: 2.67
  钢丝
- argon: 0.75
  氩气
- Polyethylene glycol: 4.2
  聚乙二醇
- Dipropylene glycol monomethyl ether: 0.54
  DMP
- electricity: 298.8
  电耗

## Outputs
All rows: article inperiodical
- carbon dioxide: 114
  CO2
- carbon monoxide: 0.15
  一氧化碳
- methane: 0.28
  甲烷
- Nitrogen oxides: 0.5
  氮氧化物
- sulfur dioxide: 0.83
  二氧化硫
- Dust (unspecified, from stack): 1.4
  粉尘
- Biochemical Oxygen Demand: 0.16
  生物需氧量
- chemical oxygen demand: 0.15
  化学需氧量
- dissolved organic carbon: 0.05
  DOC
- total organic carbon: 0.05
  TOC

## Deviations from the LCI method approaches
本文的研究目的是对中国生产的单晶硅和多晶硅光伏系统进行生命周期评价，分析废弃处理的方法和不同废弃处理方法对环境的影响

## Data selection and combination
数据方面，这里参考胡润青、刁周玮和Scholten等人的文章

## Review details
Inventory: The internal review was done by several iteration steps concerning raw data validation, raw data documentation, representativity, completeness and consistency of modelling with regard to ISO 14040 and 14044.; Documentation: The review of the documentation was performed by Ecobilan and is in compliance with ISO 14040 and 14044. The data set documentation is correct in view of the appropriateness of the information provided. It includes all relevant information in view of data quality and scope of application of the respective LCI result.

## Data sources
- 李鹞 & 于随然. 中国光伏系统的生命周期评价. 环境工程 32, 119–124 (2014).
