# 净化后尾气;土壤修复;原位热脱附;尾气及废水处理

Dataset: ILCD process, Unit process, black box
Geography: CN
Reference year: 2022
Classification: Unit processes / Other Services / Repair and maintenance
Generated by: 张今英, zhangjy@caep.org.cn
Owner: 天工LCI数据工作小组
Review: Dependent internal review by 天工LCI数据工作小组
Amounts: no units in this file; such an amount is in the reference unit of its flow, which a separate flow dataset defines
copyright: false
licenseType: Free of charge for all users and uses

## General comment
②废水废气处理，包括废水废气设备安装和运行。

## Technical purpose
该工业过程通过原位热脱附（ISTD）技术进行土壤修复。在脱附过程中产生的尾气需要进行净化，同时还需妥善处理和处置副产品废水。此外，该过程包括使用如混凝土和钢铁之类的机械设备和基础设施，运营过程需要包括燃料、电力和天然气在内的能源输入。它适用于旨在恢复受污染土壤的环境工程项目。

## Reference product
- Purified exhaust gas (produced by thermal desorption of 1 m3 soil): 1; missing unimportant
  文章中没有给出具体的废气和废水处置量，这里采用项目为单位计量

## Inputs
- natural gas,natural gas: 28800; measured
- Electricity: 2.016e6; measured
- Diesel: 8.906; measured
- Tap Water: 3477; measured
- Steel: 20367; measured
- Diesel,Diesel: 0.813; measured
- Exhaust gas: 1; missing unimportant
  文章中没有给出具体的废气和废水处置量，这里采用项目为单位计量
- waste water - untreated: 1; missing unimportant
  文章中没有给出具体的废气和废水处置量，这里采用项目为单位计量

## Outputs
- waste water - treated: 1; missing unimportant
  文章中没有给出具体的废气和废水处置量，这里采用项目为单位计量

## Use advice
在使用此数据集进行生命周期评估时，用户应确保系统边界包括废水和尾气处理设备的安装和运行。用户必须核算能源和材料的输入，特别是燃料、电力、天然气、混凝土和钢铁的使用，以及这些材料和设备的运输对环境的影响。为了准确评估，在ISTD过程期间潜在的排放及其处理的包含必须得到体现。该数据集特定于土壤污染存在的情况，不应泛化到无目标的修复应用。

## Review details
清单： 内部审查通过几个迭代步骤完成，涉及原始数据验证、原始数据记录、代表性、完整性、与 ISO 14040 和 14044 有关的建模的一致性。

## Data sources
- 刘文晓等.基于修复效果的污染土壤修复工程环境足迹分析[J].环境科学研究 35,2367-2377（2022）.
