# 干法制砂|砂石制砂|制砂机制砂

Dataset: ILCD process, Unit process, single operation
Geography: HAIN-CN
Reference year: 2020
Classification: Materials production / Other mineralic materials
Generated by: 崔航, Cuihang0716@163.com
Review: Dependent internal review by Tiangong LCI Data Working Group
Amounts: no units in this file; such an amount is in the reference unit of its flow, which a separate flow dataset defines
copyright: false

## General comment
皮带将粒径较小的碎石输送至制砂机内去生产粗砂

## Technology and included processes
皮带将中碎处理过的碎石输送至制砂机内，生产粗砂

## Reference product
- sand: 41870; measured

## Inputs
- gravel: 41870; measured
- electricity mix: 144; measured

## Outputs
- Fly ash: 3000; measured

## Review details
Inventory: The internal review was done by several iteration steps concerning raw data validation, raw data documentation, representativity, completeness and consistency of modelling with regard to ISO 14040 and 14044.; Documentation: The review of the documentation was performed by Ecobilan and is in compliance with ISO 14040 and 14044. The data set documentation is correct in view of the appropriateness of the information provided. It includes all relevant information in view of data quality and scope of application of the respective LCI result.

## Data sources
- 陵水海岛混凝土有限公司干法制砂项目
