# 土壤和地下水修复;原位;地下水抽出处理;得到修复的地下水

Dataset: ILCD process, Unit process, single operation
Geography: JS-CN
Reference year: 2022
Classification: Other Services / Repair and maintenance
Generated by: 王宁, wang_ning@caep.org.cn
Owner: 天工LCI数据工作小组
Review: Dependent internal review by 天工LCI数据工作小组
Amounts: no units in this file; such an amount is in the reference unit of its flow, which a separate flow dataset defines
copyright: false
licenseType: Free of charge for all users and uses

## General comment
地下水抽出处理系统的运行，使受污染的地下水得到修复

## Geography
a closed pesticide manufacturing plant located in Jiangsu Province, China.

## Technology and included processes
使用电力驱动地下水抽出处理系统的运行，使受污染的地下水得到修复

## Technical purpose
该数据集描述了位于中国江苏省已关闭的农药制造工厂的原位土壤和地下水修复工作中使用的地下水抽出处理系统。该系统旨在提取受污染的地下水，处理去除污染物，并确保工业场地的环境修复。

## Reference product
- Remediated groundwater: 1184.85; measured

## Inputs
- Electricity: 80293.6; measured
- contaminated groundwater: 1184.85; measured

## Use advice
使用此数据集时，需要考虑修复现场的特定环境背景。用户应将数据应用于类似工业场地的修复范围内，其中可实施外部地下水处理。应注意系统的运行参数、空间适用性、当地环境法规以及随时间变化的污染物特性，以确保准确的建模和评估。

## Review details
清单： 内部审查通过几个迭代步骤完成，涉及原始数据验证、原始数据记录、代表性、完整性、与 ISO 14040 和 14044 有关的建模的一致性。

## Data sources
- Ding, D. et al. Assessing the environmental impacts and costs of biochar and monitored natural attenuation for groundwater heavily contaminated with volatile organic compounds. Science of The Total Environment 846, 157316 (2022).
