# 水泥生产|水泥, 通用硅酸盐水泥|干法回转窑, 1000-2000 t/d|混合固废

Dataset: ILCD process, Unit process, black box
Geography: GS-CN
Classification: Materials production / Other mineralic materials
Generated by: 杨思琪
Amounts: no units in this file; such an amount is in the reference unit of its flow, which a separate flow dataset defines
copyright: false

## General comment
小型干法旋转窑（生产能力在1000吨至2000吨熟料/天之间）。
100％的水泥粉尘得到了回收利用。100％的废水在现场得到再利用。

## Geography
金昌水泥（集团）有限责任公司（中国甘肃）

## Model description
以生产1吨普通硅酸盐水泥作为功能单位，该种水泥在中国约占总产量的98%。
干法回转窑系统边界。通常考虑三个阶段，即原材料破碎、熟料生成和水泥磨。熟料生成阶段包括均化、预热和预分解以及在窑中的烧成。每个过程都考虑了原材料、能源消耗、道路运输、直接排放（即二氧化碳、二氧化硫、氮氧化物和颗粒物）和基础设施。

## Reference product
- cement, common portland cement: 1000
  普通硅酸盐水泥

## Inputs
All rows: measured
- calcium carbonate: 840
  石灰石
- gypsum: 71
  石膏
- water: 3730
  水
- sandstone: 76
  砂岩
- shale: 28
  页岩
- nickel smelter slag: 18
  镍渣
- blast furnace slag: 41
  高炉矿渣
- ash: 208
  粉煤灰
- hard coal, run-of-mine: 113
  煤炭
- electricity, medium voltage: 367.524
  电力

## Outputs
- carbon dioxide: 560; measured
  二氧化碳。CO2排放按照公式(Eq.)计算（Wu等，2006年）：E = 3.67a x k x Mcoal x Q + 0.38 x Mlimestone，其中E，a，k，Mcoal，Q和Mlimestone分别表示每吨水泥生产的CO2排放量，煤炭的碳氧化效率（0.93，国家发展和改革委员会，2011年），煤炭的碳排放因子（26.1 x 10-3，国家发展和改革委员会，2011年），每吨水泥生产所需的煤炭质量，煤炭的发热值，以及每吨水泥生产所需的石灰石质量。本研究中考虑的煤炭发热值为24.48 MJ/kg。
- electricity, medium voltage: 0.04; measured
  SO2。大气排放数据来自宏达水泥厂（中国云南）。
- Nitrogen oxides: 0.18; measured
  NOx。大气排放数据来自宏达水泥厂（中国云南）。
- particles (> PM10): 0.16; measured
  颗粒物，未标明粒径，按PM>10处理。大气排放数据来自宏达水泥厂（中国云南）。

## Data selection and combination
对于小规模生产情景，使用了来自中国甘肃省金昌水泥集团有限公司的数据。由于前者缺乏信息，因此直接大气排放数据来源于云南宏达水泥厂。

## Data sources
- Wei Chen, Jinglan Hong, & Changqing Xu. (2015). Pollutants generated by cement production in China, their impacts, and the potential for environmental improvement. JOURNAL OF CLEANER PRODUCTION, 103, 61–69.
