# 盆地模拟 | 烃源岩和原油样品 | 岩石评估热解、GC/GC-MS、镜质体反射率测量和盆地模拟

Dataset: ILCD process, Unit process, single operation
Geography: CN
Reference year: 2023
Classification: Materials production / Other mineralic materials
LCI method principle: Attributional
LCI method approaches: Consequential
Generated by: 康诗康, 908798159@qq.com
Review: Dependent internal review by Tiangong LCI Data Working Group
Amounts: no units in this file; such an amount is in the reference unit of its flow, which a separate flow dataset defines
copyright: false

## General comment
对岩石评估热解、通过GC/GC-MS、镜质体反射率测量和盆地模拟

## Geography
中国各地区

## Time period
文献发表时间

## Technology and included processes
使用分析技术，如岩石评估热解、GC/GC-MS、镜质体反射率测量和盆地模拟

## Reference product
- natural gas: 216000; max 216000; uniform; article inperiodical
  峰值60mW/m2

## Data selection and combination
结果表明，上白垩统（Donga组和Yogou组）和始新世Sokor-1组具有II/III型和III型干酪根的油气生成潜力。

## Review details
Inventory: The internal review was done by several iteration steps concerning raw data validation, raw data documentation, representativity, completeness and consistency of modelling with regard to ISO 14040 and 14044.; Documentation: The review of the documentation was performed by Ecobilan and is in compliance with ISO 14040 and 14044. The data set documentation is correct in view of the appropriateness of the information provided. It includes all relevant information in view of data quality and scope of application of the respective LCI result.

## Data sources
- Moussa, H. A., Bohari, A. D., Ahmed, K. S. & Harouna, M. Thermal maturity evolution and hydrocarbon generation in the Dibeilla oil field, Termit Basin, Eastern Niger: an organic geochemical and basin modeling approach. Arab J Geosci 16, 338 (2023).
