# 电力生产 ; 电力 ; 火电（84.8%）+水电（0.5%）+风电（9.5%）+太阳能发电（5.3%）

Dataset: ILCD process, Partly terminated system
Geography: HEB-CN
Reference year: 2019
Classification: Energy carriers and technologies / Electricity
LCI method principle: Other
Generated by: 熊若熙, xiongrx0126@163.com
Owner: 天工LCI数据工作小组
Review: Dependent internal review by 天工LCI数据工作小组
Amounts: no units in this file; such an amount is in the reference unit of its flow, which a separate flow dataset defines
copyright: false
licenseType: Free of charge for all users and uses

## General comment
电力产生形式包括火力发电、水力发电、风力发电和太阳能发电

## Time period
根据2019年能源统计年鉴数据计算

## Technical purpose
此数据集描述了包含火力发电（84.8%）、水力发电（0.5%）、风力发电（9.5%）以及太阳能发电（5.3%）的混合电力生产过程。通过这种混合方式生产的电力可用于服务住宅、商业、工业和交通运输等多种应用领域。电力生产过程可以包括大规模电网运营和较小的分布式能源资源。

## Reference product
- Electricity: 3.6; calculated

## Outputs
- carbon dioxide: 0.863; calculated
- sulfur dioxide: 0.000129; calculated
- Nitrogen oxides: 0.000220917; calculated
- Dust (unspecified, from stack): 3.2267e-5; calculated

## Data treatment and extrapolations
核算方法参考《企业温室气体排放核算方法与报告指南 发电设施》。不同形式发电量及燃料用量来自于《中国能源统计年鉴 2020》中的第三章（能源生产） 和第六章（地区能源平衡表）。用于计算二氧化碳排放因子的低位发热量、单位热值含碳量等燃料参数来自于《2019 年度中国区域电网二氧化碳基准线排放因子 OM 计算说明》、《企业温室气体排放核算方法与报告指南 发电设施》

## Use advice
在利用此数据集进行生命周期评估或计算碳足迹时，用户应考虑电力来源的具体组合，因为比例的不同会显著影响结果。为了精确计算，请使用基于2019年能源统计年鉴的碳排放因子以及《企业温室气体排放核算方法与报告指南 发电设施》中的核算方法。确保所选方法与地区能源平衡和特定形式的电力使用一致是非常重要的。还需关注方法论的更新或随时间变化的能源组合变化。

## Review details
清单： 内部审查通过几个迭代步骤完成，涉及原始数据验证、原始数据记录、代表性、完整性、与 ISO 14040 和 14044 有关的建模的一致性。

## Data sources
- 熊若熙. 中国电力生产和消费二氧化碳与污染物排放因子核算. (清华大学, 2023).
