# NCM电池湿法冶金术

Dataset: ILCD process, Unit process, single operation
Geography: CN
Reference year: 2018
Classification: Materials production / Metals and semimetals
Functional unit: using 1 kWh as the functionalunit
Generated by: 彭菲, pengfei24@email.ncu.edu.cn
Review: Dependent internal review by 天工LCI数据工作小组
Amounts: no units in this file; such an amount is in the reference unit of its flow, which a separate flow dataset defines
copyright: false

## General comment
首先，将EoL NCM电池拆解和破碎。然后将处理后的电池材料溶于酸碱溶液中，以萃取出部分有价值的金属元素。最后进行除杂和提纯得到Li(NixCoyMn1-x-y)O2。

## Reference product
- EoL NCM battery: 3.6; input; article inperiodical

## Inputs
All rows: article inperiodical
- Sulphuric acid: 9.54
- sodium hydroxide: 5.79
- Hydrogen peroxide (30%): 3.25
  过氧化氢生产混合物/DE
- Lithium carbonate: 0.39
  碳酸锂，生产混合物/CN
- Electricity: 11.83
- natural gas: 6.81, 6.81 (2 entries)

## Outputs
- carbon dioxide: 0.18; article inperiodical
- copper: 0.04; article inperiodical
- Ni-rich NMC: 2.63; article inperiodical
- aluminium: 0.14; article inperiodical

## Data selection and combination
The data come from multiple papers and are difficult to distinguish.

## Review details
清单： 内部审查通过几个迭代步骤完成，涉及原始数据验证、原始数据记录、代表性、完整性、与 ISO 14040 和 14044 有关的建模的一致性。

## Data sources
- Wang, Y. et al. Environmental impact assessment of second life and recycling for LiFePO4 power batteries in China. Journal of Environmental Management 314, 115083 (2022).
