# 电力生产 ; 电力 ; 火电（80.0%）+水电（12.2%）+风电（3.7%）+太阳能发电（4.1%）

Dataset: ILCD process, Partly terminated system
Geography: JX-CN
Reference year: 2019
Classification: Energy carriers and technologies / Electricity
LCI method principle: Other
Generated by: 熊若熙, xiongrx0126@163.com
Owner: 天工LCI数据工作小组
Review: Dependent internal review by 天工LCI数据工作小组
Amounts: no units in this file; such an amount is in the reference unit of its flow, which a separate flow dataset defines
copyright: false
licenseType: Free of charge for all users and uses

## General comment
电力产生形式包括火力发电、水力发电、风力发电和太阳能发电

## Time period
根据2019年能源统计年鉴数据计算

## Technical purpose
该数据集描述了以火力发电（80.0%）、水力发电（12.2%）、风力发电（3.7%）和太阳能发电（4.1%）为主要组成的电力生产混合，该混合电力可广泛应用于从居民电力供给到工业电力需求的各种场合。生产出来的电力可以供应包括家庭、商业、工业和农业等多个需要电力运行的部门。

## Reference product
- Electricity: 3.6; calculated

## Outputs
- carbon dioxide: 0.632; calculated
- sulfur dioxide: 0.000105; calculated
- Nitrogen oxides: 0.000169235; calculated
- Dust (unspecified, from stack): 2.1779e-5; calculated

## Data treatment and extrapolations
核算方法参考《企业温室气体排放核算方法与报告指南 发电设施》。不同形式发电量及燃料用量来自于《中国能源统计年鉴 2020》中的第三章（能源生产） 和第六章（地区能源平衡表）。用于计算二氧化碳排放因子的低位发热量、单位热值含碳量等燃料参数来自于《2019 年度中国区域电网二氧化碳基准线排放因子 OM 计算说明》、《企业温室气体排放核算方法与报告指南 发电设施》

## Use advice
在使用此数据集进行生命周期评估（LCA）时，用户应确保电力混合代表了与他们评估相关的区域和时间框架。提供的碳排放因子应谨慎解读，因为它们基于2019年能源统计年鉴的数据，并且可能不反映当前或未来的碳强度。在建模和报告时，用户应参考给出的方法论来源，特别是《企业温室气体排放核算方法与报告指南 发电设施》，并确保计算与当地核算实践和指南一致。

## Review details
清单： 内部审查通过几个迭代步骤完成，涉及原始数据验证、原始数据记录、代表性、完整性、与 ISO 14040 和 14044 有关的建模的一致性。

## Data sources
- 熊若熙. 中国电力生产和消费二氧化碳与污染物排放因子核算. (清华大学, 2023).
