# 涤棉生产;涤棉

Dataset: ILCD process, Unit process, black box
Geography: CN
Reference year: 2018
Classification: Unit processes / Materials production / Other materials
Generated by: 段颖凡, 1300925579@qq.com
Owner: 天工LCI数据工作小组
Review: Dependent internal review by 天工LCI数据工作小组
Amounts: no units in this file; such an amount is in the reference unit of its flow, which a separate flow dataset defines
copyright: false
licenseType: Free of charge for all users and uses

## General comment
包括棉花种植、纺织、印染、最终处置四个阶段。其中印染阶段生产环节较多，可进一步分为烧毛、退浆、丝光、前定型、轧染、热熔、还原、定型、预缩环节。假设其原材料均为皮棉，不考虑化纤生产过程的环境影响。

## Geography
中国是世界上最大的印染生产基地，但高速发展的同时也伴随着严重的环境问题。目前印染行业主要是通过企业的清洁生产审核，实施原辅材料低毒与低污染研究、废弃物的资源化、设备改造与更新、水与蒸汽的循环利用、生产工艺改进等针对某一特定环境问题的清洁生产方案来实现节能减排，而忽略了工业系统间的关联。

## Technical purpose
涤棉是聚酯和棉纤维混合物，由于其结合了强度、耐用性和舒适性的特点，被广泛应用于纺织业用于生产各种服装和家居装饰品。该材料包括棉花种植、纺纱、印染和最终处理等过程，这些过程对于生产具有所需特性的最终面料至关重要。

## Reference product
- Polyester Cotton: 2000; measured

## Inputs
- freshwater: 1e7; missing unimportant
  棉花种植环节
- Pesticide: 8.8; missing unimportant
  棉花种植环节
- Fertilizer: 3437.5; missing unimportant
  棉花种植环节
- Yarn: 101000; measured
  纺织环节
- freshwater: 24200; measured
  纺织环节
- Electricity: 20253.6; software or database
  纺织环节
- Crude coal: 10200; software or database
  纺织环节
- Electricity: 60.12; software or database
  印染烧毛环节
- freshwater: 1.207e6; measured
  印染退浆环节
- Electricity: 24827.8; software or database
  印染退浆环节
- Crude coal: 1.724e6; software or database
  印染退浆环节
- sodium hydroxide: 10000; measured
  印染退浆环节
- freshwater: 24000; measured
  印染丝光环节
- Electricity: 748.8; software or database
  印染丝光环节
- Crude coal: 20800; software or database
  印染丝光环节
- sodium hydroxide: 4000; measured
  印染丝光环节
- Electricity: 3103.2; software or database
  印染前定型环节
- Crude coal: 900; software or database
  印染前定型环节
- freshwater: 23800; measured
  印染轧染环节
- Electricity: 3257.28; software or database
  印染轧染环节
- Crude coal: 7000; software or database
  印染轧染环节
- Dye: 66; measured
  印染轧染环节
- Crude coal: 370; software or database
  印染热熔环节
- freshwater: 44700; measured
  印染还原环节
- Electricity: 631.44; software or database
  印染还原环节
- Crude coal: 15800; software or database
  印染还原环节
- Electricity: 1599.98; software or database
  印染定型环节
- Crude coal: 470; software or database
  印染定型环节
- freshwater: 1100; measured
  印染预缩环节
- Crude coal: 3300; software or database
  印染预缩环节

## Outputs
- Pesticide: 7; missing unimportant
  棉花种植环节
- Fertilizer: 2062.5; missing unimportant
  棉花种植环节
- particles (> PM10): 2040; measured
  纺织环节
- carbon dioxide (fossil): 26724; measured
  纺织环节
- sulfur dioxide: 86.7; measured
  纺织环节
- Nitrogen oxides: 75.5; measured
  纺织环节
- carbon dioxide (fossil): 300; measured
  印染烧毛环节
- particles (> PM10): 344800; measured
  印染退浆环节
- carbon dioxide (fossil): 4.517e6; measured
  印染退浆环节
- sulfur dioxide: 14700; measured
  印染退浆环节
- Nitrogen oxides: 12760; measured
  印染退浆环节
- waste water - untreated: 698650; measured
  印染退浆环节
- chemical oxygen demand: 282.8; measured
  印染退浆环节
- sodium hydroxide: 4.83e7; measured
  印染退浆环节
- Suspended solids, unspecified,Suspended solids, unspecified: 34.5; measured
  印染退浆环节
- particles (> PM10): 4200; measured
  印染丝光环节
- carbon dioxide (fossil): 54600; measured
  印染丝光环节
- sulfur dioxide: 177; measured
  印染丝光环节
- Nitrogen oxides: 154; measured
  印染丝光环节
- particles (> PM10): 180; measured
  印染前定型环节
- carbon dioxide (fossil): 2400; measured
  印染前定型环节
- sulfur dioxide: 7.8; measured
  印染前定型环节
- Nitrogen oxides: 6.8; measured
  印染前定型环节
- particles (> PM10): 1430; measured
  印染轧染环节
- carbon dioxide (fossil): 18700; measured
  印染轧染环节
- sulfur dioxide: 60; measured
  印染轧染环节
- Nitrogen oxides: 53; measured
  印染轧染环节
- particles (> PM10): 74; measured
  印染热熔环节
- carbon dioxide (fossil): 970; measured
  印染热熔环节
- sulfur dioxide: 3; measured
  印染热熔环节
- Nitrogen oxides: 2.7; measured
  印染热熔环节
- particles (> PM10): 3160; measured
  印染还原环节
- carbon dioxide (fossil): 41370; measured
  印染还原环节
- sulfur dioxide: 143; measured
  印染还原环节
- Nitrogen oxides: 117; measured
  印染还原环节
- waste water - untreated: 39500; measured
  印染还原环节
- chemical oxygen demand: 16.2; measured
  印染还原环节
- sodium hydroxide: 2.766e6; measured
  印染还原环节
- Suspended solids, unspecified,Suspended solids, unspecified: 2; measured
  印染还原环节
- particles (> PM10): 95; measured
  印染定型环节
- carbon dioxide (fossil): 1240; measured
  印染定型环节
- sulfur dioxide: 4; measured
  印染定型环节
- Nitrogen oxides: 3.5; measured
  印染定型环节
- particles (> PM10): 670; measured
  印染预缩环节
- carbon dioxide (fossil): 8730; measured
  印染预缩环节
- sulfur dioxide: 28; measured
  印染预缩环节
- Nitrogen oxides: 25; measured
  印染预缩环节
- carbon dioxide (fossil): 421; missing unimportant
  最终处置
- sulfur dioxide: 0.7; missing unimportant
  最终处置
- Nitrogen oxides: 0.4; missing unimportant
  最终处置
- methane (fossil): 13.2; missing unimportant
  最终处置
- mercury: 0.4; missing unimportant
  最终处置

## Use advice
在使用此数据集进行生命周期评估（LCA）时，应分别分析涤棉生产的每个阶段并考虑所涉及的具体工序，例如烧毛、退浆等。分析过程中，假定所有原材料均为皮棉，并排除合成纤维生产过程的环境影响。确保通过考虑所定义的系统边界并在确定环境影响时遵循标准化的LCA协议来保证方法论的一致性。

## Review details
清单： 内部审查通过几个迭代步骤完成，涉及原始数据验证、原始数据记录、代表性、完整性、与 ISO 14040 和 14044 有关的建模的一致性。

## Data sources
- 康宏. 基于LCA的棉印染生产过程改进设计研究. (大连理工大学, 2018).
