# 育肥猪生产 | 化肥生产

Dataset: ILCD process, Unit process, single operation
Geography: LN-CN
Reference year: 2010
Classification: Materials production / Other mineralic materials
Functional unit: The evaluation unit was 1000 fattening pigs
Generated by: 杨瑞, 1632707028@qq.com
Review: Dependent internal review by Tiangong LCI Data Working Group
Amounts: no units in this file; such an amount is in the reference unit of its flow, which a separate flow dataset defines
copyright: false

## General comment
辽宁省 2010 年玉米、大豆和小麦每公顷产量分 别为 5 497、2 763、4 933 kg。大豆饼折算成大豆的系 数为 1.19，麦麸折算成小麦的系数为 6.67。生产每 公顷玉米需施用氮（N）、磷（P2O5）、钾（K2O）肥（折纯） 分别为 153.9、11.9、2.7 kg，生产每公顷大豆需施用氮 （N）、磷（P2O5）、钾（K2O）肥（折纯）分别为 24.5、2.9、1.2 kg，生产每公顷小麦需施用氮（N）、磷（P2O5）、钾（K2O） 肥（折纯）分别为 136.2、19.1、2.3 kg。

## Geography
辽宁省 2010 年玉米、大豆和小麦每公顷产量分 别为 ···

## Time period
辽宁省2010年玉米、大豆和小麦每公顷产量分别为······

## Technology and included processes
评价内容包括：化肥生产过程中直接气体排放和耗电所产生的间接污染物排放

## Reference product
- pig: 1000
  1000头猪

## Inputs
- nitrogen: 10300; calculated
- phosphorus: 1060; calculated
  五氧化二磷
- potassium: 188; calculated
  氧化钾
- Electricity: 64080

## Outputs
All rows: measured
- carbon dioxide (fossil): 127881
- carbon monoxide: 72.83
- nitrogen, total (excluding N2): 492.21
  1氮氧化物
- sulfur oxides: 513.66
  1硫氧化物
- methane: 46.28

## Deviations from the LCI method approaches
本研究以辽宁省规模化育肥猪养殖场为对象，应 用 LCA 方法对育肥猪生产的环境影响进行评估

## Data selection and combination
本文数据来自辽宁省36家规模化育肥猪养殖场调查；并参照《辽宁统计年鉴》提供的相关数据计算出育 肥猪生产过程中全球变暖、环境酸化和富营养化的影 响潜力。

## Review details
Inventory: The internal review was done by several iteration steps concerning raw data validation, raw data documentation, representativity, completeness and consistency of modelling with regard to ISO 14040 and 14044.; Documentation: The review of the documentation was performed by Ecobilan and is in compliance with ISO 14040 and 14044. The data set documentation is correct in view of the appropriateness of the information provided. It includes all relevant information in view of data quality and scope of application of the respective LCI result.

## Data sources
- 刘鸣达, 赵妍, 刘显军, & 王耀晶. 辽宁省育肥猪生产环境影响的生命周期评价. 农业环境科学学报 31, 1250–1255 (2012).
