# 砖块生产 ;页岩空心砖生产 ;焙烧工艺

Dataset: ILCD process, Unit process, single operation
Geography: GZ-JX-CN
Reference year: 2020
Classification: Unit processes / Materials production / Other mineralic materials
Generated by: 王湘锦, r99rt4@163.com
Owner: 天工LCI数据工作小组
Review: Dependent internal review by 天工LCI数据工作小组
Amounts: no units in this file; such an amount is in the reference unit of its flow, which a separate flow dataset defines
copyright: false
licenseType: Free of charge for all users and uses

## General comment
传统页岩空心砖生产工艺

## Technical purpose
经焙烧工艺生产的空心页岩砖主要用于建筑行业。这些砖块通常用于建造具有隔热保温作用的中空设计的墙壁和结构以及其他考虑承重和隔热的各种建筑。

## Reference product
- shale hollow brick: 1000; measured

## Inputs
- brickbat aggregate: 1450; measured
- Electricity: 14.9472; measured
- freshwater: 0.02136; measured

## Outputs
All rows: measured
- fluorine: 0.022
- particles (> PM10),particles (> PM10): 0.218
- sulfur dioxide: 0.997
- Waste (solid): 49.85
- nitrogen monoxide: 0.111

## Deviations from the LCI method approaches
环境影响评估报告基于砖的年产量（8000万块砖），出于统计目的，数据已根据其中所述的尺寸规格进行转换，即每吨生产的砖

## Data selection and combination
采用根据《第一次全国污染源普查工业污染源产排污系数手册 第七分册》中 3131 烧结类砖瓦及建筑砌块制造业产排污系数表的相关数据。

## Sampling procedure
该环评报告的数据来源于工厂的实时数据

## Use advice
使用此数据集时，重要的是确保数据应用符合《第一次全国污染源普查工业污染源产排污系数手册》中第 3131 类别对烧结砖和建筑砌块生产排放系数的规定。此外，用户应注意，数据集基于年产量并已规范到每吨砖块生产。如果将此生命周期评估数据与其他数据集整合，确保单位和时间因素一致。

## Review details
清单： 内部审查通过几个迭代步骤完成，涉及原始数据验证、原始数据记录、代表性、完整性、与 ISO 14040 和 14044 有关的建模的一致性。

## Data sources
- 年产 8000 万块页岩标砖项目环评报告公示
