# 土壤修复;异位修复;生物堆;施工准备;基础设施建设

Dataset: ILCD process
Geography: KR
Classification: Other Services / Repair and maintenance
Generated by: 桑春晖, sangch@mail.bnu.edu.cn
Owner: 天工LCI数据工作小组
Review: Dependent internal review by 天工LCI数据工作小组
Amounts: no units in this file; such an amount is in the reference unit of its flow, which a separate flow dataset defines
licenseType: Free of charge for all users and uses

## General comment
场地内建设600 m2硬化防渗地面，用于场内临时生物堆修复

## Technical purpose
所述工艺包括在基础设施建设现场内建设600平方米的硬质防渗地面，用于异位的生物堆土壤修复。该生物堆修复方法用于处理受有机污染物污染的土壤，这种处理是在设计和工程化的临时平台上进行的。

## Reference product
- (unnamed flow): 600; article inperiodical

## Inputs
All rows: article inperiodical
- Diesel: 0.016
- gravel: 7.8
- sand: 60
- (unnamed flow): 58, 100 (2 entries)
- HDPE: 1.2
- polypropylene fibres (PP): 600

## Use advice
使用此数据集时，请考虑异位生物堆土壤修复的特定场景。确保考虑构建防渗表面和修复过程的临时性质的环境影响。该数据集与涉及在中等规模临时平台上修复有机污染土壤的项目相关，并应根据所涉及项目的规模和具体情况进行调整。

## Review details
清单： 内部审查通过几个迭代步骤完成，涉及原始数据验证、原始数据记录、代表性、完整性、与 ISO 14040 和 14044 有关的建模的一致性。
