# 铜基混合废物回收|铜渣精矿|矿渣浮选工艺|矿渣浮选

Dataset: ILCD process, Unit process, single operation
Geography: JX-CN
Reference year: 2020
Classification: Materials production / Other mineralic materials
Functional unit: We consider the functional unit of the recycling of copper-based mixed waste to be 1000 kg electrolytic copper.
LCI method principle: Attributional
LCI method approaches: Allocation - market value
Generated by: 王鹏, 2867919560@qq.com
Review: Dependent internal review by Tiangong LCI Data Working Group
Amounts: no units in this file; such an amount is in the reference unit of its flow, which a separate flow dataset defines
copyright: false

## Geography
典型案例是位于中国江西省的一家金属回收企业，

## Technology and included processes
渣浮选过程中，渣2浮选产生含铜量较高的二次渣，返回熔炼。

## Reference product
- Copper concentrates: 464.4; measured
  Copper slag concentrate 20% Cu需要补充

## Inputs
All rows: measured
- Copper-containing slag: 2932.7
  Copper-containing slag 1需要补充
- sodium sulfate: 1200
- transport in t*km,transport in t*km: 61.7119
  Transport
- turpentine: 0.6
  Turpentine
- Copper-containing slag: 2467.3
  Copper-containing slag 2(20%Cu）需要补充

## Outputs
- Tailings (deposited, hibernating in ground, non elementary flow): 4935.6; measured
  Tailings (deposited)

## Deviations from the LCI method approaches
使用LCA-ReCiPe 2016（Heijungs et al., 2017）表征和归一化方法（中点和端点方法），将生命周期清单转换为多个领域的影响分数。

## Data selection and combination
前台数据和后台数据。

## Data treatment and extrapolations
采用GaBi 9.0软件计算各种铜基混合废物回收工艺单位质量的库存、资源消耗和废物排放量。

## Review details
Inventory: The internal review was done by several iteration steps concerning raw data validation, raw data documentation, representativity, completeness and consistency of modelling with regard to ISO 14040 and 14044.; Documentation: The review of the documentation was performed by Ecobilan and is in compliance with ISO 14040 and 14044. The data set documentation is correct in view of the appropriateness of the information provided. It includes all relevant information in view of data quality and scope of application of the respective LCI result.

## Data sources
- Zhang, W. et al. Analyzing the environmental impact of copper-based mixed waste recycling-a LCA case study in China. Journal of Cleaner Production 284, 125256 (2021).
