# 牛奶生产 | 饲料原料生产阶段

Dataset: ILCD process, Unit process, single operation
Geography: HLJ-CN
Reference year: 2012
Classification: Materials production / Other mineralic materials
Functional unit: In this study, the functional unit was set to 1 ton FPCM (fat-protein corrected milk).
Generated by: 杨瑞, 1632707028@qq.com
Review: Dependent internal review by Tiangong LCI Data Working Group
Amounts: no units in this file; such an amount is in the reference unit of its flow, which a separate flow dataset defines
copyright: false

## General comment
包括化肥 生产、 玉米、 大豆、小麦和苜猜的种植、 麦鉄和豆粕生产

## Geography
本文采用LCA方法对黑龙江省奶牛场生产系统进行环境影响评估。

## Technology and included processes
奶牛的词料由全价料和粗词料两部分组成，在奶牛词料全价料中以玉 米 、豆粕和麦麸为主， 因此就不考虑其他组成成分。 饲料原料生产阶段主要包括化肥生产阶 段 、农作物种植阶段和豆和、麦麸加工阶段。

## Reference product
- milk: 1000; measured
  FPCM（脂肪-蛋白校正奶）

## Outputs
All rows: measured
- nitrous oxide: 0.87297
- carbon monoxide: 0.17737
- nitrogen, total (excluding N2): 2.72178
  1氮氧化物
- carbon dioxide: 415.628
- sulfur oxides: 1.23076
  1硫氧化物
- ammonia: 1.80353
- nitrogen, total (excluding N2): 0.98011
  三氧化氮

## Review details
Inventory: The internal review was done by several iteration steps concerning raw data validation, raw data documentation, representativity, completeness and consistency of modelling with regard to ISO 14040 and 14044.; Documentation: The review of the documentation was performed by Ecobilan and is in compliance with ISO 14040 and 14044. The data set documentation is correct in view of the appropriateness of the information provided. It includes all relevant information in view of data quality and scope of application of the respective LCI result.

## Data sources
- 曹正纲. 黑龙江省奶牛场生命周期评价. (东北农业大学, 2012).
