# 太阳能级多晶硅生产 ; 高纯太阳能级多晶 99.9999%以上 ; 改良西门子法

Dataset: ILCD process, Unit process, single operation
Geography: CN
Reference year: 2014
Classification: Energy carriers and technologies / Other non-renewable fuels
Functional unit: The functional unit selected for this paper is a 1 kWp
LCI method principle: Attributional
LCI method approaches: Allocation
Generated by: 杨锦锋, yjfzfshn@163.com
Owner: 天工LCI数据工作小组
Review: Dependent internal review by 天工LCI数据工作小组
Amounts: no units in this file; such an amount is in the reference unit of its flow, which a separate flow dataset defines
copyright: false
licenseType: Free of charge for all users and uses

## General comment
多晶硅

## Geography
对中国生产的单晶硅和多晶硅光伏系统进行生命周期评价

## Time period
文章发表

## Technology and included processes
改良西门子法

## Reference product
- Solar grade multi-Si: 1; article inperiodical
  太阳能级硅

## Inputs
All rows: article inperiodical
- Metallurgical silicon: 1.4
  工业硅
- Hydrogen: 0.133
  氢气
- chlorine: 1.4
  氯气
- Sodium hydroxide: 0.67
  氢氧化钠
- electricity: 432
  电耗

## Outputs
All rows: article inperiodical
- carbon dioxide: 110
  CO2
- carbon monoxide: 0.28
  一氧化碳
- methane: 0.309
  甲烷
- nitrogen dioxide: 0.766
  氮氧化物
- sulfur dioxide: 1.37
  二氧化硫
- Dust (unspecified, from stack): 2
  粉尘
- Biochemical Oxygen Demand: 0.02
  生物需氧量
- chemical oxygen demand: 0.02
  化学需氧量
- dissolved organic carbon: 0.006
  DOC
- total organic carbon: 0.006
  TOC

## Deviations from the LCI method approaches
本文的研究目的是对中国生产的单晶硅和多晶硅光伏系统进行生命周期评价，分析废弃处理的方法和不同废弃处理方法对环境的影响

## Data selection and combination
物质输入方面，参考胡润青、刁周玮和傅银银的数据

## Review details
清单： 内部审查通过几个迭代步骤完成，涉及原始数据验证、原始数据记录、代表性、完整性、与 ISO 14040 和 14044 有关的建模的一致性。

## Data sources
- 李鹞 & 于随然. 中国光伏系统的生命周期评价. 环境工程 32, 119–124 (2014).
