# 生料制备;生料;新型干法, >4000 t/d;二次固废, 粉尘回收

Dataset: ILCD process, Unit process, single operation
Geography: CN
Reference year: 2020
Classification: Materials production / Non-energetic raw materials
Generated by: 杨思琪, ysqsophia@gmail.com
Owner: 天工LCI数据工作小组
Review: Dependent internal review by 天工LCI数据工作小组
Amounts: no units in this file; such an amount is in the reference unit of its flow, which a separate flow dataset defines
copyright: false
licenseType: Free of charge for all users and uses

## General comment
新型干法在水泥工业工艺中市场份额占比较大。二次固废复合水泥生料。生料制备过程污染物为颗粒物。

## Technical purpose
该工业数据集旨在用于超过每天4000吨的水泥工业新型干法的生命周期评估（LCA）。它描述了使用二次固废和粉尘回收技术的生料制备过程，并确保了颗粒物污染得到考量。这些数据对于生产高质量的P·O 42.5型水泥熟料至关重要，反映了最新的工业实践和清洁生产标准。

## Model description
以 P·O 42.5 型水泥熟料为研究对象，功能单位与基准流为生产 1.00 吨水泥熟料，基准年为 2020 年。系统边界为生料制备（原料开采、原料预处理及均化、生料粉磨和生料均化）单元过程，实景过程范围从原料预处理及配料到生料均化为止。

## Reference product
- raw meal: 1000
  生料

## Inputs
- calcium carbonate: 782.152
  石灰石
- shale: 141.354
  页岩
- sandstone: 61.3616
  砂岩
- blast furnace dust, for recovery: 15.1322
  原文是二次固废，指粉尘回收。袋式收尘器收集到的粉尘经返料系统全部返回生料均化阶段，工艺产出固废可有效循环利用。
- electricity, medium voltage: 49.9778
  电力。电力由电厂输送。

## Outputs
- particles (> PM10): 0.00794092
  颗粒物。袋式收尘器收集到的粉尘经返料系统全部返回生料均化阶段，工艺产出固废可有效循环利用。未标明粒径，按PM>10处理。

## Deviations from the LCI method approaches
石灰石开采、页岩开采、砂岩开采、铁粉生产、煤开采、电力和自来水生产以及直接排放污染物等数据均来自 CLCD-China-ECER 0.8 数据库中的数据。

## Data selection and combination
除CO2外，其他数据来源于高安红狮、江西德安万年青等企业报告、水泥行业清洁生产评价指标体系及水泥熟料研究论文等。

## Use advice
用户应遵循CLCD原则使用此数据，并且当原料重量小于产品重量的1%时忽略其上游生产数据。特别注意作为熟料原料使用的二次固废，由于其废物性质，可以忽略上游数据。用户应意识到数据库匹配可能引起的不确定性，并通过分析公式方法评估不确定性，同时考虑在预定环境影响范围内的排放，从而推导出水泥熟料生产的LCA结果。

## Review details
清单： 内部审查通过几个迭代步骤完成，涉及原始数据验证、原始数据记录、代表性、完整性、与 ISO 14040 和 14044 有关的建模的一致性。

## Data sources
- 陆柳鲜. (2022). 江西省多源有色冶炼固废资源化过程生命周期评价研究 [硕士, 江西理工大学].
