# 粗合成气生产 | 粗合成气 | 煤制粗合成气路线 | 煤

Dataset: ILCD process, Unit process, black box
Geography: ZJ-GD-CN
Reference year: 2018
Classification: Materials production / Other mineralic materials
Functional unit: A functional unit is defined as 14.64 ton of crude syngas product
LCI method principle: Attributional
LCI method approaches: Allocation - mass
Generated by: 任亚楠, renyn15@tsinghua.org.cn
Review: Dependent internal review by Tiangong LCI Data Working Group
Amounts: no units in this file; such an amount is in the reference unit of its flow, which a separate flow dataset defines
copyright: false

## General comment
ID14丙烯生产|丙烯|煤制烯烃路线|煤|下属过程2

## Geography
催化裂化路线的案例工厂来自中国石化湛江东兴石油化工有限公司。企业位于广东省湛江市，其催化裂化制烯烃工艺建于2018年，丙烯年产能11.6万吨。

## Time period
工艺建于2018年

## Reference product
- Crude Syngas: 14640; measured
  粗合成气

## Inputs
All rows: measured
- brown coal; 11.9 MJ/kg: 6950
  碎煤
- oxygen: 4690
  氧气
- Wollastonite: 700
  硅灰石
- sodium hydroxide: 2.54253
  烧碱
- hydrogen chloride gas: 3.66245
  盐酸
- nitrogen: 1462.86
  氮气
- natural gas: 296.01
  燃料气
- process steam: 580
  蒸汽
- Water (fresh water): 11240
  新鲜水
- electricity mix: 1759.68
  电

## Outputs
All rows: measured
- carbon dioxide: 3360
  CO2
- carbon monoxide: 1.16763
  CO
- methanol: 0.03951
  甲醇
- nitrous oxide: 0.18318
  NOx
- Dust (unspecified, from stack): 0.13835
  颗粒物
- total dissolved solids: 6.59627
  TDS
- chemical oxygen demand: 0.3042
  COD
- biological oxygen demand: 0.2028
  BOD5
- Suspended solids, unspecified: 0.0507
  SS
- ammonia: 0.2028
  NH3-N
- chloride: 1.12552
  氯离子

## Data selection and combination
丙烯生产工艺详细的投入产出数据来自企业公开的环境影响评价报告，包括原料和辅料投入、能源和资源消耗，以及废气、废水和固体废物的排放。

## Review details
Inventory: The internal review was done by several iteration steps concerning raw data validation, raw data documentation, representativity, completeness and consistency of modelling with regard to ISO 14040 and 14044.; Documentation: The review of the documentation was performed by Ecobilan and is in compliance with ISO 14040 and 14044. The data set documentation is correct in view of the appropriateness of the information provided. It includes all relevant information in view of data quality and scope of application of the respective LCI result.

## Data sources
- 吕琳. 丙烯产品环境负荷及温室气体减排的碳税政策. (大连理工大学, 2022).
