# 水泥生产|水泥, 粉煤灰硅酸盐水泥, 52.5MPa|干法回转窑

Dataset: ILCD process, Unit process, black box
Geography: BJ-CN
Classification: Materials production / Other mineralic materials
Generated by: 杨思琪
Amounts: no units in this file; such an amount is in the reference unit of its flow, which a separate flow dataset defines
copyright: false

## General comment
考虑了100％水泥窑尘回收技术的干法回转窑方案。

## Model description
选择管理1吨硅酸盐粉煤灰水泥（P·F 52.5）。
考虑了采用100%水泥窑尘回收技术的干法回转窑场景。每个场景的基础设施过程、原材料到水泥生产现场的公路运输、直接排放、污水处理、原材料和能源生产以及从干法回转窑场景中回收电力的过程均包括在内。

## Reference product
- cement, portland fly-ash cement, 52.5MPa: 1000
  硅酸盐水泥P.F52.5

## Inputs
All rows: article inperiodical
- limestone, crushed, for mill: 1160
  石灰石
- hard coal: 111.73
  烟煤
- iron, powder: 1.7
  铁粉
- gypsum (desulphurized): 50
  石膏
- ash: 170
  煤灰，即粉煤灰。
- sandstone: 6.1
  砂岩
- electricity, medium voltage: 372.204
  电力
- Water (fresh water): 180
  淡水消耗
- crude oil; 42.3 MJ/kg: 0.35
  油

## Outputs
All rows: article inperiodical
- sulfur dioxide: 0.004
  SO2
- hydrogen chloride: 0.000436
  HCI
- carbon dioxide: 810
  CO2
- hydrogen fluoride: 0.00047
  HF
- Nitrogen oxides: 1.88
  NOx
- zinc: 0.00015
  Zn
- arsenic: 5.1e-6
  As
- nickel: 5e-5
  Ni
- cadmium: 8.7e-5
  Cd
- lead: 0.00012
  Pb
- mercury: 2.2e-6
  Hg
- chromium: 3.4e-5
  Cr
- copper: 3.4e-6
  Cu
- particles (> PM10): 0.012
  颗粒，未标明粒径，按PM>10处理。

## Data selection and combination
尽可能使用了中国的数据，但在中国数据不可得时，使用了欧洲的数据和相关背景数据（Ecoinvent中心，2007年）。基于中国数据，使用了中国北京水泥生产基地的水泥生产过程（包括能源、水和原材料消耗、直接排放）的年平均监测数据（http://www.jiancai.hk/news/show/265/）。
北京水泥生产现场普通水泥重金属气体排放数据来自报告(2007)。

## Sampling procedure
北京水泥生产基地的实际年产量约为200万吨。

## Data sources
- Jinglan Hong & Xiangzhi Li. (2011). Environmental assessment of sewage sludge as secondary raw material in cement production – A case study in China. Waste Management 31, 1364–1371.
