# 再生铜、原生铜生产|再生铜|收集运输、机械加工（分选拆解、回收）、二次冶炼精炼|废铜

Dataset: ILCD process, Unit process, single operation
Geography: CN
Reference year: 2017
Classification: Materials production / Other mineralic materials
Functional unit: the functional unit is 1 kg secondary copper produced from six types of waste streams in China.
LCI method principle: Attributional
LCI method approaches: Allocation - market value
Generated by: 王鹏, 2867919560@qq.com
Review: Dependent internal review by Tiangong LCI Data Working Group
Amounts: no units in this file; such an amount is in the reference unit of its flow, which a separate flow dataset defines
copyright: false

## Geography
描述了中国历史（2005-2017）铜废物管理和再生铜生产

## Time period
描述了中国历史（2005-2017）铜废物管理和再生铜生产，

## Technology and included processes
再生铜是由上述EoL废料（旧废料，包括进口废料）和铜产品制造过程中产生的新废料生产的。

## Reference product
- copper: 0.92; software or database
  Secondary copper

## Inputs
All rows: software or database
- process steam: 1.58
  steam, in chemical industry_steam production, in chemical industry
- silica sand: 0.0619
  silica sand需要补充
- Lime: 0.0732
  lime
- Light fuel oil: 0.0675
  light fuel oil
- Hard coal, at consumer EU-27: 0.154
  hard coal
- oxygen: 0.0905
- water: 1.16
  tap water
- copper scrap: 1
  copper scrap需要补充
- Electricity: 0.407
  electricity

## Outputs
All rows: software or database
- antimony: 3e-6
  Antimony
- carbon monoxide: 0.002
  Carbon monoxide
- nitrogen dioxide: 0.001
  Nitrogen oxides
- sulfur dioxide: 0.003
  Sulfur dioxide
- zinc: 0.000375
- water: 0.000176

## Deviations from the LCI method approaches
环境影响采用CMLCA 6.0软件进行。

## Data selection and combination
采用库存驱动的 MFA 方法探索了中国历史上报废 (EoL) 铜产品产生的铜废物，该方法根据含铜产品的使用库存和使用寿命进行估算。

## Data treatment and extrapolations
动态 MFA 和前瞻性 LCA 方法相结合，对铜库存流量动态进行建模，

## Review details
Inventory: The internal review was done by several iteration steps concerning raw data validation, raw data documentation, representativity, completeness and consistency of modelling with regard to ISO 14040 and 14044.; Documentation: The review of the documentation was performed by Ecobilan and is in compliance with ISO 14040 and 14044. The data set documentation is correct in view of the appropriateness of the information provided. It includes all relevant information in view of data quality and scope of application of the respective LCI result.

## Data sources
- Dong, D. et al. Assessing China’s potential for reducing primary copper demand and associated environmental impacts in the context of energy transition and “Zero waste” policies. Waste Management 144, 454–467 (2022).
