# 土壤修复;原位修复;电修复;修复调查;聚乙烯;

Dataset: ILCD process, Unit process, single operation
Geography: KR
Reference year: 2021
Classification: Other Services / Repair and maintenance
Generated by: 浩骅, wangyp@caep.org.cn
Owner: 天工LCI数据工作小组
Review: Dependent internal review by 天工LCI数据工作小组
Amounts: no units in this file; such an amount is in the reference unit of its flow, which a separate flow dataset defines
copyright: false
licenseType: Free of charge for all users and uses

## General comment
现场土壤质量取样调查，包含钻孔、岩柱运输、取样等过程

## Technical purpose
该数据集代表了原位电动力修复技术作为土壤去污的应用。它特别适用于通过应用电流使离子和流体通过土壤从而帮助去除污染物的现场污染土壤处理。当传统的修复方法效果不佳或不切实际时，此过程适用于这些场地。

## Reference product
- Polyethylene: 1.39; input; measured
  Manual sampling equipment (liner)

## Inputs
- Diesel: 0.0386; measured
  Vehicle (five times, 19.3 km, 10 km/1 L)

## Outputs
- Greenhouse Gases: 320; measured
- Nitrogen oxides: 0.0438; measured
- SOx: 0.000789; measured
- particles (> PM10): 0.00179; measured

## Use advice
该数据集的用户必须考虑特定的现场条件，因为电动力修复的效率高度依赖于土壤类型、pH值、污染物属性和水分含量等因素。用户调整数据以反映现场的独特条件并确保修复过程中的能耗和潜在的二次污染非常重要。此外，在生命周期评估中应考虑修复过程对场地的影响程度。

## Review details
清单： 内部审查通过几个迭代步骤完成，涉及原始数据验证、原始数据记录、代表性、完整性、与 ISO 14040 和 14044 有关的建模的一致性。

## Data sources
- Environmental assessment on electrokinetic remediation of multimetal-contaminated site: a case study
