# 熟料生产|熟料, 硅酸盐水泥熟料|新型干法, ≥4000 t/d|铜尾矿 16%

Dataset: ILCD process, Unit process, single operation
Geography: CN
Reference year: 2019
Classification: Materials production / Other mineralic materials
Generated by: 杨思琪
Amounts: no units in this file; such an amount is in the reference unit of its flow, which a separate flow dataset defines
copyright: false

## General comment
新型干法生产水泥熟料。铜尾矿含量为16%。末端治理：袋式除尘器，效率 85%。

## Model description
LCA 系统边界为熟料煅烧单元过程。

## Reference product
- clinker, portland cement clinker: 1000
  铜尾矿复合水泥熟料

## Inputs
- raw meal: 1420; measured
  铜尾矿复合水泥生料。实景过程数据。
- tap water: 300; software or database
  自来水。上游数据来源：CLCD-China-ECER 0.8.1。
- coal, powder: 123.6; software or database
  煤粉。上游数据来源：CLCD-China-ECER 0.8.1。
- electricity, medium voltage: 99.396; software or database
  电力。上游数据来源：CLCD-China-ECER 0.8.1。

## Outputs
All rows: measured
- mercury: 6e-5
  汞[排放到大气]
- carbon dioxide (fossil): 0.03964
  氨气[排放到大气]
- particles (> PM10): 0.326
  总颗粒物[排放到大气]，未标明粒径，按PM>10处理。
- fluorene: 0.002551
  氟[排放到大气]
- chemical oxygen demand: 6e-5
  化学需氧量[排放到水体]
- carbon dioxide (fossil): 724.2
  二氧化碳（化石源）[排放到大气]
- Nitrogen oxides: 1.557
  氮氧化物[排放到大气]
- Clean gas: 3927
  废气[排放到大气]
- wastewater, unpolluted: 2
  废水[排放到水体]
- sulfur dioxide: 0.349
  二氧化硫[排放到大气]

## Deviations from the LCI method approaches
采用亿科环境 eFootprint 软件系统，结合 CLCD 质量评估方法建立了水泥熟料生命周期模型，并计算得到 LCA 结果。

## Cut-off and completeness
数据取舍原则采用ISO140系列国际标准中建议的 cut-off 原则。即以生产过程中各项原辅材料投入与产品质量的比为数据取舍依据。具体取舍原则如下：①当各项普通原料投入重量小于1%过程原料投入总重量，以及原料中含有高纯度物质的重量小于 0.1%过程原料投入总重量时，可忽略该物料的上游生产数据，总共忽略的普通物料质量不超过5%原料投入总重量。如果是系统环境排放数据，则可以先计算其对相关 LCA 结果的贡献值，然后决定该数据是否忽略； ②其他生产过程产生的低价值废料作原料，如尾矿等，可忽略其上游生产数据。

## Data selection and combination
主要数据来源：代表企业及供应链实际生产数据。来自企业实际数据和环评报告。

## Data sources
- 李畅. (2020). 江西省某铜尾矿资源化过程生命周期评价研究 [硕士, 江西理工大学].
