# semi-transparent module

Dataset: ILCD process
Classification: Materials production / Glass and ceramics
Functional unit: 1平方米钙钛矿光伏模块
Generated by: 姚玺婧, 15898832265@163.com
Owner: 天工LCI数据工作小组
Review: Dependent internal review by 天工LCI数据工作小组
Amounts: no units in this file; such an amount is in the reference unit of its flow, which a separate flow dataset defines
licenseType: Free of charge for all users and uses

## Reference product
- Solar Module: 1; log-normal; article inperiodical

## Inputs
All rows: log-normal; article inperiodical
- nickel: 0.000634
  70 nm of HTL
- argon: 0.0757, 0.292 (2 entries)
- oxygen: 0.00021, 0.000292 (2 entries)
- dimethyl formamide: 0.00195
  Solvent
- ethanol: 0.00442
  Solvent
- nitrogen, total (excluding N2): 1.83
  Inert gas purging
- aluminium: 1.12e-5
  50 nm of AZO
- zinc oxide: 0.00036
- polyethylene terephthalate (PET) granulate: 0.0617
- Adhesives: 0.0202
- Electricity: 176.171

## Outputs
All rows: log-normal; article inperiodical
- dimethyl formamide: 0.00195
- ethanol: 0.0042
- argon: 0.368
- oxygen: 0.000327
- nitrogen, total (excluding N2): 1.83
- landfill of glas/inert waste: 1.544
  Landfill

## Review details
清单： 内部审查通过几个迭代步骤完成，涉及原始数据验证、原始数据记录、代表性、完整性、与 ISO 14040 和 14044 有关的建模的一致性。
