# Bioethanol ; enzyme production

Dataset: ILCD process
Classification: Energy carriers and technologies / Renewable fuels
Generated by: 袁嘉翼, jiayi_y@mail.bnu.edu.cn
Owner: 天工LCI数据工作小组
Review: Dependent internal review by 天工LCI数据工作小组
Amounts: no units in this file; such an amount is in the reference unit of its flow, which a separate flow dataset defines
licenseType: Free of charge for all users and uses

## Technology and included processes
Through data quality evaluation, 141 datasets with high completeness and consistency were selected from the reported 561 datasets in 474 published papers and classified into eight technological configurations determined by the pretreatment technology. The technological steps following pretreatment were all the same, although actual flows and parameter values vary, as observed in the literature

## Inputs
All rows: uniform; article inperiodical
- calcium chloride: 0.011
- Sulphur oxides (as SO2): 0.028
- ammonia: 0.189
- Electricity: 22.68
- heat: 2.9
  heating
- Cooling water: 59.8
  cooling

## Data selection and combination
Global datasets were used where possible, since the study does not apply to any specific region. LCI data for one external process named “Combustion of bioethanol in car” were obtained from the GREET database

## Data treatment and extrapolations
We assessed the robustness of the modeling results through uncertainty propagation (Monte Carlo), discernibility analysis, global sensitivity analysis, and scenario variation.

## Review details
清单： 内部审查通过几个迭代步骤完成，涉及原始数据验证、原始数据记录、代表性、完整性、与 ISO 14040 和 14044 有关的建模的一致性。
