# Aluminum powder production | CN

Dataset: ILCD process
Classification: Materials production / Other mineralic materials
Generated by: Jiaqi Lu, wilsherelu@foxmail.com
Amounts: no units in this file; such an amount is in the reference unit of its flow, which a separate flow dataset defines

## Reference product
- Powdered Aluminium: 1000
  铝粉产品

## Inputs
- aluminium: 1470
  铝原料
- light fuel oil: 0.000647
  机油（设备消耗）
- electricity mix: 36.108
- water: 450

## Outputs
- sulfur dioxide: 0.00118
  二氧化硫[排放到大气（未指定类型）]
- Particles (PM0.2 - PM2.5): 0.288
  总颗粒物[排放到大气（未指定类型）]
- municipal solid waste deposition: 0.642
  生活垃圾
- waste water - untreated: 50
  生活废水
