# 土壤修复;原位修复;生物强化修复;施工准备;生物质培养基

Dataset: ILCD process, Unit process, single operation
Geography: SH-CN
Classification: Other Services / Repair and maintenance
Generated by: 肖萌, xiaomeng@mail
Owner: 天工LCI数据工作小组
Review: Dependent internal review by 天工LCI数据工作小组
Amounts: no units in this file; such an amount is in the reference unit of its flow, which a separate flow dataset defines
licenseType: Free of charge for all users and uses

## General comment
该工艺描述了使用生物质培养基增强原位生物修复（EISB），专门用于处理含氯挥发性有机化合物（CVOC）污染的含水层。所述工艺适用于污染土地区域的大规模原位处理，因此适用于旨在场址去污染的环境工程项目。

## Geography
The aquifer in a certain area in Shanghai, China, is uniformly contaminated with chlorinated volatile organic compounds (CVOCs), with a surface area of 20,000 m2 and a depth of 50 m, with the water table located at a depth of 30 m.

## Reference product
- Biological Medium: 1; missing unimportant
  Biological medium（生物培养基）

## Inputs
- Water: 1.32705e6; measured
- Saccharum officinarum: 2.76183e6; software or database
  Sugarcane（甘蔗）
- triethylamine: 7860; software or database
- calcium carbonate: 17420; software or database
- ethanol: 4430; software or database
- Fodder yeast: 49140; software or database
  Fodder yeast（饲料酵母）
- process steam from heavy fuel oil: 102540; software or database
- process steam from light fuel oil: 138280; software or database
- Electricity: 39895.2; software or database
- Sodium hydroxide: 143990; software or database

## Use advice
在使用此数据集实施EISB时，使用者应确保场址的具体状况符合过程描述：一个面积为20,000平方米、深度为50米的含CVOC均匀污染的含水层。此过程针对的是地下水位位于30米深度的区域。使用者必须考虑当地法规以及污染水平和土壤类型可能的偏差。另外，他们应考虑生物质培养基生产和施工准备全过程的生命周期影响。在整个修复过程中，应特别注意监测生物降解速率和场地特定的环境状况。

## Review details
清单： 内部审查通过几个迭代步骤完成，涉及原始数据验证、原始数据记录、代表性、完整性、与 ISO 14040 和 14044 有关的建模的一致性。

## Data sources
- Ni, Z. et al. Comparative Life-Cycle Assessment of Aquifer Thermal Energy Storage Integrated with in Situ Bioremediation of Chlorinated Volatile Organic Compounds. Environ. Sci. Technol. 54, 3039–3049 (2020).
