# 熟料生产|熟料|悬浮预热器窑, 旋风预热器窑

Dataset: ILCD process, Unit process, single operation
Geography: CN
Classification: Materials production / Other mineralic materials
Generated by: 杨思琪
Amounts: no units in this file; such an amount is in the reference unit of its flow, which a separate flow dataset defines
copyright: false

## General comment
以常见的悬浮预热器窑为研究对象。

## Model description
功能单元为1吨水泥熟料。研究范围：水泥煅烧。

## Reference product
- clinker: 1000
  熟料

## Inputs
- limestone, crushed, for mill: 1216.5; missing unimportant
  石灰石
- clay: 273.7; missing unimportant
  粘土
- iron, powder: 25.5; missing unimportant
  铁粉
- hard coal, run-of-mine: 183.3; article inperiodical
  燃煤。能耗数据来自文献，燃煤热值以5500kcal/kg计，固定碳以50%计。
- electricity, medium voltage: 297.18; article inperiodical
  电。能耗数据来自文献。

## Outputs
- carbon dioxide: 854.45; calculated
  CO2。燃煤CO2由固定碳计算而来，原料CO2按碳酸钙Cao含量为50%计算得到。
- carbon monoxide: 4.5
  CO。CO排放按废气浓度算得。
- sulfur dioxide: 0.2409; calculated
  SO2。NOx、SO2量由建材行业平均排放因子计算。
- Nitrogen oxides: 1.8482; calculated
  NOx。NOx、SO2量由建材行业平均排放因子计算。
- hydrocarbons (unspecified): 0.0311
  CxHy。由于缺乏来源，其它污染数据参考电厂燃煤按能耗换算得到。

## Data sources
- 刘顺妮. (2003). 水泥-混凝土体系环境影响评价及其应用研究 [博士, 武汉理工大学].
