# 水泥生产|水泥, 普通硅酸盐水泥, 42.5MPa|新型干法回转窑, 2000 t-cl/d|矿渣

Dataset: ILCD process, Unit process, black box
Geography: SC-CN
Reference year: 2007
Classification: Materials production / Other mineralic materials
Generated by: 杨思琪
Amounts: no units in this file; such an amount is in the reference unit of its flow, which a separate flow dataset defines
copyright: false

## General comment
四川省某水泥生产企业原有的一条F4.0x58m，以石灰石为主要原料，日产2000吨水泥熟料的新型干法回转窑水泥生产线生产的石灰石水泥。

## Geography
四川省某水泥生产企业

## Model description
1个功能单位为42.5千克普通硅酸盐水泥，即1Fu=1kgP·O42.5普通硅酸盐水泥。研究范围从水泥原料开采、能源生产、生料制备、熟料锻烧及粉磨到水泥储存为止，主要考虑水泥生产工艺过程及与水泥生产相关的原料开采、 原料运输、电力和燃煤生产以及水泥生产过程产生的环境影响。

## Reference product
- cement, ordinary portland cement, 42.5MPa: 1000
  石灰石水泥。P.O42.5普通硅酸盐水泥。

## Inputs
All rows: measured
- limestone, crushed, for mill: 933.7
  石灰石。汽车运输，15km。
- sandstone: 151.2
  砂岩。汽车运输，15km。
- mudstone, unprocessed: 68.72
  泥岩。汽车运输，30km。
- gypsum (desulphurized): 33.24
  石膏。汽车运输，45km。
- iron, powder: 41.19
  铁粉。汽车运输，190km。
- blast furnace slag: 74.09
  矿渣。汽车运输，15km。
- hard coal, run-of-mine: 134.6
  煤。汽车运输，34km。
- electricity, medium voltage: 469.08
  电

## Outputs
- carbon dioxide: 855.9; calculated
  CO2。只涉及生产阶段（计算）。
- sulfur dioxide: 0.053; measured
  SO2。只涉及生产阶段（实测）。
- Nitrogen oxides: 2.2; measured
  NOx。只涉及生产阶段（实测）。
- particles (> PM10): 3.045; measured
  粉尘。只涉及生产阶段（计算：除尘处理后的数据除以除尘效率）。未标明粒径，按PM>10处理。

## Sampling procedure
以一条F4.0x58m，以石灰石为主要原料日产2000吨水泥熟料的新型干法回转窑水泥生产线生产的石灰石水泥为研究对象。

## Data sources
- 王超. (2007). 电石渣水泥和石灰石水泥生命周期评价的比较研究 [硕士, 西南交通大学].
