# 铜生产|原生铜|火法冶金|硫化铜精矿

Dataset: ILCD process, Unit process, single operation
Geography: CN
Reference year: 2010
Classification: Materials production / Other mineralic materials
Functional unit: Functional unit: 1 kg copper
LCI method principle: Attributional
LCI method approaches: Allocation - market value
Generated by: 王鹏, 2867919560@qq.com
Review: Dependent internal review by Tiangong LCI Data Working Group
Amounts: no units in this file; such an amount is in the reference unit of its flow, which a separate flow dataset defines
copyright: false

## Geography
本研究包括进口铜数据以及代表中国平均情况而非典型企业的统计数据，对三种铜生产路线的每个组成过程进行统计，特别是前台过程中的能源和资源使用以及后台过程中的电力生产。

## Time period
2010年至2050年中国铜需求预测。

## Reference product
- copper: 1; software or database
  Refined copper

## Inputs
All rows: software or database
- Electricity: 5.94
- Diesel: 1.23
- Limestone: 1.11
- sulphuric acid: 0.0111
- natural gas; 44.1 MJ/kg: 0.0444
- oxygen: 0.263
- Xanthate: 0.0167
  Xanthate需要补充
- Heavy fuel oil (1.0 wt.% S): 0.0205
- copper: 110
  Environmental resources |Copper ore
- copper: 2.41
  Imported-copper concentrate
- molybdenum: 2.64
  Molybdenum ore
- water: 1.17
  Water

## Outputs
All rows: software or database
- molybdenum: 0.00411
  Molybdenum concentrate
- Sulfidic tailing: 97
  Sulfidic tailing需要补充
- sulfur dioxide: 0.445, 0.228 (2 entries)
  Sulfur dioxide
- sulphuric acid: 1.2
  Sulfuric acid
- waste water - untreated: 0.00568
  Waste water
- carbon dioxide: 5.88
  Carbon dioxide
- antimony: 4.49e-9
  Antimony
- carbon monoxide: 2.94e-8
  Carbon monoxide
- particles (PM2.5 - PM10): 0.0114
  Particulates
- water: 0.0652
- zinc: 4.26e-6

## Deviations from the LCI method approaches
使用 CMLCA 6.0 软件和 CML2001 影响类别进行生命周期环境影响

## Data selection and combination
数据来源总结如表2和表3 后台系统中与铜生产相关的电力生产和其他流程的数据来自ecoinvent v3.4数据库，

## Data treatment and extrapolations
Ecoinvent v3.4 数据库-从摇篮到大门

## Review details
Inventory: The internal review was done by several iteration steps concerning raw data validation, raw data documentation, representativity, completeness and consistency of modelling with regard to ISO 14040 and 14044.; Documentation: The review of the documentation was performed by Ecobilan and is in compliance with ISO 14040 and 14044. The data set documentation is correct in view of the appropriateness of the information provided. It includes all relevant information in view of data quality and scope of application of the respective LCI result.

## Data sources
- Dong, D., Van Oers, L., Tukker, A. & Van Der Voet, E. Assessing the future environmental impacts of copper production in China: Implications of the energy transition. Journal of Cleaner Production 274, 122825 (2020).
