# 乙烯生产 | 乙烯 | 石脑油路线 | 石脑油

Dataset: ILCD process, Unit process, black box
Geography: DL-LN-CN
Reference year: 2021
Classification: Materials production / Other mineralic materials
Functional unit: Define 1t of industrial grade ethylene product as a functional unit
LCI method principle: Attributional
LCI method approaches: Allocation - mass
Generated by: 任亚楠, renyn15@tsinghua.org.cn
Review: Dependent internal review by Tiangong LCI Data Working Group
Amounts: no units in this file; such an amount is in the reference unit of its flow, which a separate flow dataset defines
copyright: false

## General comment
恒力石化化工乙烯项目，150万吨/年乙烯，蒸汽裂解技术

## Geography
大连长兴岛石油化工园区

## Time period
未提及，以文献发表时间代替

## Technology and included processes
石脑油路径制乙烯的模型中采用了典型的蒸汽裂解工艺，乙烯项目的上游动力来源炼化项目动力站，将通过调节蒸汽、发电量满足乙烯项目蒸汽需求，不会导致污染排放增加。乙烯装置规模为年产150万吨，假设工艺装置年操作时间为8000h，蒸汽裂解工艺包括乙烯蒸汽热裂解单元、干气回收单元(简称ROG)、废碱氧化单元(简称WAO)、变压吸附制氢(简称PSA)单元及乙烯低温储罐区。

## Reference product
- ethene (ethylene): 1000; measured
  乙烯

## Inputs
All rows: measured
- naphtha: 630
  石脑油
- C4 Hydrocarbon Mixture: 130
  混合C4
- Ethane: 170
  乙烷
- Methane: 150
  甲烷
- Propane: 40
  丙烷
- benzene: 330
  苯
- Cooling water: 290
  工艺冷凝水
- Water (fresh water): 2290
  新鲜水
- Water for industrial use: 1850
  生产用水
- process steam: 50
  高压蒸汽
- Water (desalinated; deionized): 0.8
  除盐水
- electricity mix: 2.808
  电

## Outputs
All rows: measured
- nitrous oxide: 0.48
  NOx
- Dust (unspecified, from stack): 0.06
  颗粒物
- carbon monoxide: 0.28
  CO
- sulfur dioxide: 0.06
  SO2
- volatile organic compound: 0.06
  VOCs
- carbon dioxide: 1.39
  CO2
- water vapour: 118.48
  蒸汽排污
- Water (groundwater from technosphere, waste water): 7.56
  锅炉废水
- Production residues (unspecified): 23.13
  焦油残渣
- Waste Alkaline Liquor: 46.27
  废碱液带水

## Deviations from the LCI method approaches
本研究选择质量分配

## Data selection and combination
石脑油路径制乙烯数据来源于恒力石化企业调研数据。

## Review details
Inventory: The internal review was done by several iteration steps concerning raw data validation, raw data documentation, representativity, completeness and consistency of modelling with regard to ISO 14040 and 14044.; Documentation: The review of the documentation was performed by Ecobilan and is in compliance with ISO 14040 and 14044. The data set documentation is correct in view of the appropriateness of the information provided. It includes all relevant information in view of data quality and scope of application of the respective LCI result.

## Data sources
- 赵悦如. 基于生命周期方法的乙烯生产环境影响分析. (大连理工大学, 2021).
