# 煤炭洗选;将煤炭、矸石、精煤洗选分离

Dataset: ILCD process, Unit process, black box
Geography: SQ-HEN-CN
Reference year: 2015
Classification: Energy carriers and technologies / Hard coal based fuels
Generated by: 尹琳琳, yinlinlin0623@163.com
Owner: 天工LCI数据工作小组
Review: Dependent internal review by 天工LCI数据工作小组
Amounts: no units in this file; such an amount is in the reference unit of its flow, which a separate flow dataset defines
licenseType: Free of charge for all users and uses

## General comment
该煤炭洗选过程旨在分离和净化煤炭，获取适合于需要高质量燃料或原材料的应用的洁净煤。这包括能源产生（发电厂）、冶金（焦炭生产用于钢铁制造）等各种行业，以及其他需要高等级煤炭的应用。对于在永城矿区或类似地质条件下运营的企业，此洗煤数据集尤其相关，那里的煤炭赋存稳定，且采矿条件有利于大规模机械化开采。

## Geography
永城矿区的资源储量和储采比例与省内其他矿区相比具有较高的优势，现共划分 5 个勘探煤矿区、 2 个找煤预测区，永城矿区煤层的赋存较为稳定，开采技术条件也相对简单，可采煤层的倾角 比较平缓，适于机械化开采方式。

## Technology and included processes
煤炭洗选加工过程中包括原煤准备、原煤分选、洗选后的干燥以及脱水和煤 泥水的处理等环节。

## Reference product
- carbon dioxide (fossil): 1.98754e7; calculated
  2013年新桥煤矿洗煤厂煤炭洗选过程中释放的碳排放总量(CO2当量)。

## Inputs
All rows: uniform
- Diesel: 3.21; software or database
  柴油排放因子,即消耗1kg的柴油释放的碳排放量(CO2当量)。
- Diesel: 25830; measured
  2013年新桥煤矿洗煤厂煤炭洗选过程中“柴油”消耗活动水平数据。
- Gasoline (regular): 3.24; software or database
  汽油排放因子,即消耗1kg的汽油释放的碳排放量(CO2当量)。
- Gasoline (regular): 28190; measured
  2013年新桥煤矿洗煤厂煤炭洗选过程中“汽油”消耗活动水平数据。
- Electricity: 972.4; software or database
  电排放因子,即消耗1MWh的电释放的碳排放量(CO2当量)。
- Electricity: 7.24872e7; measured
  2013年新桥煤矿洗煤厂煤炭洗选过程中“电”消耗活动水平数据。
- water: 0.000212; software or database
  水排放因子,即消耗1kg的水释放的碳排放量(CO2当量)。
- water: 5.73215e8; measured
  2013年新桥煤矿洗煤厂煤炭洗选过程中“水”消耗活动水平数据。

## Outputs
- carbon dioxide (fossil): 82910; uniform; calculated
  2013年新桥煤矿洗煤厂煤炭洗选过程中消耗柴油排放的碳排放量(CO2当量)。
- carbon dioxide (fossil): 91340; uniform; calculated
  2013年新桥煤矿洗煤厂煤炭洗选过程中消耗汽油释放的碳排放量(CO2当量)。
- carbon dioxide (fossil): 1.95796e7; uniform; calculated
  2013年新桥煤矿洗煤厂煤炭洗选过程中消耗电释放的碳排放量(CO2当量)。
- carbon dioxide (fossil): 121520; uniform; calculated
  2013年新桥煤矿洗煤厂煤炭洗选过程中消耗水释放的碳排放量(CO2当量)。

## Use advice
在使用这份数据集进行生命周期评估时，考虑数据集所提供的地质背景和具体的采矿条件非常重要。用户还应注意到包括或排除洗煤后煤炭使用阶段的情况，如运输、燃烧或任何洗后处理。数据的适用性应与永城矿区或相似背景的技术现实一致。用户应考虑由于特定采矿实践而导致的质量和环境影响的变化，并且数据应更新或调整以反映技术进步或采矿实践的变化。

## Review details
清单： 内部审查通过几个迭代步骤完成，涉及原始数据验证、原始数据记录、代表性、完整性、与 ISO 14040 和 14044 有关的建模的一致性。
