# 地下水修复;原位修复;可渗透反应墙;漏斗建设

Dataset: ILCD process, Unit process, single operation
Geography: US
Reference year: 2011
Classification: Other Services / Repair and maintenance
Generated by: 张建宾, zhangjb@caep.org.cn
Owner: 天工LCI数据工作小组
Review: Dependent internal review by 天工LCI数据工作小组
Amounts: no units in this file; such an amount is in the reference unit of its flow, which a separate flow dataset defines
copyright: false
licenseType: Free of charge for all users and uses

## General comment
安装漏斗（钢板桩）

## Geography
多佛空军基地

## Technology and included processes
36.6 m长的漏斗

## Technical purpose
该数据集描述了一种原位地下水修复过程，涉及通过安装钢板桩构造渗透性反应屏障（PRB）的漏斗结构。这种环境工程过程特别适用于像多佛空军基地这样的地点，用于控制和处理被污染的地下水或预防污染物的扩散。

## Reference product
- Impermeable funnel: 1; measured

## Inputs
- Steel sections: 47800; measured
- cement: 10300; measured
- Primary energy: 241000; measured

## Use advice
使用此数据集的用户应考虑到在将数据应用于其他地点时，应注意站点的特定地质和水文地质条件。PRB 的效果和设计参数可能会因当地污染特征而有很大差异。此外，用户还应考虑屏障的生命周期、维护要求以及与钢板桩的建设和运行相关的潜在环境影响。

## Review details
清单： 内部审查通过几个迭代步骤完成，涉及原始数据验证、原始数据记录、代表性、完整性、与 ISO 14040 和 14044 有关的建模的一致性。

## Data sources
- Mark S. H. Mak and Irene M. C. Lo.Environmental Life Cycle Assessment of Permeable Reactive Barriers: Effects of Construction Methods, Reactive Materials and Groundwater Constituents[J].Environmental Science & Technology 2011, 45, 23, 10148-10154
