# 太阳能级多晶硅生产

Dataset: ILCD process, Unit process, single operation
Geography: CN
Reference year: 2016
Classification: Materials production / Other mineralic materials
Functional unit: Grid-connected electricity generation from a 1 MWp multi-Si PV system, whose lifespan is 30 years of a 10 MWp power station has been taken as the research object and the functional unit
LCI method principle: Attributional
LCI method approaches: Allocation
Generated by: 杨锦锋, yjfzfshn@163.com
Review: Dependent internal review by Tiangong LCI Data Working Group
Amounts: no units in this file; such an amount is in the reference unit of its flow, which a separate flow dataset defines
copyright: false

## General comment
多晶硅

## Geography
该电站位于宁夏中部地区，年平均太阳辐射量约为5955.80 MJ m2 a-1，年平均日照高峰时数为1718h

## Time period
文章发表

## Technology and included processes
在上述工艺中，SoG-Si 的制备采用金属冶金法，这是一种集成的方法，而不是单一的制备方法。为了去除硅中的各种杂质，将几种独立的和随机的有序工艺结合起来进行混合使用

## Reference product
- Solar grade multi-Si: 1000; measured
  SoG-Si

## Inputs
All rows: measured
- electricity: 147921
  Electricity
- Metallurgical silicon: 1227.72
- quartz sand: 41.19
  Quartz sand
- fluorspar: 8.22
  Fluorite powder
- Hydrochloric acid: 356.44
  Hydrochloric acid (31%)
- Hydrofluoric acid: 151.49
  Hydrofluoric acid (55%)
- Water (fresh water): 12376.2
  Fresh water
- Lime: 379.21
- Quartz Crucible: 207.92
  Quartz crucible
- Silicon nitride: 0.97
- Cooling water: 4158.42
  Circulating water

## Outputs
- industrial waste (unspecified): 164.36; measured
  Waste residue
- waste water - untreated: 13162.4; measured
  Waste water
- Calcium fluoride waste: 162.38; measured
  Calcium fluoride
- Waste (solid): 209.69; measured
  Waste quartz crucible

## Deviations from the LCI method approaches
对中国冶金路线多晶硅光伏并网发电系统进行了生命周期评估

## Data selection and combination
调查云南、宁夏工厂

## Review details
Inventory: The internal review was done by several iteration steps concerning raw data validation, raw data documentation, representativity, completeness and consistency of modelling with regard to ISO 14040 and 14044.; Documentation: The review of the documentation was performed by Ecobilan and is in compliance with ISO 14040 and 14044. The data set documentation is correct in view of the appropriateness of the information provided. It includes all relevant information in view of data quality and scope of application of the respective LCI result.

## Data sources
- Yu, Z. et al. Life cycle assessment of grid-connected power generation from metallurgical route multi-crystalline silicon photovoltaic system in China. Applied Energy 185, 68–81 (2017).
