# 碳酸锂生产 | 电池级碳酸锂 | 硫酸法 | 澳大利亚出口锂辉石精矿

Dataset: ILCD process, Unit process, single operation
Geography: SN-SC-CN
Reference year: 2017
Classification: Materials production / Other mineralic materials
Generated by: 孙鑫, xs389@cornell.edu
Review: Dependent internal review by 天工LCI数据工作小组
Amounts: no units in this file; such an amount is in the reference unit of its flow, which a separate flow dataset defines

## Geography
遂宁管辖的射洪市

## Reference product
- Lithium carbonate,Lithium carbonate: 1000; article inperiodical

## Inputs
All rows: article inperiodical
- Spodumene concentrate (6% Li2O): 7300
- freshwater: 40
- Sulfuric acid: 1710
- sodium hydroxide: 50
- Electricity: 6480
- hard coal; 26.3 MJ/kg: 82893
  用于直接燃烧加热
- hard coal; 26.3 MJ/kg: 52997
  用于生产蒸汽
- calcium carbonate: 700
- sodium carbonate: 2050

## Outputs
- sodium sulfate: 1920; article inperiodical

## Review details
清单： 内部审查通过几个迭代步骤完成，涉及原始数据验证、原始数据记录、代表性、完整性、与 ISO 14040 和 14044 有关的建模的一致性。

## Data sources
- Kelly, J. C., Wang, M., Dai, Q. & Winjobi, O. Energy, greenhouse gas, and water life cycle analysis of lithium carbonate and lithium hydroxide monohydrate from brine and ore resources and their use in lithium ion battery cathodes and lithium ion batteries. Resources, Conservation and Recycling 174, 105762 (2021).
