# 电力生产 ; 电力 ; 火电（71.2%）+水电（2.1%）+核电（15.8%）+风电（8.8%）+太阳能发电（2.0%）

Dataset: ILCD process, Partly terminated system
Geography: LN-CN
Reference year: 2019
Classification: Energy carriers and technologies / Electricity
LCI method principle: Other
Generated by: 熊若熙, xiongrx0126@163.com
Owner: 天工LCI数据工作小组
Review: Dependent internal review by 天工LCI数据工作小组
Amounts: no units in this file; such an amount is in the reference unit of its flow, which a separate flow dataset defines
copyright: false
licenseType: Free of charge for all users and uses

## General comment
电力产生形式包括火力发电、水力发电、核能发电、风力发电和太阳能发电

## Time period
根据2019年能源统计年鉴数据计算

## Technical purpose
该数据集代表了包括火力发电、水力发电、核能发电、风力发电和太阳能发电在内的电力生产过程。电力组合由71.2%的火力发电、2.1%的水力发电、15.8%的核能发电、8.8%的风力发电和2.0%的太阳能发电组成，用于居民生活、商业、工业用途以及作为各种基础设施的供电。

## Reference product
- Electricity: 3.6; calculated

## Outputs
- carbon dioxide: 0.726; calculated
- sulfur dioxide: 0.00012; calculated
- Nitrogen oxides: 0.000193479; calculated
- Dust (unspecified, from stack): 2.5157e-5; calculated

## Data treatment and extrapolations
核算方法参考《企业温室气体排放核算方法与报告指南 发电设施》。不同形式发电量及燃料用量来自于《中国能源统计年鉴 2020》中的第三章（能源生产） 和第六章（地区能源平衡表）。用于计算二氧化碳排放因子的低位发热量、单位热值含碳量等燃料参数来自于《2019 年度中国区域电网二氧化碳基准线排放因子 OM 计算说明》、《企业温室气体排放核算方法与报告指南 发电设施》

## Use advice
使用此数据集的用户应参考《企业温室气体排放核算方法与报告指南 发电设施》和《中国能源统计年鉴 2020》中有关发电和燃料消耗统计的方法学细节。二氧化碳排放因子对于生命周期评估的纳入至关重要，应考虑《2019年度中国区域电网二氧化碳基准线排放因子OM计算说明》提供的地区差异和技术规范。在使用此数据进行建模时，准确表示电力生成来源的组合非常关键，并确保基于提供的具体能耗和排放数据计算CO2排放。

## Review details
清单： 内部审查通过几个迭代步骤完成，涉及原始数据验证、原始数据记录、代表性、完整性、与 ISO 14040 和 14044 有关的建模的一致性。

## Data sources
- 熊若熙. 中国电力生产和消费二氧化碳与污染物排放因子核算. (清华大学, 2023).
