# 稀土氧化物场地准备|稀土氧化物|离子吸附工艺|离子吸附粘土

Dataset: ILCD process, Unit process, single operation
Geography: CN
Reference year: 2014
Valid until: 2016
Classification: Materials production / Other mineralic materials
Functional unit: The functional unit is defined as the production of 1 kg of 90–92% purity mixed REOs by the in-situ leaching method from ion-adsorption clays in southern China.
LCI method principle: Attributional
LCI method approaches: Allocation - market value
Generated by: 汪涛, twang@iue.ac.cn
Review: Dependent internal review by Tiangong LCI Data Working Group
Amounts: no units in this file; such an amount is in the reference unit of its flow, which a separate flow dataset defines
copyright: false

## Geography
华南地区

## Technology and included processes
该过程以混合稀土氧化物结束，下游过程（例如溶剂萃取和金属生产）不包括在系统边界内。在某些地点可能会进行进一步处理（例如，将稀土元素分为轻质和组）。

## Reference product
- soil: 1.65; input; min 1.1; max 1.2; uniform; software or database
  Soil removal and hole drilling

## Inputs
- polyvinylchloride resin (E-PVC): 0.096; min 0.092; max 0.1; uniform; software or database
  PVC pipes (Materials/Processes) 原文未备注哪种PVC
- Limestone: 0.005; min 0.005; max 0.004; uniform; article inperiodical
  imestone, crushed, for mill
- plastic pipes: 0.101; min 0.106; max 0.096; uniform; article inperiodical
  Extrusion, plastic pipes

## Deviations from the LCI method approaches
In this study, the material and energy flow data is gathered from Chinese literature and verified through personal communications with Chinese experts working in this industry. These datasets are derived based on attributional modeling (instead of consequential) and for most multi-products processes economic allocation is used. Since the data was collected from different sources

## Review details
Inventory: The internal review was done by several iteration steps concerning raw data validation, raw data documentation, representativity, completeness and consistency of modelling with regard to ISO 14040 and 14044.; Documentation: The review of the documentation was performed by Ecobilan and is in compliance with ISO 14040 and 14044. The data set documentation is correct in view of the appropriateness of the information provided. It includes all relevant information in view of data quality and scope of application of the respective LCI result.

## Data sources
- Vahidi, E., Navarro, J. & Zhao, F. An initial life cycle assessment of rare earth oxides production from ion-adsorption clays. Resources, Conservation and Recycling 113, 1–11 (2016).
