# 氢氧化锂生产 | 电池级单水氢氧化锂 | 硫酸锂法 | 澳大利亚出口锂辉石精矿

Dataset: ILCD process, Unit process, single operation
Geography: SN-SC-CN
Reference year: 2017
Classification: Materials production / Other mineralic materials
Generated by: 孙鑫, xs389@cornell.edu
Review: Dependent internal review by 天工LCI数据工作小组
Amounts: no units in this file; such an amount is in the reference unit of its flow, which a separate flow dataset defines

## Geography
遂宁管辖的射洪市

## Reference product
- Lithium Hydroxide Monohydrate: 1000; article inperiodical

## Inputs
All rows: article inperiodical
- Spodumene concentrate (6% Li2O): 6420
- freshwater: 11.24
- Electricity: 12600
- Sulfuric acid: 1520
- sodium carbonate: 25
- sodium hydroxide: 1180
- hard coal; 26.3 MJ/kg: 32818
  用于直接燃烧加热
- hard coal; 26.3 MJ/kg: 38525
  用于生产蒸汽
- calcium carbonate: 600

## Outputs
- sodium sulfate: 1720; article inperiodical

## Review details
清单： 内部审查通过几个迭代步骤完成，涉及原始数据验证、原始数据记录、代表性、完整性、与 ISO 14040 和 14044 有关的建模的一致性。

## Data sources
- Kelly, J. C., Wang, M., Dai, Q. & Winjobi, O. Energy, greenhouse gas, and water life cycle analysis of lithium carbonate and lithium hydroxide monohydrate from brine and ore resources and their use in lithium ion battery cathodes and lithium ion batteries. Resources, Conservation and Recycling 174, 105762 (2021).
