# 芳烃生产 | 芳烃 | 石脑油制芳烃路线

Dataset: ILCD process, Unit process, black box
Geography: CN
Reference year: 2022
Classification: Materials production / Other mineralic materials
Functional unit: The functional unit is defined as 1 kg aromatics production
LCI method principle: Attributional
LCI method approaches: Allocation - market value
Generated by: 任亚楠, renyn15@tsinghua.org.cn
Review: Dependent internal review by Tiangong LCI Data Working Group
Amounts: no units in this file; such an amount is in the reference unit of its flow, which a separate flow dataset defines
copyright: false

## General comment
石脑油芳香化过程包括碳化物形成、烯烃形成、烯烃低聚、异构化和环化以及脱氢。芳香化后，混合物进入相分离器，分离出用作工厂燃料气体的干气。液相进入稳定器分离液化石油气（LPG），剩余液相继续进入精馏塔分离芳烃和重芳烃（C9+）。芳烃是主要产品，液化石油气和重芳烃是副产品。

## Geography
CBMTA 和 OBNTA 工厂的运行数据来自能源专业知识服务系统（PKSSE）中国先进煤化工产业数据库收集和管理的环境影响评估报告。

## Time period
未提及，以文献发表时间代替

## Reference product
- Aromatic hydrocarbon: 1; measured
  Aromatics

## Inputs
All rows: measured
- naphtha: 1.46
  Naphatha
- process water: 0.1
  Process water
- Water (fresh water): 0.32
  Supplement water
- ZSM-5 catalyst: 0.00037
- light fuel oil: 2e-5
  Thermal oil
- electricity mix: 0.072
  Electricity
- natural gas: 3.46
  Steam

## Outputs
All rows: measured
- Heavy aromatics: 0.11
- LPG - liquefied petroleum gas: 0.31
  LPG
- Refinery Gas: 1.96
  Dry gas (self-use)
- carbon dioxide: 0.07
  CO2
- Dust (unspecified, from stack): 2e-5
  PM
- volatile organic compound: 0.00024
  VOCs
- sulfur dioxide: 3e-5
  SO2
- nitrous oxide: 0.00012
  NOx

## Deviations from the LCI method approaches
在这里，经济分配是最优的，因为这些产品的化学用途截然不同，但它们具有相同的经济功能，即作为商品出售。

## Data selection and combination
在该系统中，芳烃生产阶段被设定为前景阶段，其大量数据通过现场调查进行监控和收集，而上游原料、材料和能源生产阶段被定义为背景阶段，其数据从成熟的生命周期评估数据库中收集。

## Data treatment and extrapolations
在这里，经济分配是最优的，因为这些产品的化学用途完全不同，但它们具有相同的经济功能，即作为商品出售

## Review details
Inventory: The internal review was done by several iteration steps concerning raw data validation, raw data documentation, representativity, completeness and consistency of modelling with regard to ISO 14040 and 14044.; Documentation: The review of the documentation was performed by Ecobilan and is in compliance with ISO 14040 and 14044. The data set documentation is correct in view of the appropriateness of the information provided. It includes all relevant information in view of data quality and scope of application of the respective LCI result.

## Data sources
- Li, J. et al. Comparative resource-environment-economy assessment of coal- and oil-based aromatics production. Resources Policy 77, 102629 (2022).
