# 水泥生产|水泥, 普通硅酸盐水泥, 42.5MPa|湿法回转窑

Dataset: ILCD process, Unit process, black box
Geography: CN
Reference year: 2005
Classification: Materials production / Other mineralic materials
Generated by: 杨思琪
Amounts: no units in this file; such an amount is in the reference unit of its flow, which a separate flow dataset defines
copyright: false

## General comment
湿法回转窑生产工艺。
原料石灰石经破碎机破碎，原料粘土经破碎、淘洗成浆体，在生料磨的磨头将石灰石、粘土（浆体）、铁粉及适量水喂入磨内进行粉磨。磨制成的生料浆由泥浆泵送入料浆库中，经调配均匀并符合要求后喂入湿法回转窑中煅烧。出窑熟料通过熟料冷却设备冷却后送入熟料储存库，然后与混合材料、石膏按一定的比例混合，经水泥磨粉磨后再入水泥库，通过包装机包装外运出厂或散装出厂。

## Model description
以1千克28天抗压强度为42.5MPa的水泥所具有的使用性能为功能单位，即IFu=42.5kgMPa。
研究范围界定为：原料预处理一生料粉磨一生料煅烧一熟料粉磨一水泥均化一水泥储存。

## Reference product
- cement, ordinary portland cement, 42.5MPa: 1000
  P.O. IFu=42.5kg MPa

## Inputs
All rows: measured
- limestone, crushed, for mill: 1246.3
  石灰石
- clay: 142.1
  粘土
- gypsum (desulphurized): 44.4
  石膏
- hard coal: 194.487
  标准煤。原始数据为0.1807kg标准煤，这里换算为硬煤，换算公式为1kg硬煤=0.929kg标准煤。
- electricity, medium voltage: 400.32
  电力

## Outputs
- particles (> PM10): 0.3; measured
  粉尘，未标明粒径，按PM>10处理。
- sulfur dioxide: 0.9033; measured
  二氧化硫。考虑到国内水泥厂运行的实际情况和未来很长时间的发展趋势，本次评价采用实测数据的统计平均值。
- Nitrogen oxides: 2.262; measured
  氮氧化物。考虑到国内水泥厂运行的实际情况和未来很长时间的发展趋势，本次评价采用实测数据的统计平均值。
- carbon dioxide: 1127; measured
  二氧化碳。考虑到国内水泥厂运行的实际情况和未来很长时间的发展趋势，本次评价采用实测数据的统计平均值。

## Data sources
- 曹晓润. (2005). 低环境负荷型水泥的生态环境评价 [硕士, 武汉理工大学].
