# 底泥修复;原位覆盖;材料生产;活性炭

Dataset: ILCD process, Unit process, black box
Geography: NO
Reference year: 2011
Classification: Unit processes / Other Services / Repair and maintenance
Generated by: 桑春晖, sangch@mail.bnu.edu.cn
Owner: 天工LCI数据工作小组
Review: Dependent internal review by 天工LCI数据工作小组
Amounts: no units in this file; such an amount is in the reference unit of its flow, which a separate flow dataset defines
copyright: false
licenseType: Free of charge for all users and uses

## General comment
用于底泥覆盖填埋的活性炭材料的生产环节。

## Geography
经查询，暂未找到国内有相关研究文献

## Time period
文献中没有明确数据收集的开始时间，以文献发表时间为有效期的开始时间

## Technology and included processes
所用生物炭来自中国的无烟煤化石产品,生产1 kg活性炭，消耗煤1.89 kg，电力0.3774 kwh,运输距离0.905 tkm。

## Technical purpose
此处描述的活性炭生产过程专门用于环境修复项目中的底泥覆盖。该方法涉及使用活性炭原位覆盖底泥，以包含和稳定污染物。此数据集代表在环境工程（特别是中国南方地区）背景下使用的活性炭材料的生产阶段。

## Reference product
- Activated Carbon: 4.76e7; calculated

## Inputs
- Coal,Coal,Coal: 8.9964e7; calculated
- Electricity: 6.46713e7; calculated
- Road Transport,Road Transport: 4.3078e7; calculated

## Data selection and combination
初级数据清单是根据ISO 14040关于LCA.35的规定获得的。基本数据来自特定场地的盆栽实验、中试和供应商处获取，这些数据代表了中国南方的情况。

## Use advice
在使用此数据集进行生命周期评估时，用户应注意数据的区域特异性，这是代表中国南方地区的实践。由于文献中没有提供数据收集的开始时间，用户应将文献发表日期作为数据有效的起点。建议在评估使用活性炭原位覆盖的底泥修复项目的整体环境影响时，包含此生产阶段数据。此外，用户应注意，该数据集不包含超出最初提供的范围的后续运输信息，也不包含活性炭的使用和处置阶段的信息。

## Review details
清单： 内部审查通过几个迭代步骤完成，涉及原始数据验证、原始数据记录、代表性、完整性、与 ISO 14040 和 14044 有关的建模的一致性。

## Data sources
- Sparrevik, M. et al. Use of Life Cycle Assessments To Evaluate the Environmental Footprint of Contaminated Sediment Remediation. Environ. Sci. Technol. 45, 4235–4241 (2011).
