# 硫酸铜矿山的开采和选矿|硫酸铜矿山|采矿和选矿流程|典型的硫酸铜矿山

Dataset: ILCD process, Unit process, single operation
Geography: JX-CN
Reference year: 2022
Classification: Materials production / Other mineralic materials
Functional unit: the mining process of one tonne of copper-sulfur raw ore was selected as the functional unit.
LCI method principle: Attributional
LCI method approaches: Allocation - market value
Generated by: 王鹏, 2867919560@qq.com
Review: Dependent internal review by 天工LCI数据工作小组
Amounts: no units in this file; such an amount is in the reference unit of its flow, which a separate flow dataset defines
copyright: false

## Geography
本研究的数据来源来自中国江西省某典型硫化铜矿项目可行性评估计划。

## Technology and included processes
经过钻爆后，硫化铜矿石在地下破碎，然后通过提升运输系统送至选矿工业现场，进一步破碎和研磨。磨矿产物被输送至下一阶段进行浮选，通过铜浮选流程首先得到铜精矿和铜尾矿，随后从分级铜尾矿中获得副产品高硫和低硫精矿。

## Reference product
- copper: 0.0009644; software or database
  Copper

## Inputs
- copper: 8.83; measured
  Copper
- sulfur: 84.47; measured
  Sulfur
- gold: 0.00014; measured
  Gold
- silver: 0.01066; measured
  Silver
- Explosive: 0.89; measured
  Explosive需要补充
- Land Occupation: 130000; measured
  Land occupation
- water: 4040; measured
- Electricity: 242.46; measured
- Diesel: 0.29; software or database
- Cleft timber: 0.17; software or database
  Cleft timber需要补充
- Lime: 7.5; software or database
  lime
- Alloy: 0.00157; software or database
  Alloy需要补充
- Steel: 0.19; software or database
  Steel需要补充
- Cement: 70; software or database
  Cement需要补充
- sand: 80; software or database
- Sodium hydroxide: 0.05194; software or database
- Carbon disulfide: 0.09869; software or database
  Carbon disulfide需要补充resourse
- Terpenic oil: 0.068; software or database
  Terpenic oil需要补充

## Outputs
- carbon dioxide (biogenic): 0.51; software or database
  Carbon dioxide
- carbon monoxide: 0.044; software or database
  Carbon monoxide
- Nitrogen oxides: 0.34494; software or database
  Nitrogen oxides需要补充
- sulfur dioxide: 0.0006624; software or database
  Sulfur dioxide
- particles (PM2.5 - PM10): 0.00198; software or database
- chemical oxygen demand: 4.05e-6; software or database
  COD需要补充
- Biological oxygen demand: 1.35e-6; software or database
  BOD需要补充
- Suspended solids, unspecified: 0.04882; software or database
  Suspended solid (SS)需要补充
- lead: 0.000668; software or database
  Lead
- arsenic: 0.00021376; software or database
  Arsenic
- zinc: 0.0009642; software or database
  Zinc
- cadmium: 0.0001675; software or database
  Cadmium
- chromium: 1.336e-5; software or database
  Chromium
- Ammonia Nitrogen: 0.00054; software or database
  Ammonia nitrogen需要补充
- Tailings (deposited, hibernating in ground, non elementary flow): 845; software or database
  Tailings
- Hazardous waste (deposited, hibernating in ground, non elementary flow): 0.13; software or database
  Hazardous waste
- Copper concentrates: 30; measured
  Copper concentrates需要补充
- High-sulfur concentrate: 140; measured
  High-sulfur concentrate需要补充
- Low-sulfur concentrate: 20; measured

## Deviations from the LCI method approaches
使用 SimaPro 和 ReCiPe 2016 方法进行生命周期评估 (LCA)。

## Data selection and combination
前台数据主要包括各工序的原材料和能源消耗、外部和内部运输、现场排放、废物处理等，采集自国内典型的硫化铜矿山。通用材料生产、能源、运输和废物管理等背景数据通过 Ecoinvent 3.5 数据库获得，

## Data treatment and extrapolations
使用 SimaPro

## Review details
清单： 内部审查通过几个迭代步骤完成，涉及原始数据验证、原始数据记录、代表性、完整性、与 ISO 14040 和 14044 有关的建模的一致性。

## Data sources
- Tao, M., Nie, K., Zhao, R., Shi, Y. & Cao, W. Environmental impact of mining and beneficiation of copper sulphate mine based on life cycle assessment. Environ Sci Pollut Res 29, 87613–87627 (2022).
