# 基于木薯乙醇生产 | 乙醇 | 发酵| 木薯

Dataset: ILCD process, Unit process, single operation
Geography: AH-CN
Classification: Materials production / Other mineralic materials
Functional unit: The functional unit is 1.7 tonne of ethanol production.
LCI method principle: Attributional
LCI method approaches: Allocation - mass
Generated by: 唐子睿, tangzirui123@gmail.com
Review: Dependent internal review by Tiangong LCI Data Working Group
Amounts: no units in this file; such an amount is in the reference unit of its flow, which a separate flow dataset defines
copyright: false

## General comment
本研究对两种替代乙醇生产方案（基于玉米秸秆和基于木薯）的乙烯生产进行了评估。

## Geography
相关生产数据（例如电力、蒸汽、水、化学品、原材料消耗和直接排放）来源于中国安徽省木薯乙醇生产工厂。

## Technology and included processes
本研究包括的过程总结如下：
1）木薯生产；
2）乙醇和乙烯生产；
3）原料干燥；
4）公路运输；
5）废物处理；
6) 材料和煤炭能源生产；
7）生产能源回收。

## Reference product
- Ethanol: 1700; article inperiodical

## Inputs
All rows: article inperiodical
- Cassava: 4900
- Yeast: 0.11
- Amylase: 0.4
- Glucoamylase: 5.3
- Sulfuric acid: 15.9
- Alkali: 2.7
- Urea: 6.5
- electricity: 1523.88
- process steam: 5000
- water: 9400

## Outputs
- Protein Feed: 430; article inperiodical

## Deviations from the LCI method approaches
进行了基于产品质量的联产品分配。

## Data selection and combination
1. 相关生产数据（例如电力、蒸汽、水、化学品、原材料消耗和直接排放）来源于中国安徽省木薯乙醇生产工厂。
2. 玉米秸秆生产、燃煤发电和公路运输过程的相关数据取自参考文献。
3. 由于缺乏中国的信息，因此使用了欧洲的化学品生产数据和相关背景数据[26]。

## Review details
Inventory: The internal review was done by several iteration steps concerning raw data validation, raw data documentation, representativity, completeness and consistency of modelling with regard to ISO 14040 and 14044.; Documentation: The review of the documentation was performed by Ecobilan and is in compliance with ISO 14040 and 14044. The data set documentation is correct in view of the appropriateness of the information provided. It includes all relevant information in view of data quality and scope of application of the respective LCI result.

## Data sources
- Hong, J., Zhang, Y., Xu, X. & Li, X. Life cycle assessment of corn- and cassava-based ethylene production. Biomass and Bioenergy 67, 304–311 (2014).
