# 干法制砂|砂石中碎|圆锥破碎技术

Dataset: ILCD process, Unit process, single operation
Geography: HAIN-CN
Reference year: 2020
Classification: Materials production / Other mineralic materials
Generated by: 崔航, Cuihang0716@163.com
Review: Dependent internal review by Tiangong LCI Data Working Group
Amounts: no units in this file; such an amount is in the reference unit of its flow, which a separate flow dataset defines
copyright: false

## General comment
二次破碎、筛分加工（圆锥破碎）

## Technology and included processes
鄂破后通过输送带运至圆锥破碎机进行第二次破碎，破碎后进入振动筛筛分，得到的粒径较小碎石通过输送带进入成品堆场，粒径较大的不合格产品重新回到圆锥破碎机进行破碎，制砂机进入制砂。

## Reference product
- gravel: 41870

## Inputs
- gravel: 41870; measured
- electricity mix: 315000; measured

## Review details
Inventory: The internal review was done by several iteration steps concerning raw data validation, raw data documentation, representativity, completeness and consistency of modelling with regard to ISO 14040 and 14044.; Documentation: The review of the documentation was performed by Ecobilan and is in compliance with ISO 14040 and 14044. The data set documentation is correct in view of the appropriateness of the information provided. It includes all relevant information in view of data quality and scope of application of the respective LCI result.

## Data sources
- 陵水海岛混凝土有限公司干法制砂项目
