# 平均稀土氧化物;REE;白云鄂博;含稀土矿石的生命周期清单

Dataset: ILCD process, Unit process, single operation
Geography: NMG-CN
Reference year: 2012
Valid until: 2014
Classification: Materials production / Non-energetic raw materials
Functional unit: 1 kg REO at 100% purity
LCI method principle: Attributional
LCI method approaches: Allocation - mass
Generated by: 汪涛, twang@iue.ac.cn
Owner: 天工LCI数据工作小组
Review: Dependent internal review by 天工LCI数据工作小组
Amounts: no units in this file; such an amount is in the reference unit of its flow, which a separate flow dataset defines
copyright: false
licenseType: Free of charge for all users and uses

## General comment
从白云鄂博矿产出的稀土氧化物（REO）被广泛用于制造磁铁、催化剂、合金、玻璃和陶瓷等多种应用。由于其独特的磁性、发光性和电化学性质，这些氧化物是生产智能手机、计算机硬盘和电动汽车等高科技设备的关键材料。特别是在生命周期清单中描述的1公斤100%纯度REO通常用于要求高纯度的应用，如先进电子、研究和专业工业过程。

## Technology and included processes
LCA 模型是使用 eBalance Professional 4.7（IT & Knowledge for Environment，四川，中国）构建的。我们选择构建归因模型，因为它更符合我们的研究目标，尽管我们采用了贡献性方法来进行情景敏感性分析。使用 CML2002 方法评估生命周期环境影响（CML 2015）。根据建议的 LCA 实践（Hauschild 等，2013）和之前确定的行业环境危害，选择了 11 个中点影响类别。

## Reference product
- REO: 1; article inperiodical

## Inputs
- Raw ore: 33.93; calculated
  Fe-Nb-RE ores
- sulphuric acid: 0.07; article inperiodical
- Sodium silicate: 0.15; article inperiodical
- ammonia: 1.22; article inperiodical
- sulphuric acid: 3.86; measured
- phosphoric acid: 0.01; article inperiodical
- Kerosene: 0.04; article inperiodical
- Hydrochloric acid: 8.46; article inperiodical
- Magnesium oxide: 0.55; measured
- Lime: 2.43; calculated
- Iron Pellet Production: 0.13; measured
  Iron pellet production, substituted for iron flakes
- Ammonium bicarbonate: 1.6; measured
- Sodium carbonate: 1.05; measured
- process steam: 4.43; measured
- Charcoal: 0.041; measured
- Electricity: 25.164; article inperiodical
- hard coal: 56.66; article inperiodical
- water: 306.21; article inperiodical

## Outputs
- Spray mold: 1.85; article inperiodical
  Ammonium chloride
- ammonium: 0.171; article inperiodical
- thorium-230: 1.01e-5; article inperiodical
  Thorium (water, unspecified)
- hydrogen fluoride: 0.003; article inperiodical
- sulfur dioxide: 0.112; article inperiodical
- sulphuric acid: 0.017; article inperiodical
- thorium-230: 7.6e-5; article inperiodical
  Thorium (air, unspecified)
- carbon dioxide: 2.04; calculated

## Deviations from the LCI method approaches
The LCI is first described individually for the three REO production chains, followed by a section on metal refining. Aggregated modeling data are also included for the industry average REO production in tabular form (Tables 1, 2, and 3). A more in-depth description of the processes, LCI, and modeling data used for the entire study (including metal refining) is available in section 1 in supporting information S1 on the Web.

## Use advice
使用白云鄂博平均稀土氧化物生命周期清单数据集的用户应将数据纳入归因建模框架中，用于评估环境影响，建议使用CML2002方法（CML 2015）或类似方法。用户应考虑所选的11个中点影响类别，以全面了解环境影响。此外，注意这个数据集是为了反映平均条件而构造的，并没有考虑特定REO生产链或金属精炼中涉及的个别方法。那些寻求对特定REO生产链或金属精炼有详细了解的人应该参考网络上的支持信息S1，其中包括过程、LCI和整个研究使用的建模数据的深入描述。

## Review details
清单： 内部审查通过几个迭代步骤完成，涉及原始数据验证、原始数据记录、代表性、完整性、与 ISO 14040 和 14044 有关的建模的一致性。

## Data sources
- Lee, J. C. K. & Wen, Z. Rare Earths from Mines to Metals: Comparing Environmental Impacts from China’s Main Production Pathways: Environmental Impacts of Rare Earths in China. Journal of Industrial Ecology 21, 1277–1290 (2017).
