# 土壤修复;原位修复;植物提取修复;工程实施;种植

Dataset: ILCD process, Unit process, single operation
Geography: IT
Classification: Other Services / Repair and maintenance
Generated by: 肖萌, xiaomeng@mail
Owner: 天工LCI数据工作小组
Review: Dependent internal review by 天工LCI数据工作小组
Amounts: no units in this file; such an amount is in the reference unit of its flow, which a separate flow dataset defines
licenseType: Free of charge for all users and uses

## General comment
此工业流程关联环境管理领域，尤为原位植物提取技术在土壤修复中的应用。该过程适用于具有高金属含量的土壤去污染，包括但不限于铅（Pb）、砷（As）和铊（Tl）。过程中包括使用能够从之前受污染工业区的土壤中提取有毒元素的高累积植物。此特定应用适合于无法进行土壤挖掘的区域，并意图以最小的生态干扰恢复土地供未来使用。

## Geography
The site taken as a reference for the remediation is an area of 712 m2 located in a disused industrial district of Tuscany (Italy), in the past subjected to various productive activities that led to contamination with various metals, some of which potentially toxic such as lead (Pb), arsenic (As) and thallium (Tl). As it is a “site of national interest”, its exact location is considered confidential and cannot be disclosed.

## Reference product
- Planting site: 1281.6; measured
  植物种植完成的场地

## Inputs
All rows: measured
- Urea: 14.24
  nitrogen fertilizer
- Phosphorus Pentoxide: 11.39
  肥料-P2O5（phosphoric acid anhydride）
- potassium oxide: 7.12
  肥料-K2O（potassium oxide）
- EDTA: 61
  土壤改良剂-EDTA
- Potassium phosphate: 1261
  土壤改良剂-K3PO4
- Seed of H. annuus: 1.14
  种子-H. annuus
- Seed of L. albus: 14.24
  种子-L. albus
- Seed of B. juncea: 1.14
  种子-B. juncea
- Water: 384.48

## Use advice
在使用此数据进行生命周期评估时，请考虑特定现场的边界条件以及其确切位置的保密性。应基于与参考站点相似的气候和土壤条件做出技术适用性的假设。考虑植物累积金属所需时间、以及随后的收获和处置阶段。若未经适当调整，本数据组不应用于具有不同污染或土壤特征的站点。确保任何使用阶段行为的建模准确反映了植物提取的缓慢和生物学特性。

## Review details
清单： 内部审查通过几个迭代步骤完成，涉及原始数据验证、原始数据记录、代表性、完整性、与 ISO 14040 和 14044 有关的建模的一致性。

## Data sources
- Vocciante, M., De Folly D’Auris, A., Franchi, E., Petruzzelli, G. & Ferro, S. CO2 footprint analysis of consolidated and innovative technologies in remediation activities. J Clean Prod 297, 126723 (2021).
