# Bioethanol ; Ammonia-based

Dataset: ILCD process
Classification: Energy carriers and technologies / Renewable fuels
Generated by: 袁嘉翼, jiayi_y@mail.bnu.edu.cn
Owner: 天工LCI数据工作小组
Review: Dependent internal review by 天工LCI数据工作小组
Amounts: no units in this file; such an amount is in the reference unit of its flow, which a separate flow dataset defines
licenseType: Free of charge for all users and uses

## Inputs
All rows: uniform; article inperiodical
- Electricity: 0
- heat: 2940; min 90.1; max 9310
- Electricity: 500.4; min 51.48; max 3672
- heat: 2380; min 383; max 9300
- Electricity: 417.6; min 121.32; max 1209.6

## Outputs
- heat: 442; max 3010; uniform; article inperiodical

## Review details
清单： 内部审查通过几个迭代步骤完成，涉及原始数据验证、原始数据记录、代表性、完整性、与 ISO 14040 和 14044 有关的建模的一致性。
