# 铜基混合废料回收|电解铜|电解工艺|阳极铜

Dataset: ILCD process, Unit process, single operation
Geography: JX-CN
Reference year: 2020
Classification: Materials production / Other mineralic materials
Functional unit: We consider the functional unit of the recycling of copper-based mixed waste to be 1000 kg electrolytic copper.
LCI method principle: Attributional
LCI method approaches: Allocation - market value
Generated by: 王鹏, 2867919560@qq.com
Review: Dependent internal review by Tiangong LCI Data Working Group
Amounts: no units in this file; such an amount is in the reference unit of its flow, which a separate flow dataset defines
copyright: false

## Geography
典型案例是位于中国江西省的一家金属回收企业，

## Technology and included processes
电解工艺以阳极铜为主要原料，电为主要能源，硫酸、盐酸、明胶、水为辅助原料，生成高纯电解铜可供销售。还生产残渣电极（返回精炼工序）、阳极泥（送金银回收工序）、碳酸镍（出售）等产品。

## Reference product
- Refined copper: 1000; measured
  copper(99%)需要补充

## Inputs
All rows: measured
- Electricity: 900
- copper: 1200
  Blister copper
- Glue: 0.1
  Glue需要补充
- Hard coal, at consumer EU-27: 100
  Hard coal
- Hydrochloric acid: 0.07
  Hydrochloric acid(32%)需要补充
- Sulfuric acid(98%): 8.3
  Sulfuric acid(98%) 需要补充resourse
- transport in t*km,transport in t*km: 2.71175
  Transport
- water: 343.5
  Water

## Outputs
- Anode sludge: 15; measured
  Anode sludge需要补充
- Anode copper: 210; measured
  Anode copper需要补充
- Nickel sulfate: 15; measured
  Nickel sulfate需要补充
- water vapour: 329.89; measured
  Water vapor

## Deviations from the LCI method approaches
使用LCA-ReCiPe 2016（Heijungs et al., 2017）表征和归一化方法（中点和端点方法），将生命周期清单转换为多个领域的影响分数。

## Data selection and combination
前台数据和后台数据。

## Data treatment and extrapolations
采用GaBi 9.0软件计算各种铜基混合废物回收工艺单位质量的库存、资源消耗和废物排放量。

## Review details
Inventory: The internal review was done by several iteration steps concerning raw data validation, raw data documentation, representativity, completeness and consistency of modelling with regard to ISO 14040 and 14044.; Documentation: The review of the documentation was performed by Ecobilan and is in compliance with ISO 14040 and 14044. The data set documentation is correct in view of the appropriateness of the information provided. It includes all relevant information in view of data quality and scope of application of the respective LCI result.

## Data sources
- Zhang, W. et al. Analyzing the environmental impact of copper-based mixed waste recycling-a LCA case study in China. Journal of Cleaner Production 284, 125256 (2021).
