# 生物基乙二醇生产| 乙二醇| 氢气+草酸二甲酯合成 | 秸秆

Dataset: ILCD process, Unit process, black box
Geography: CN
Classification: Materials production / Other mineralic materials
Functional unit: For the convenience of comparison, we use 1 ton of ethylene glycol product as a functional unit.
LCI method principle: Attributional
Generated by: 唐子睿, tangzirui123@gmail.com
Review: Dependent internal review by Tiangong LCI Data Working Group
Amounts: no units in this file; such an amount is in the reference unit of its flow, which a separate flow dataset defines
copyright: false

## General comment
生产1吨乙二醇消耗生物质2.48吨、煤炭47.6吉焦、电力3.8吉焦。

## Geography
本研究结果为中国能源结构调整决策提供参考。

## Technology and included processes
生物质原料首先进入生物质气化（BGS）装置，空气分离（ASU）装置产生95%的氧气。 冷却后的合成气分为两股：一股进入水煤气变换（WGS）装置，提高合成气的H2/CO比，另一股为未变换的合成气作为旁路流，调节H2/CO 到合适的比例。 酸性气体，如 CO2 和 H2S，在以下酸性气体去除 (AGR) 单元设备中去除。 洁净的合成气进入H2/CO分离（HCS）装置，获得高纯度的CO和H2气流。 在DMO合成（DMOS）装置中，CO流用于生产中间产物草酸二甲酯（DMO），氢气流被压缩进入乙二醇合成（ECS）装置用于生产乙二醇。

## Reference product
- Ethylene glycol: 1000; article inperiodical

## Inputs
All rows: article inperiodical
- biomass; 14.7 MJ/kg: 2480
- Hard coal, at consumer EU-27: 47600
- Diesel: 2000
- Gasoline (regular): 139
- Electricity: 3800

## Outputs
All rows: article inperiodical
- carbon dioxide (fossil): -281
- methane (fossil): 31.4
- nitrous oxide: 0.11
- carbon monoxide: 14
- nitrogen monoxide: 3.85
- sulfur dioxide: 2.13
- particles (PM10): 3.74
- non-methane volatile organic compounds: 0.105

## Data selection and combination
本文的数据主要来源于类似课题的研究论文和一些技术报告。所使用的数据均经过检查和比较，以确保研究结果的准确性。针对研究路线，收集具体流程中的基本投入产出能耗和具体污染排放数据，如原材料消耗、生命周期能耗、直接污染排放等。

## Review details
Inventory: The internal review was done by several iteration steps concerning raw data validation, raw data documentation, representativity, completeness and consistency of modelling with regard to ISO 14040 and 14044.; Documentation: The review of the documentation was performed by Ecobilan and is in compliance with ISO 14040 and 14044. The data set documentation is correct in view of the appropriateness of the information provided. It includes all relevant information in view of data quality and scope of application of the respective LCI result.

## Data sources
- Xu, S., Li, Z., Yang, Q., Chu, G., Zhang J., Zhang, D., Zhou, H. & Gao, M. Comparative Life Cycle Assessment of Energy Consumption, Pollutant Emission, and Cost Analysis of Coal/Oil/Biomass to Ethylene Glycol. ACS Sustainable Chem. Eng. 9, 15849–15860 (2021).
