# 小规模集约化养猪生产|粪肥管理

Dataset: ILCD process, Unit process, single operation
Geography: JS-CN
Reference year: 2010
Classification: Materials production / Other mineralic materials
Functional unit: The functional unit (FU) is defined to be 1000 kg of pig carcass weight (CW) after the process in slaughterhouse.
Generated by: 杨瑞, 1632707028@qq.com
Review: Dependent internal review by Tiangong LCI Data Working Group
Amounts: no units in this file; such an amount is in the reference unit of its flow, which a separate flow dataset defines
copyright: false

## General comment
粪便管理系统是指固体粪便(70%的粪便)和液体粪便(30%的粪便被尿液冲走)的分离处理。固体粪便堆肥的同时，液体粪便(浆液)从猪舍流出，进入沼气池消化40天，然后进入室外开放式浆液池储存4个月。之后，固体粪便和消化物的产出可以作为营养物质的有效来源重新利用到附近的农田。

## Geography
在本研究中，关于猪生产不同阶段的材料和能源消耗、饲料组成以及与其他成分混合的主要数据来自对中国江苏省几家养猪场的采访。

## Time period
实地调查(Guo and Wang, 2010)

## Technology and included processes
由于小规模养猪场的管理不善和前沿技术的投资能力(b孟，2019)，堆肥的渗滤液和浆液储存后的排放，包括化学需氧量、生化学的需氧量和磷(P)，是根据中国的指导方针估算的(MEE, 2011)。

## Reference product
- pig: 1000; measured
  pig carcass weight (CW)

## Inputs
- manure: 4360; measured
  猪粪便
- nitrogen: -51.83; measured
  N fertilizer (avoided)
- phosphorus: -15.51; measured
  P fertilizer (avoided)
- potassium: -12.32; measured
  K fertilizer (avoided)

## Outputs
All rows: measured
- methane: 24.7
- carbon dioxide: 42.83
- ammonia: 4.77
- nitrous oxide: 0.94
- Nitrogenous Matter (unspecified, as N): 4.99
  氮气
- nitrogen monoxide: 0.35
- chemical oxygen demand: 18.23
- biological oxygen demand: 4.33
  Biochemical oxygen demand
- Phosphorus: 0.46

## Deviations from the LCI method approaches
基于LCI结果，使用ReCiPe midpoint (H) 2016方法(Huijbregts et al.， 2016)进行生命周期影响评估(LCIA)，该方法是ReCiPe 2008的更新版本，现在提供具有全球范围代表性的表征因子。六个影响类别主要用于评估主要生命周期环境影响潜力，即全球变暖(GWP)、淡水富营养化(FEP)、陆地酸化(TAP)、淡水生态毒性(FETP)、人类致癌毒性(HTP)和陆地生态毒性(TETP) (Cherubini et al.， 2015;Noyaet al.， 2017)。其中，GWP、FEP和TAP是以往研究中最受关注的影响类别(de Vries和de Boer, 2010;Reckmann et al.， 2013)。

## Review details
Inventory: The internal review was done by several iteration steps concerning raw data validation, raw data documentation, representativity, completeness and consistency of modelling with regard to ISO 14040 and 14044.; Documentation: The review of the documentation was performed by Ecobilan and is in compliance with ISO 14040 and 14044. The data set documentation is correct in view of the appropriateness of the information provided. It includes all relevant information in view of data quality and scope of application of the respective LCI result.

## Data sources
- Liu, X., Cai, Z. & Yuan, Z. Environmental burdens of small-scale intensive pig production in China. Science of The Total Environment 770, 144720 (2021).
