# 土壤修复;原位修复;电修复;修复设施建设;水;

Dataset: ILCD process, Unit process, single operation
Geography: KR
Reference year: 2014
Classification: Other Services / Repair and maintenance
Generated by: 浩骅, wangyp@caep.org.cn
Owner: 天工LCI数据工作小组
Review: Dependent internal review by 天工LCI数据工作小组
Amounts: no units in this file; such an amount is in the reference unit of its flow, which a separate flow dataset defines
copyright: false
licenseType: Free of charge for all users and uses

## General comment
安装现场准备、关闭和拆卸系统

## Technology and included processes
包括：挖掘、滚动钻孔和安装；人员和设备运输；系统安装。

## Technical purpose
提供的工业过程数据集涉及原位电动力修复技术，这是一种用于从土壤中去除污染物的方法。该方法适用于重金属、放射性核素和其他可电离物质污染土壤的清洁操作。它特别适合于传统的土壤洗涤方法效果不佳的细粒土壤。

## Reference product
- Water: 1; input; measured
  Equipment and etc

## Inputs
All rows: measured
- Diesel: 0.0799
  Excavator : (0.2 m3 , 5 L/hr, 16 hr/2 days)
- Diesel: 0.0386
  Vehicle (five times, 10 km/1 L)
- Steel: 48
  Anode electrode
- Stainless Steel: 2448
  Cathode electrode
- Polyvinyl chloride: 140.2
  Anode (casing)
- Polyvinyl chloride: 7.6
  Circulation pipe
- polyethylene terephthalate (PET) granulate: 25
  Anode and cathode
- Polyethylene: 112
  Electrolyte tank (2 m3 , 2 ea)
- Electricity: 1440
  Equipment and etc
- Polyethylene: 25.1

## Outputs
- Greenhouse Gases: 16130; measured
- Nitrogen oxides: 1.48; measured
- SOx: 0.779; measured
- particles (> PM10): 0.0922; measured

## Use advice
该数据集的用户需要考虑被污染场地的具体特点，如土壤类型、污染物类型和浓度，以评估电动力修复的适用性。诸如电压、电极材料和处理时间等运行参数对过程效果至关重要，应基于场地特定条件确定。除非在提供的数据集中明确包含，否则应排除该单元过程中的任何外部能源输入或基础设施设置。

## Review details
清单： 内部审查通过几个迭代步骤完成，涉及原始数据验证、原始数据记录、代表性、完整性、与 ISO 14040 和 14044 有关的建模的一致性。

## Data sources
- Environmental assessment on electrokinetic remediation of multimetal-contaminated site: a case study
