# 土壤和地下水修复;原位;地下水抽出处理;施工;废水处理装置施工

Dataset: ILCD process, Unit process, single operation
Geography: CA
Reference year: 2007
Classification: Other Services / Repair and maintenance
Generated by: 王宁, wang_ning@caep.org.cn
Owner: 天工LCI数据工作小组
Review: Dependent internal review by 天工LCI数据工作小组
Amounts: no units in this file; such an amount is in the reference unit of its flow, which a separate flow dataset defines
licenseType: Free of charge for all users and uses

## General comment
使用活性炭、玻璃、乳胶建造废水处置设施

## Geography
The contaminated area was located 600 m from a river shore in the northern part of the prov-ince of Quebec， Canada.

## Technical purpose
所描述的工业过程用于土壤和地下水的修复。具体来说，此数据集涉及到位于地表之外进行的地下水“抽取并处理”方法以及废水处理设施的施工。这些设施主要使用活性炭、玻璃和乳胶作为建造材料。通常在土壤和地下水污染物存在且需要提取及处理的情况下使用，例如位于加拿大魁北克省北部河岸600米处的污染场地。

## Reference product
- Treatment facilities: 1; article inperiodical
  在现场建造一套废水处理装置

## Inputs
- Activated Carbon: 530700; article inperiodical
  在现场建造废水处置装置所消耗的活性炭颗粒
- Latex: 52.8; article inperiodical
  在现场建造废水处置装置所消耗的乳胶
- Glass (formed & finished): 6264; article inperiodical
  在现场建造废水处置装置所消耗的玻璃

## Use advice
在使用该数据集进行生命周期评价(LCA)时，用户应考虑修复背景是否与案例研究相符。重要的是确保材料和废物的运输距离适应当地条件。用户还应考虑研究地点所实施的具体施工技术和当地环保法规。施工过程中的间接影响，如施工机械排放的污染物，也应包括在生命周期评价中。为了方法论的一致性，应将此数据与运营阶段以及可能的拆除和回收场景的信息相结合，如果适用的话。

## Review details
清单： 内部审查通过几个迭代步骤完成，涉及原始数据验证、原始数据记录、代表性、完整性、与 ISO 14040 和 14044 有关的建模的一致性。
