# 钢铁产品|钢铁|钢铁生产

Dataset: ILCD process, Unit process, single operation
Geography: NJ-JS-CN
Reference year: 2012
Classification: Materials production / Other mineralic materials
Generated by: 王环宇, wanghuanyu00@126.com
Review: Dependent internal review by 天工LCI数据工作小组
Amounts: no units in this file; such an amount is in the reference unit of its flow, which a separate flow dataset defines

## Geography
南京钢铁联合有限公司

## Reference product
- iron: 1000; article inperiodical

## Inputs
All rows: article inperiodical
- Coking coal: 318.2
  焦煤
- Coal injection: 318.2
  高炉喷煤
- Coal injection: 318.2
  烧结/转炉用煤
- coke: 313.8
  焦炭
- Limestone: 2272.7
- dolomite: 2123.1
- Electricity: 3777.48

## Outputs
- carbon dioxide (fossil): 990; article inperiodical

## Review details
清单： 内部审查通过几个迭代步骤完成，涉及原始数据验证、原始数据记录、代表性、完整性、与 ISO 14040 和 14044 有关的建模的一致性。
