# 再生铜|精炼铜|火法精炼和电解精炼|废铜

Dataset: ILCD process, Unit process, single operation
Geography: CN
Reference year: 2018
Classification: Materials production / Other mineralic materials
Functional unit: The production of 1000 kg of refined copper (99.99% cathode copper) was selected as the FU in this paper” (Chen 等, 2019, p. 36)
LCI method principle: Attributional
LCI method approaches: Allocation - market value
Generated by: 王鹏, 2867919560@qq.com
Review: Dependent internal review by Tiangong LCI Data Working Group
Amounts: no units in this file; such an amount is in the reference unit of its flow, which a separate flow dataset defines
copyright: false

## Geography
本研究主要通过对生产工艺和典型企业的调查，收集了原铜生产的资源、能源消耗和污染数据。

## Technology and included processes
两项技术的系统边界均覆盖了主要生产流程，包括原生铜的采矿（采矿和选矿）、冶炼（熔炼和吹炼）、火法精炼和电解精炼，以及再生铜的预处理（拆解和分离）、火法精炼和电解精炼。 ， A

## Reference product
- Refined copper: 1000; measured
  Refined copper 需要补充

## Inputs
- crude oil; 42.3 MJ/kg: 8.78; software or database
  Crude oil (resource)
- Hard coal, at consumer EU-27: 162; software or database
  Hard coal (resource)
- natural gas; 44.1 MJ/kg: 492; software or database
  Natural gas (resource)
- copper scrap: 1860; measured
  Copper scrap需要补充
- Water (fresh water): 1400; measured
  Fresh water
- Limestone: 8.46; software or database
- Refractory material: 7.62; measured
  Refractory material需要补充
- Industrial oxygen: 91.4; measured
  Industrial oxygen需要补充
- Sulfuric acid(98%): 6.8; measured
  Sulfuric acid resourse需要补充
- Spray mold: 5.08; measured
  Spray mold需要补充
- Sodium hydroxide: 0.04; measured
- Sodium chlorate: 0.454; measured
  Sodium chlorite需要补充
- Sodium hypochlorite: 0.374; measured
  Sodium hypochlorite需要补充

## Outputs
All rows: measured
- carbon dioxide: 278
- sulfur dioxide: 0.783
  Sulfur dioxide
- nitrous oxide: 0.0832
  Nitrogen oxide
- carbon monoxide: 0.366
  Carbon monoxide
- methane (fossil): 1.32
  Methane
- nitrous oxide: 0.00588
  Nitrous oxide
- sulphuric acid: 0.00034
- particles (PM2.5 - PM10): 2.62
- mercury: 0.00142
  Mercury
- lead: 0.00117
  Lead
- zinc: 0.00101
- nickel: 0.000593
  Nickel
- arsenic: 0.000136
  Arsenic
- chemical oxygen demand: 0.231
  Chemical oxygen demand
- Biological oxygen demand: 0.00241
  Biochemical oxygen demand需要补充
- Solid suspension: 0.177
  Solid suspension需要补充
- Ammonia Nitrogen: 1.64e-7
  Ammonia nitrogen需要补充
- municipal solid waste deposition: 1330
  Solid waste

## Deviations from the LCI method approaches
结合我国精炼铜生产特点，本研究选用CML2001方法（2016年修订）进行环境影响核算。

## Data selection and combination
本研究主要通过对生产工艺和典型企业的调查，收集了原铜生产的资源、能源消耗和污染数据。上游数据来自 GaBi (ts Vision) 和 Ecoinvent 数据库

## Data treatment and extrapolations
本研究使用Gabi软件（ts版）作为计算软件，并针对这两种技术建立了模型。

## Review details
Inventory: The internal review was done by several iteration steps concerning raw data validation, raw data documentation, representativity, completeness and consistency of modelling with regard to ISO 14040 and 14044.; Documentation: The review of the documentation was performed by Ecobilan and is in compliance with ISO 14040 and 14044. The data set documentation is correct in view of the appropriateness of the information provided. It includes all relevant information in view of data quality and scope of application of the respective LCI result.

## Data sources
- Chen, J. et al. Environmental benefits of secondary copper from primary copper based on life cycle assessment in China. Resources, Conservation and Recycling 146, 35–44 (2019).
