# 水泥生产|水泥, 普通硅酸盐水泥|新型干法, 5000 t/d|混合固废

Dataset: ILCD process, Unit process, black box
Geography: CN
Classification: Materials production / Other mineralic materials
Generated by: 杨思琪
Amounts: no units in this file; such an amount is in the reference unit of its flow, which a separate flow dataset defines
copyright: false

## General comment
配备有5000t/d新型干法水泥熟料生产线，采用先进的强化型悬浮预热器五级窑外分解技术以及立式原料磨、配有辊压机的大型球磨机等先进的水泥生产设备。

## Geography
东北两座水泥厂

## Model description
系统边界为水泥厂水泥生产系统。

## Reference product
- cement, ordinary portland cement: 1000
  水泥产品

## Inputs
All rows: measured
- limestone, crushed, for mill: 1142.86
  石灰石
- sandstone: 73.6264
  砂岩
- shale: 54.9451
  页岩
- ash: 107.692
  粉煤灰
- iron, powder: 19.0659
  铁粉
- gypsum (desulphurized): 47.8022
  石膏
- blast furnace slag: 38.7912
  矿渣
- hard coal: 134.011
  烟煤。年耗煤用能=(2.439E+8)kg×(2.1477E+7)J/kg(平均低位热值)=(5.24E+15)J
- electricity, medium voltage: 352.8
  总耗电量。年耗电能=（I.7836E+8）kWh×（3.60E+6）J/kWh=（6.42E+14）J
- tap water: 369.78
  原文是总水量，即自来水。

## Outputs
- particles (> PM10): 0.295604; measured
  粉尘，未标明粒径，按PM>10处理。
- nitrogen dioxide: 1.56593; measured
  NO2
- sulfur dioxide: 0.308; measured
  SO2
- carbon dioxide: 409.341; measured
  CO2

## Data sources
- 邵帅. (2016). 基于Emergy和Em-LCA的水泥企业可持续发展水平评价 [硕士, 大连理工大学].
