# mixed-cation module

Dataset: ILCD process
Classification: Energy carriers and technologies / Other materials
Functional unit: 1平方米钙钛矿光伏模块
Generated by: 姚玺婧, 15898832265@163.com
Owner: 天工LCI数据工作小组
Review: Dependent internal review by 天工LCI数据工作小组
Amounts: no units in this file; such an amount is in the reference unit of its flow, which a separate flow dataset defines
licenseType: Free of charge for all users and uses

## Reference product
- Solar Module: 1; log-normal; article inperiodical

## Inputs
All rows: log-normal; article inperiodical
- ethanol: 0.0271, 0.0271 (2 entries)
  Cleaning solvent
- acetone: 0.147
  Cleaning solvent
- Titanium dioxide, chloride and sulphate processes, >80% TiO2, production mix, at plant: 0.00627
  30 nm of blocking layer
- water: 0.0327
  Cleaning solvent
- Titanium dioxide, chloride and sulphate processes, >80% TiO2, production mix, at plant: 0.00113
  200 nm of ETL
- ethanol: 0.000216
  Solvent of TiO2 paste
- dimethyl formamide: 0.00164
  Solvent of mixed-cation mixtures
- chlorobenzene: 0.000122
  Additive
- acetonitrile: 0.000263
  Solvent of HTFSI
- chlorobenzene: 0.00733
  Solvent of Spiro-OMeTAD
- copper: 0.00115
  80 nm of electrode
- argon: 0.0865
- oxygen: 8.65e-5
- polyethylene terephthalate (PET) granulate: 0.0202
- Adhesives: 0.0617
- dimethyl sulfoxide: 0.000479
  Solvent of mixed-cation mixtures
- 4-tert-butylpyridine: 0.000178
  Additive
- Electricity: 265.451

## Outputs
All rows: log-normal; article inperiodical
- ethanol: 0.00589
  Solvent of BL-TiO2 ink and TiO2 paste
- isopropanol: 0.000381
  Solvent of BL-TiO2 ink
- acetone: 0.000184
  Solvent of BL-TiO2 ink
- Titanium dioxide, chloride and sulphate processes, >80% TiO2, production mix, at plant: 0.00079
  Wasted TiO2 paste
- dimethyl formamide: 0.00164
  Solvent of mixed-cation mixtures
- chlorobenzene: 0.00745
  Solvent of Spiro-OMeTAD and waste from spin coating
- acetonitrile: 0.000263
  Solvent of HTFSI
- copper: 0.000573
  Wasted copper
- argon: 0.0865
- oxygen: 8.65e-5
- acetic anhydride: 0.000325
  Solvent of BL-TiO2 ink
- dimethyl sulfoxide: 0.000479
  Solvent of mixed-cation mixtures
- 4-tert-butylpyridine: 0.000125
  Wasted 4-tert-Butylpyridine
- landfill of glas/inert waste: 5.041
  Landfill

## Review details
清单： 内部审查通过几个迭代步骤完成，涉及原始数据验证、原始数据记录、代表性、完整性、与 ISO 14040 和 14044 有关的建模的一致性。
