# 污泥处理与处置|干化焚烧

Dataset: ILCD process, Unit process, single operation
Geography: CN
Classification: Materials production / Other mineralic materials
Generated by: 金思甜, 2331276@tongji.edu.cn
Review: Dependent internal review by 天工LCI数据工作小组
Amounts: no units in this file; such an amount is in the reference unit of its flow, which a separate flow dataset defines

## Reference product
- Sludge: 1000; input; estimated
  1 t 含水率 80%污泥

## Outputs
All rows: calculated
- carbon dioxide: 312
- methane: 0.15
- nitrous oxide: 0.0008
- Nitrogen oxides: 0.38
- sulfur dioxide: 0.52
- carbon monoxide: 0.01
- hydrocarbons (unspecified): 0.005
- particles (PM10): 0.15
- hydrogen sulfide: 8e-5
- hydrogen chloride: 0.03
- 2,3,7,8-tetrachlorodibenzo-p-dioxin: 1e-10
- mercury: 2e-7, 3e-6, 0.0008 (3 entries)
- lead: 4e-6, 0.0002 (2 entries)
- nickel: 0.0001, 7e-5, 0.007 (3 entries)
- cadmium: 2e-6, 1e-5, 0.002 (3 entries)
- zinc: 4e-5, 0.0007, 0.04, 0.4 (4 entries)
- copper: 4e-6, 8e-5, 0.04 (3 entries)
- chromium: 6e-6, 0.0001, 0.06 (3 entries)
- tin: 7e-5, 4e-5, 0.005 (3 entries)
- chemical oxygen demand: 1.5
- nitrogen, total (excluding N2): 0.1
- phosphorus, total: 0.01
- ammonia: 0.07
- Waste (solid): 69.7

## Review details
清单： 内部审查通过几个迭代步骤完成，涉及原始数据验证、原始数据记录、代表性、完整性、与 ISO 14040 和 14044 有关的建模的一致性。

## Data sources
- 基于LCA和AHP的污泥处理技术的综合性能评价
