# 土壤和地下水修复;原位;土壤生物通风;注汽井

Dataset: ILCD process, Unit process, single operation
Geography: CA
Reference year: 2007
Classification: Other Services / Engineering and consulting
Generated by: 王宁, wang_ning@caep.org.cn
Owner: 天工LCI数据工作小组
Review: Dependent internal review by 天工LCI数据工作小组
Amounts: no units in this file; such an amount is in the reference unit of its flow, which a separate flow dataset defines
copyright: false
licenseType: Free of charge for all users and uses

## General comment
使用聚氯乙烯、膨润土、石英砂、碎石、柴油等建造注入井

## Geography
The contaminated area was located 600 m from a river shore in the northern part of the prov-ince of Quebec， Canada.

## Technology and included processes
使用聚氯乙烯、膨润土、混凝土、石英砂、碎石、柴油等建造注入井

## Technical purpose
所描述的工业过程适用于环境修复活动，特别是污染土壤和地表水的原位生物通风处理。该过程涉及建造注入井，以促进污染物的微生物降解。这些注入井使用聚氯乙烯、膨润土、石英砂、碎石和柴油等材料建造，通过构造可以增加空气流动或注入加速污染物分解的物质。该技术适用于特定场地的修复，例如与敏感生态系统相邻的污染区域，如距河岸600米。

## Reference product
- injection well: 1; estimated
  建造好的通风井

## Inputs
All rows: estimated
- Diesel: 0.38
  使用柴油建造通风井
- cement: 12.6
  使用混凝土建造通风井
- bentonite: 612
  使用膨润土建造通风井
- sand: 218
  使用石英砂建造通风井
- gravel: 62.5
  使用碎石建造通风井
- Polyvinyl chloride: 199
  使用聚氯乙烯建造通风井

## Use advice
在使用此数据集进行环境影响评估或类似研究时，请确保考虑地理特异性，因为该过程与加拿大魁北克省的情境相关。数据集应用于对原位修复过程建造阶段的生命周期清单建模，其中包括考虑构建注入井的材料投入和输出。在将这些数据应用于其他位置时，应特别关注数据对类似气候和地质条件的代表性。

## Review details
清单： 内部审查通过几个迭代步骤完成，涉及原始数据验证、原始数据记录、代表性、完整性、与 ISO 14040 和 14044 有关的建模的一致性。
