# 生物基甲醇生产| 甲醇 | 秸秆气化| 秸秆

Dataset: ILCD process, Unit process, single operation
Geography: JS-CN
Classification: Materials production / Other mineralic materials
Functional unit: The functional unit for the evaluation of the life cycle is 1000 kg of biomethanol.
LCI method principle: Attributional
LCI method approaches: Allocation - market value
Generated by: 唐子睿, tangzirui123@gmail.com
Review: Dependent internal review by Tiangong LCI Data Working Group
Amounts: no units in this file; such an amount is in the reference unit of its flow, which a separate flow dataset defines
copyright: false

## General comment
所提出的互连流化床气化技术类似于循环流化床，在旋风分离器之后具有额外的鼓泡流化床。 循环流化床设计用于燃烧空气； 生物质气化鼓泡流化床通入蒸汽。 避免气化和燃烧过程之间的直接接触； 气化所需的热量是通过床层颗粒（如沙子、催化剂）的循环来实现的。 一部分生物质在鼓泡流化床中迅速热解并与蒸汽一起气化，产生合成气，包括H2、CO等。

## Geography
本文研究的生物质是来自中国江苏省的秸秆。

## Technology and included processes
整个系统可以看作是三个子系统的组合，即气化子系统，将生物质转化为粗合成气； 净化子系统，去除粗合成气中所含的杂质； 以及合成系统，将生物质合成气转化为液态甲醇。

## Reference product
- Methanol: 1; article inperiodical

## Inputs
- Straw: 3.25; article inperiodical
  In this case, energy are provided by combustion of flue gas, hot/cold process fluid

## Outputs
All rows: article inperiodical
- carbon dioxide (fossil): 1.83
- carbon monoxide: 0.00112
- methane: 0.000234
- nitrous oxide: 0.000928
- sulfur dioxide: 0.000524
- particles (PM10): 0.00093

## Deviations from the LCI method approaches
分配给稻草的环境影响系数计算公式为： 式中，Krs 为分配给稻草的环境影响系数； MFrs为稻草产量与稻粒产量之比，取0.9； Prs为稻草价格，为250元/吨； Prg为稻谷价格，为1540元/吨。

## Data selection and combination
在此步骤中获得并定义生命周期的数据收集和假设。 生产上下游过程中化肥农药需求量、运输能源消耗量、污染物排放量等数据来源于文献和中国国家统计数据。

## Data treatment and extrapolations
对于生产过程，稻草消耗量和排放量的盘查数据均来自上述生物甲醇生产系统的Aspen Plus模拟。

## Review details
Inventory: The internal review was done by several iteration steps concerning raw data validation, raw data documentation, representativity, completeness and consistency of modelling with regard to ISO 14040 and 14044.; Documentation: The review of the documentation was performed by Ecobilan and is in compliance with ISO 14040 and 14044. The data set documentation is correct in view of the appropriateness of the information provided. It includes all relevant information in view of data quality and scope of application of the respective LCI result.

## Data sources
- Xiao, J., Shen, L., Zhang, Y. & Gu, J. Integrated Analysis of Energy, Economic, and Environmental Performance of Biomethanol from Rice Straw in China. Ind. Eng. Chem. Res. 48, 9999–10007 (2009).
