# 南美白对虾养殖;南美白对虾成虾;工厂化养殖

Dataset: ILCD process, Unit process, black box
Geography: RZ-SD-CN
Reference year: 2019
Valid until: 2021
Classification: Unit processes / Materials production / Food and renewable raw materials
Functional unit: 1 ton of white shrimp
LCI method principle: Attributional
LCI method approaches: Allocation
Generated by: 吴康妮, wukangni@xmu.stu.edu.cn
Owner: 天工LCI数据工作小组
Review: Dependent internal review by 天工LCI数据工作小组
Amounts: no units in this file; such an amount is in the reference unit of its flow, which a separate flow dataset defines
copyright: false
licenseType: Free of charge for all users and uses

## General comment
本文研究范围包括从养殖场基础设施建设、虾苗运输、成虾养殖、成虾运往市场、基础设施废弃处置五个阶段。其中饲料生产为成虾养殖阶段是一个环节，是利用鱼粉、大豆、花生、鱼油、面粉、矿物质与粘合剂等生产的配合饲料

## Geography
山东省日照市涛雒镇

## Time period
文献未具体说明采样时间，研究者于 2019 年 6 月份、11 月份在山东省日照市涛雒镇固定观察点调研

## Technology and included processes
南美白对虾工厂化养殖技术。工厂化养殖分为工厂化静水式养殖、工厂化流水式养殖、工厂化循环水式养殖三中，本研究所在日照市的对 虾养殖户多采用工厂化流水式养殖模式。该养殖模式下的养殖户建有多个养殖棚，结构为砖混结构，透光性以及保温性良好。每个养殖棚内会建有多个养殖池，形 状多为正四边形，规模多为 4m(长)*4m（宽）、5m(长)*5m（宽）、6m(长)*6m（宽）， 池深大多在 1m-1.3m 之间。池底呈锅底状向中间排水[110]，池底中央设置Φ110 mm 聚 乙烯立管进行排水。排水一般分 3 个阶段，前期排水量较小，每天约排水 8-10cm， 持续时间多为 25—35 天；中期排水量较大，每天排水约 25-40cm，持续时间多为 50-60 天；后期排水量最大，每天排水约 60-70cm,持续时间为 30-45 天。该地区 的南美白对虾生长周期多为 110-130 天，每年养殖 2 造的居多，成活率大概在 35%-55%之间。关于饲料的投入，工厂化养殖一般只投配合饲料。另外，每年养殖 户都要进行清池消毒，频率一年两次。

## Technical purpose
本工艺流程中培养的南美白对虾（Penaeus vannamei），通常被用于海产品生产，培育至成年后的虾类用于食用并分发至各个市场。这种工厂化养殖方法旨在为满足食品产业中的消费需求而设计，能进行高容量、控制性的白虾生产。所使用的配合饲料包括鱼粉、大豆、花生、鱼油、面粉、矿物质和粘合剂等成分。

## Model description
本研究采用当量因子法进行特征化所，根据不同物质对同一种环境影响类型的影响潜在 程度，将其中一种物质作为基准物质，影响潜值 1，当量因子为相同质量的其他物质影响潜力与该基准物质影响潜值的比值

## Reference product
- Litopenaeus vannamei: 1000; measured

## Inputs
All rows: measured
- cement, unspecified: 42.354
- iron: 53
  属于基础设施建设阶段,使用年限20年，该数据为折合一个养殖周期的投入数据
- polyethylene low density granulate (PE-LD): 14.6
  属于基础设施建设阶段,使用年限15年，该数据为折合一个养殖周期的投入数据
- transport in t*km: 207.064
  虾苗运输，方式：空运。原文数据为质量*距离=（0.09412t*2200km）
- water: 8.47059e6
  属于成虾养殖阶段
- Electricity: 60504.2
  属于成虾养殖阶段
- Diesel: 9.76
  属于成虾养殖阶段
- fish meal: 411.765
- Soybean: 288.236
- Peanut: 222.353
- Fish Oil: 24.7059
- Flour: 378.824
- Mineral: 49.4118
- Adhesives: 5.7647
- Hydrogen peroxide: 141.18
- Fertilizer paste for aquaculture: 117.65
- Multivitamins: 0.94
- Immunopolysaccharide: 2.35

## Outputs
All rows: measured
- waste water - untreated: 8.47059e6
- phosphate: 0.091788
- ammonia: 0.17099
- nitrite: 0.05497
- Chemical Oxygen Demand (COD): 13.2178

## Deviations from the LCI method approaches
本文所做研究为典型案例研究而非统计学研究：先以日照市的一家南美白对虾养殖场为例， 运用生命周期评价方法，使用 SimaPro9.0 软件，对南美白对虾养殖产业链各阶段 的碳排放量进行量化和分析。而后运用同样的方法计算出 13 家养殖场对虾产业链 的碳排放量并取均值进行分析

## Data selection and combination
数据来自实地调研13家养殖场，数据真实、有效、 可靠。分别对13个案例计算后的碳排放量取均值进行分析。其次，部分数据源自SimaPro数据库，包含了最新 的基于科学的多种生命周期影响评价方法和数据库

## Data treatment and extrapolations
文献研究者使用 SimaPro9.0 软件，对南美白对虾养殖产业链各阶段的碳排放量进行量化，在此基础上对13 家养殖场对虾产业链的碳排放量并取均值进行分析。其中， 养殖场基础设施建设阶段的信息主要有建筑材料的投入种类、数量以及使用年限 等；虾苗运输阶段的信息主要有虾苗的运输源地与目的地、运输方式、运输重量、 运输距离、运输过程的能源消耗等；成虾养殖阶段的信息主要有水、电、饲料等 能源物质的投入数量以及养殖过程的废水排放数量、废水质量检测情况等；成虾 运输至市场阶段的信息主要有成虾出塘后的运输方式、运输重量、运输距离、运 输目的地以及运输过程产生的能源消耗情况等；基础设施废弃处置阶段的信息主要有废弃物的运输目的地、运输方式、运输重量、运输距离、运输过程所产生的 能源消耗等。文献在进行 LCA 分析时基本假设如下：虾苗运输方式为空运；燃油的消耗陆运按 汽油计算，空运按航空燃油计算；生命周期内所消耗的电能均来自国家电网的居 民用电输出；养殖水默认为地下水。

## Sampling procedure
本文数据主要有两大来源。一是来源于实地调研，2019 年 6 月份、11 月份在山东省日照市涛雒镇固定观察点调研，养殖产业的投入产出数据绝大部分来源于对养殖厂以及饲料加工厂负责人的问卷调查，水质监测数据则取自于当地海洋与渔业研究所的固定监测点，成虾运输至市场数据取自于日照市水产品批发市场以及养殖场负责人的调研。二是来源于生命周期评价软件 Simapro 的数据库

## Use advice
在使用本数据集进行生命周期评估时，应包括提及的所有阶段：养殖场基础设施建设、虾苗运输、虾养殖、市场运输及基础设施废弃处置。应特别注意来自养殖厂和饲料加工厂的输入输出数据的代表性，以及当地水质监测数据。确保数据收集的时间和地点与评估的系统相关，并通过考虑2019年6月和11月的数据来考虑季节差异。如果建模到市场的运输，使用提供的来自日照市水产品批发市场和养殖场调研的运输数据。

## Review details
清单： 内部审查通过几个迭代步骤完成，涉及原始数据验证、原始数据记录、代表性、完整性、与 ISO 14040 和 14044 有关的建模的一致性。

## Data sources
- 马一鸣. 基于生命周期评价方法的南美白对虾养殖产业链碳排放研究. (上海海洋大学, 2021).
