# 稀土铣削|稀土|熔盐电解|钕铁硼磁铁废料

Dataset: ILCD process, Unit process, single operation
Geography: CN
Reference year: 2013
Valid until: 2016
Classification: Materials production / Other mineralic materials
Functional unit: The functional unit of this analysis was chosen as the production of one kg Nd–Pr alloy through extraction from NdFeB magnet scrap
LCI method principle: Attributional
LCI method approaches: Allocation - market value
Generated by: 汪涛, twang@iue.ac.cn
Review: Dependent internal review by Tiangong LCI Data Working Group
Amounts: no units in this file; such an amount is in the reference unit of its flow, which a separate flow dataset defines
copyright: false

## Technology and included processes
代尔夫特理工大学正在实验室规模上开发一种从废磁铁中提取稀土金属的一步回收工艺。实验中使用未磁化、未涂层的磁体样品。将磁体在惰性气氛下球磨以增加表面积以促进电化学反应，并将粉末插入盐浴中。

## Reference product
- magnet: 1; article inperiodical
  magnet. Pre-treatment steps: Only process variant without milling

## Inputs
- Electricity: 0.1206; min 0.0252; max 0.216; uniform; article inperiodical
  Pre-treatment steps: Ball milling
- argon: 0.4; min 0.2; max 0.6; uniform; article inperiodical
  Pre-treatment steps

## Outputs
- magnet powder, ca 200 micron: 0.95; min 0.9; max 1; uniform; article inperiodical
  magnet powder, ca 200 micron. Pre-treatment steps: Only process variant with milling

## Deviations from the LCI method approaches
The allocation of environmental flows to Nd and Pr was updated. Value allocation was used to share the process impacts from both multi-output stages, reflecting prices from recent years (2013–2016). There are two stages in the primary production of rare earths for which assumptions regarding coproductions are necessary: the beneficiation stage, where concentrated iron ore and rare earth concentrate are separated, and the solvent extraction stage undertaken to separate individual rare earths.

## Review details
Inventory: The internal review was done by several iteration steps concerning raw data validation, raw data documentation, representativity, completeness and consistency of modelling with regard to ISO 14040 and 14044.; Documentation: The review of the documentation was performed by Ecobilan and is in compliance with ISO 14040 and 14044. The data set documentation is correct in view of the appropriateness of the information provided. It includes all relevant information in view of data quality and scope of application of the respective LCI result.

## Data sources
- Schulze, R., Abbasalizadeh, A., Bulach, W., Schebek, L. & Buchert, M. An Ex-ante LCA Study of Rare Earth Extraction from NdFeB Magnet Scrap Using Molten Salt Electrolysis. J. Sustain. Metall. 4, 493–505 (2018).
