# 丙烯生产 | 丙烯 | 丙烷脱氢路线 | 丙烷

Dataset: ILCD process, Unit process, black box
Geography: NJ-JS-CN
Reference year: 2015
Classification: Materials production / Other mineralic materials
Functional unit: A functional unit is defined as 1 ton of propylene product
LCI method principle: Attributional
LCI method approaches: Allocation - mass
Generated by: 任亚楠, renyn15@tsinghua.org.cn
Review: Dependent internal review by Tiangong LCI Data Working Group
Amounts: no units in this file; such an amount is in the reference unit of its flow, which a separate flow dataset defines
copyright: false

## General comment
丙烷脱氢采用UOP公司Oleflex工艺，主要包括进料处理、脱丙烷塔、反应单元催化剂连续再生单元、反应器排出物压缩、干燥单元、分离单元、选择性加氢、脱乙烷塔、丙烯丙烷分离塔单元。本项目输入关键参数包括原料(丙烷)、能源(电、蒸汽、新鲜水、天然气)以及辅料(催化剂Pt 等)。产品为丙烯和氢气副产品，同时产生副产品C4、C2。该工艺产生副产品燃料气，并作为能源回收利用，属于能源闭环回收，因此该过程不参与环境影响的质量分配。

## Geography
工艺案例来自中国石化扬子石油化工企业。该企业位于江苏省，工艺建于2015年，丙烯产能为60万吨/年。

## Time period
工艺建于2015年

## Technology and included processes
我国沿海地区的丙烷原料主要从中东地区进口。主要原因在于Oleflex工艺对丙烷原料纯度要求高，而我国丙烷大多数来源于炼油副产品的液化气，其杂质含量高，纯度无法满足工艺的要求。该企业丙烷原料全部进口，因此PDH路线的LCA模型考虑原料运输阶段。假设丙烷经海运11000km至中国南京港口，再经过400km管道运输至企业。

## Reference product
- propene (propylene): 1000; measured
  丙烯

## Inputs
All rows: measured
- Propane: 1240
  丙烷
- platinum: 0.38667
  Pt
- palladium: 0.022
  Pd
- Poly(styrene-divinylbenzene): 0.164
  苯乙烯-二乙烯苯聚合物
- Aluminum oxide (alumina): 0.93085
  氧化铝
- chlorine: 0.10883
  氯气
- Dimethyl disulfide: 0.03717
  二甲基二硫醚
- sodium hydroxide: 7.49
  氢氧化钠
- nitrogen: 8.8
  氮气
- air: 38.7
  装置风
- Water (fresh water): 7390
  新鲜水
- electricity mix: 531.18
  电
- process steam: 2860
  蒸汽
- natural gas: 110
  燃料气

## Outputs
All rows: measured
- C4 Hydrocarbon Mixture: 60
  C4+
- Hydrogen: 40
  氢气
- Ethane: 100
  C2
- carbon dioxide: 410
  CO2
- sulfur dioxide: 0.0314
  SO2
- nitrous oxide: 0.25167
  NOx
- Dust (unspecified, from stack): 0.065
  颗粒物
- chlorine: 0.00462
  氯气
- hydrogen chloride: 0.00168
  HCl
- chemical oxygen demand: 0.00345
  COD
- ammonia: 5e-5
  氨氮

## Deviations from the LCI method approaches
采用质量分配法量化产品丙烯和副产品之间的环境负荷

## Data selection and combination
丙烯生产工艺详细的投入产出数据来自企业公开的环境影响评价报告，包括原料和辅料投入、能源和资源消耗，以及废气、废水和固体废物的排放。

## Review details
Inventory: The internal review was done by several iteration steps concerning raw data validation, raw data documentation, representativity, completeness and consistency of modelling with regard to ISO 14040 and 14044.; Documentation: The review of the documentation was performed by Ecobilan and is in compliance with ISO 14040 and 14044. The data set documentation is correct in view of the appropriateness of the information provided. It includes all relevant information in view of data quality and scope of application of the respective LCI result.

## Data sources
- 吕琳. 丙烯产品环境负荷及温室气体减排的碳税政策. (大连理工大学, 2022).
