# 污泥处理与处置|填埋

Dataset: ILCD process, Unit process, single operation
Geography: XA-SAX-CN
Classification: Materials production / Other mineralic materials
Generated by: 金思甜, 2331276@tongji.edu.cn
Review: Dependent internal review by 天工LCI数据工作小组
Amounts: no units in this file; such an amount is in the reference unit of its flow, which a separate flow dataset defines

## Geography
西安市第三污水处理厂

## Reference product
- Sludge: 1000; input; estimated
  1t含水率76.2%的剩余污泥

## Inputs
- Electricity: 6.426; calculated
- Diesel: 0.000238; calculated

## Outputs
All rows: calculated
- carbon dioxide: 55.033
- methane: 24.459
- carbon monoxide: 0.0007783
- hydrogen chloride: 0.004047
- hydrogen fluoride: 0.0008094
- hydrogen sulfide: 0.01245
- ammonia: 0.04726
- hydrocarbons (unspecified): 0.1245
- cadmium: 0.0001221
- chromium: 0.004736
- lead: 0.003927
- mercury: 4.189e-5
- zinc: 0.02311
- copper: 0.00545
- nickel: 0.001159
- chemical oxygen demand: 0.00595
- ammonia: 0.00149
  氨氮
- Suspended solids, unspecified: 0.00179
- Non Hazardous non organic waste for disposal (unspecific sludges and dusts): 0.399
  烟尘
- Waste (solid): 595
- Biochemical Oxygen Demand: 0.00179

## Review details
清单： 内部审查通过几个迭代步骤完成，涉及原始数据验证、原始数据记录、代表性、完整性、与 ISO 14040 和 14044 有关的建模的一致性。

## Data sources
- 基于生命周期评价的典型剩余污泥处理方法的环境影响比较研究
