# 底泥修复;原位覆盖;运输;运输到场的设备与材料

Dataset: ILCD process, Unit process, black box
Geography: NO
Reference year: 2011
Classification: Unit processes / Other Services / Repair and maintenance
Generated by: 桑春晖, sangch@mail.bnu.edu.cn
Owner: 天工LCI数据工作小组
Review: Dependent internal review by 天工LCI数据工作小组
Amounts: no units in this file; such an amount is in the reference unit of its flow, which a separate flow dataset defines
copyright: false
licenseType: Free of charge for all users and uses

## General comment
所用生物炭来自中国的无烟煤化石产品，运输距离20000km。

## Geography
经查询，暂未找到国内有相关研究文献

## Time period
文献中没有明确数据收集的开始时间，以文献发表时间为有效期的开始时间

## Technology and included processes
运输距离20000km。

## Technical purpose
该数据集代表了通过原位覆盖进行底泥修复的工业过程，该过程涉及使用源自中国的无烟煤化石产品生产的活性炭（AC）。此过程通常包括将必要的设备和材料运输20,000公里到修复现场。主要用途是在生命周期评估（LCA）中进行环境影响评估，尤其是与中国南方情景相符的大规模底泥修复项目。

## Reference product
- Equipment and Materials Arriving on Site: 1; calculated

## Inputs
- Road Transport,Road Transport: 9.52e8; calculated

## Data selection and combination
初级数据清单是根据ISO 14040关于LCA.35的规定获得的。基本数据来自特定场地的盆栽实验、中试和供应商处获取，这些数据代表了中国南方的情况。

## Use advice
在使用此数据集进行生命周期评估时，必须考虑与中国南方底泥修复项目有关的范围和区域适用性。应将设备和材料运输20,000公里的距离纳入评估。由于没有国内研究文献，数据集缺少特定区域数据；因此，基于当地条件的假设必须谨慎进行。由于缺少具体的数据收集开始时间，数据集的有效性从文献发布时间开始。最后，仅应将库存数据用于与类似技术过程相关的LCA，并遵守ISO 14040 LCA.35准则。

## Review details
清单： 内部审查通过几个迭代步骤完成，涉及原始数据验证、原始数据记录、代表性、完整性、与 ISO 14040 和 14044 有关的建模的一致性。

## Data sources
- Sparrevik, M. et al. Use of Life Cycle Assessments To Evaluate the Environmental Footprint of Contaminated Sediment Remediation. Environ. Sci. Technol. 45, 4235–4241 (2011).
