# 土壤和地下水修复;原位;土壤生物通风;处理设施

Dataset: ILCD process, Unit process, single operation
Geography: CA
Reference year: 2007
Classification: Other Services / Engineering and consulting
Generated by: 王宁, wang_ning@caep.org.cn
Owner: 天工LCI数据工作小组
Review: Dependent internal review by 天工LCI数据工作小组
Amounts: no units in this file; such an amount is in the reference unit of its flow, which a separate flow dataset defines
copyright: false
licenseType: Free of charge for all users and uses

## General comment
使用乳胶、玻璃、高密度聚乙烯、生物滤池建设地表土壤气处理设施

## Geography
The contaminated area was located 600 m from a river shore in the northern part of the prov-ince of Quebec， Canada.

## Technology and included processes
使用高密度聚乙烯、乳胶、玻璃、生物滤床等建造地表处理设施

## Technical purpose
所修建的土壤生物通风处理设施用于原位土壤与地下水修复过程。该设施专门设计用于管理和处理使用了高密度聚乙烯（HDPE）、乳胶、玻璃等材料构成的生物滤池的地表土壤气体，解决河岸附近区域的污染问题。

## Reference product
- Treatment facilities: 1; input; estimated
  建造好的地表土壤气处理设施

## Inputs
- polyethylene high density granulate (PE-HD): 19; estimated
  使用高密度聚乙烯建造地表土壤气处理设施
- Biofilter: 1015; estimated
  使用生物滤池建造地表土壤气处理设施
- Latex: 1.4; estimated
  使用乳胶建造地表土壤气处理设施
- glass wool: 108; estimated
  使用玻璃建造地表土壤气处理设施

## Use advice
用于生命周期评估的此数据集用户应注意，所描述过程的主要应用是原位修复受污染的土壤和地下水。应注意地理适应性，考虑所述设施是针对加拿大魁北克省北部距河岸600米特定环境量身定制的。确保正确建模使用阶段行为，考虑到位置相关的环境条件。在LCA中应清楚地证明和记录治疗设施的构建和操作的假设。

## Review details
清单： 内部审查通过几个迭代步骤完成，涉及原始数据验证、原始数据记录、代表性、完整性、与 ISO 14040 和 14044 有关的建模的一致性。
