# 农药制造 | IDA法-二乙醇胺氧化还原法双甘膦工艺+草甘膦合成

Dataset: ILCD process, Unit process, black box
Geography: CN
Reference year: 2021
Classification: Materials production / Other mineralic materials
Functional unit: producing 1 ton glyphosate
Generated by: 玲俐, calinly@163.com
Review: Dependent internal review by Tiangong LCI Data Working Group
Amounts: no units in this file; such an amount is in the reference unit of its flow, which a separate flow dataset defines
copyright: false

## General comment
无流程图

## Reference product
- glyphosate: 1000; software or database
  未在flow_list中找到产品glyphosate草甘膦

## Outputs
All rows: software or database
- Exhaust gas: 9830
  废气
- waste water - untreated: 8280
  工业废水
- chemical oxygen demand: 167
  化学需氧量
- Ammonia Nitrogen: 0.71
  氨氮
- nitrogen, total (excluding N2): 12.4
  总氮
- phosphorus, total: 52.2
  总磷
- volatile organic compound: 103
  挥发性有机物
- hazardous waste (unspecified): 36
  危险废物

## Review details
Inventory: The internal review was done by several iteration steps concerning raw data validation, raw data documentation, representativity, completeness and consistency of modelling with regard to ISO 14040 and 14044.; Documentation: The review of the documentation was performed by Ecobilan and is in compliance with ISO 14040 and 14044. The data set documentation is correct in view of the appropriateness of the information provided. It includes all relevant information in view of data quality and scope of application of the respective LCI result.

## Data sources
- 生态环境部. 263农药制造行业系数手册.pdf. (2021).
