# 生物基氨生产| 氨| 电解| 氮气、氢气

Dataset: ILCD process, Unit process, black box
Geography: CN
Classification: Materials production / Other mineralic materials
Functional unit: In this study, the functional unit is defined as 1 kg of H2 carrier produced from coal, natural gas, and renewables.
LCI method principle: Attributional
Generated by: 唐子睿, tangzirui123@gmail.com
Review: Dependent internal review by Tiangong LCI Data Working Group
Amounts: no units in this file; such an amount is in the reference unit of its flow, which a separate flow dataset defines
copyright: false

## General comment
基于电解的氨制造技术结合了水电解制氢和哈伯-博世氨合成工艺。

## Geography
研究假设甲醇和合成氨生产厂均位于中国西北部，那里煤炭、天然气和太阳能资源丰富。

## Technology and included processes
在这项工作中，我们选择太阳能光伏（PV）作为分解水产生H2和O2的能源。 太阳能光伏发电可以直接将太阳辐射能转化为电能，因其自身的优势逐渐被视为化石燃料的潜在替代品。

## Reference product
- Ammonia: 1000; article inperiodical

## Inputs
All rows: article inperiodical
- electricity: 7200
- Hydrogen: 177
- nitrogen: 822.5
- Ferric oxide: 0.002
- sodium hydroxide: 0.002
- Potassium hydroxide: 0.002

## Data selection and combination
相关数据收集自 Bicer 的研究工作（Bicer et al., 2017）。

## Data treatment and extrapolations
对于基于太阳能光伏的氨生产路线，Bicer等人通过分析基于电解的氨生成过程得出结论，对于理想的Haber-Bosch工艺，将0.177千克氢气与0.823千克氮气结合可以生产1千克氨。

## Review details
Inventory: The internal review was done by several iteration steps concerning raw data validation, raw data documentation, representativity, completeness and consistency of modelling with regard to ISO 14040 and 14044.; Documentation: The review of the documentation was performed by Ecobilan and is in compliance with ISO 14040 and 14044. The data set documentation is correct in view of the appropriateness of the information provided. It includes all relevant information in view of data quality and scope of application of the respective LCI result.

## Data sources
- Zhu, R., Wang, Z., He, Y., Zhu, Y. & Cen, K. LCA comparison analysis for two types of H2 carriers: Methanol and ammonia. Int. J. Energy Res. 46, 11818–11833 (2022).
