# 电力生产 ; 电力 ; 火电（54.7%）+水电（17.2%）+核电（24.1%）+风电（3.4%）+太阳能发电（0.6%）

Dataset: ILCD process, Partly terminated system
Geography: FJ-CN
Reference year: 2019
Classification: Energy carriers and technologies / Electricity
LCI method principle: Other
Generated by: 熊若熙, xiongrx0126@163.com
Owner: 天工LCI数据工作小组
Review: Dependent internal review by 天工LCI数据工作小组
Amounts: no units in this file; such an amount is in the reference unit of its flow, which a separate flow dataset defines
copyright: false
licenseType: Free of charge for all users and uses

## General comment
电力产生形式包括火力发电、水力发电、核能发电、风力发电和太阳能发电

## Time period
根据2019年能源统计年鉴数据计算

## Technical purpose
该数据集代表了包括火力发电、水力发电、核能发电、风力发电和太阳能发电在内的电力生成组合。它用于提供一个地区能源生产组合及其相关环境影响（如碳排放）的洞见。所产生的电力用于各种目的，包括住宅、商业和工业应用。

## Reference product
- Electricity: 3.6; calculated

## Outputs
- carbon dioxide: 0.433; calculated
- sulfur dioxide: 7.5e-5; calculated
- Nitrogen oxides: 0.000115429; calculated
- Dust (unspecified, from stack): 1.5719e-5; calculated

## Data treatment and extrapolations
核算方法参考《企业温室气体排放核算方法与报告指南 发电设施》。不同形式发电量及燃料用量来自于《中国能源统计年鉴 2020》中的第三章（能源生产） 和第六章（地区能源平衡表）。用于计算二氧化碳排放因子的低位发热量、单位热值含碳量等燃料参数来自于《2019 年度中国区域电网二氧化碳基准线排放因子 OM 计算说明》、《企业温室气体排放核算方法与报告指南 发电设施》

## Use advice
在使用此数据进行生命周期评估或碳足迹计算时，用户应确保电力生成来源的混合反映了实际消费比例。应注意遵循《企业温室气体排放核算方法与报告指南 发电设施》提供的方法论指导。定期更新排放因子和能源数据以反映技术改进或能源组合转变的变化是很重要的。根据电力的最终用途，应考虑是否考虑回收潜力的包含或排除。

## Review details
清单： 内部审查通过几个迭代步骤完成，涉及原始数据验证、原始数据记录、代表性、完整性、与 ISO 14040 和 14044 有关的建模的一致性。

## Data sources
- 熊若熙. 中国电力生产和消费二氧化碳与污染物排放因子核算. (清华大学, 2023).
