# 水泥生产|水泥, 硅酸盐水泥, 52.5RMPa|现代干法, 五级窑外分解技术, 4000 t/d

Dataset: ILCD process, Unit process, black box
Geography: DL-LN-CN
Classification: Materials production / Other mineralic materials
Generated by: 杨思琪
Amounts: no units in this file; such an amount is in the reference unit of its flow, which a separate flow dataset defines
copyright: false

## General comment
该公司的生产工艺采用五级窑外分解技术，主要采用德国、法国、日本及部分国内先进的生产设备。水泥生产线有立式原料磨、5级窑外预分解塔、回转窑和配有辊压机的大型球磨机等主要设备组成，同时设有石膏破碎、石灰石粉碎及输送添加设备。

## Geography
大连水泥公司

## Model description
未采用LCA方法建模。

## Reference product
- cement, portland cement, 52.5RMPa: 1000
  水泥，PⅡ52.5R

## Inputs
All rows: measured
- limestone, crushed, for mill: 1216
  石灰石
- clay: 227.2
  粘土
- iron, powder: 47.4
  铁粉
- gypsum (desulphurized): 30
  石膏
- electricity, medium voltage: 311.559
  电
- hard coal: 129.447
  原煤

## Outputs
All rows: calculated
- sulfur dioxide: 0.555
  SO2。建材制品生产过程中排放的SO2主要来源于燃料和原料中所含的硫化物。
- Nitrogen oxides: 0.9225
  NOx。建材制品生产过程中排放的NOx来源主要两种途径。第一种，在高温状态下，空气中的N与O2化合而成，与温度高低有着直接关系。第二种，燃料中的N与O2低温化合而成，与O2的浓度有关系。
- carbon dioxide: 743.805
  CO2。建材工业CO2的产生途径主要来源于燃料燃烧和原材料分解。
- particles (> PM10): 0.4063
  粉尘。建材制品生产过程中粉尘的产生与原材料中粉状物含量有关。未标明粒径，按PM>10处理。
- chemical oxygen demand: 5.3924e-5
  化学需氧量（mg/l）。化学需氧量（COD）是指采用强氧化剂处理废水时，所消耗的氧化剂的量。用它来衡量废水受有机物污染的指标，化学需氧量越大说明废水污染越严重。
- Suspended solids, unspecified: 6.1068e-5
  悬浮物（SS）（mg/l）。建材工业废水排放中的悬浮物主要是指不溶于水的无机物、有机物、泥沙、粘土、微生物等。
- Oils, unspecified: 2.304e-7
  石油类（mg/l）。废水中的油类污染物主要米源于钢铁、焦化、石油化工等生产企业。根据油滴粒径的出大到小，油类物质在废水中有三种存在形式：上浮油、分散油、乳化油，其从废水中的分离难度也依次递增。
- particles (> PM10): 56.7048
  固废，文中指生产过程中产生的扬尘等固体废弃物。未标明粒径，按PM>10处理。

## Data selection and combination
水泥产品评价指标数据通过到水泥生产企业实地调研获得，指标数据来自于企业生产工艺数据。
由于缺乏具体的工业污染物排放统计数据，数据收集过程十分困难，部分数据无法直接获取，因此采用相关能源与原材料折算的方式获取。

## Sampling procedure
DOCC是由太平洋水泥株式会和中国华能综合产业公司两方合资建设并经营的一座大型水泥生产企业。公司成立于1989年，占地面积50万平方米总投资1.88亿美元，公司现有从业人员376人。公司现拥有一条4000t/d规模的现代干法生产线（加强悬浮预热器 （Reinforced Suspension Preheater ，RSP）窑外分解设备），自己独立开采的露天石灰石矿山（年生产石灰石能力为200万吨）和厂内铁路专用线及散装水泥专用线输出码头，年生产水泥190万吨。公司现已通过ISO14001：2004环境管理体系认证证书。

## Data sources
- 李礼. (2012). 建筑材料绿色性的6E综合评价体系研究 [博士, 大连理工大学].
