# 区域勘探 | 有利含油气区带 | 物化探普查

Dataset: ILCD process, Unit process, single operation
Geography: SC-CN
Reference year: 2022
Classification: Materials production / Other mineralic materials
LCI method principle: Attributional
LCI method approaches: Consequential
Generated by: 康诗康, 908798159@qq.com
Review: Dependent internal review by Tiangong LCI Data Working Group
Amounts: no units in this file; such an amount is in the reference unit of its flow, which a separate flow dataset defines
copyright: false

## General comment
从盆地的石油地质调查开始到优选出有利含油气区带的全过程。这是一种从区域出发，最基础的、整体的油气勘探，具有综合性、区域性、整体性的特点，是多工种综合勘探的方式

## Geography
四川盆地

## Time period
文献发表时间

## Technology and included processes
从区域出发，整体地质调查

## Reference product
- natural gas: 32000; input; min 4000; max 16000; uniform; software or database
  普查测线距

## Data selection and combination
从20世纪初期到80年代，国内对于成气的理论主要停留在油生气阶段，此阶段的理论认知限制了我国科研人员在更多条件下发现气藏的可能性

## Data treatment and extrapolations
探明气田位置或者钻探出天然气后，应即时进行目标区域的天然气储量的评价工作。对开采出的天然气进行精确的成分分析，并结合目标区域的条件优化天然气储量的预测评价结果和相关的后续开采方案

## Sampling procedure
基于大数据和超算的虚拟勘探技术、卫星和高空无人机的测控遥感技术等，在近年来的陆基和海基气田的勘探过程中均发挥了重要作用。同时上述技术也为天然气的成长机制的探明提供了有力支持，如帮助探明四川盆地的页岩气的发育关键在于储层流体高压等。同时发展越来越迅速的地球物理技术也为我国的天然气勘探开发和研究工作提供了关键的技术支持

## Review details
Inventory: The internal review was done by several iteration steps concerning raw data validation, raw data documentation, representativity, completeness and consistency of modelling with regard to ISO 14040 and 14044.; Documentation: The review of the documentation was performed by Ecobilan and is in compliance with ISO 14040 and 14044. The data set documentation is correct in view of the appropriateness of the information provided. It includes all relevant information in view of data quality and scope of application of the respective LCI result.

## Data sources
- 郭田超;刘博;邓明; 天然气勘探开发研究. 山西化工 101–102 (2022)
