# 电力生产 ; 电力 ; 火电（67.8%）+水电（7.8%）+核电（21.8%）+风电（1.5%）+太阳能发电（1.0%）

Dataset: ILCD process, Partly terminated system
Geography: GD-CN
Reference year: 2019
Classification: Energy carriers and technologies / Electricity
LCI method principle: Other
Generated by: 熊若熙, xiongrx0126@163.com
Owner: 天工LCI数据工作小组
Review: Dependent internal review by 天工LCI数据工作小组
Amounts: no units in this file; such an amount is in the reference unit of its flow, which a separate flow dataset defines
copyright: false
licenseType: Free of charge for all users and uses

## General comment
电力产生形式包括火力发电、水力发电、核能发电、风力发电和太阳能发电

## Time period
根据2019年能源统计年鉴数据计算

## Technical purpose
该数据集描述了中国混合电力生产过程，包括火力发电（67.8%）、水力发电（7.8%）、核电（21.8%）、风力发电（1.5%）和太阳能发电（1.0%）。它可以用来表示中国电网组合的生命周期评价、碳足迹计算以及其他与能源相关的环境影响研究中的环境表现。所生成的电力可应用于居民和工业活动，以及需要电网电力的商业和公共服务。

## Reference product
- Electricity: 3.6; calculated

## Outputs
- carbon dioxide: 0.482; calculated
- sulfur dioxide: 7.9e-5; calculated
- Nitrogen oxides: 0.000126196; calculated
- Dust (unspecified, from stack): 1.62e-5; calculated

## Data treatment and extrapolations
核算方法参考《企业温室气体排放核算方法与报告指南 发电设施》。不同形式发电量及燃料用量来自于《中国能源统计年鉴 2020》中的第三章（能源生产） 和第六章（地区能源平衡表）。用于计算二氧化碳排放因子的低位发热量、单位热值含碳量等燃料参数来自于《2019 年度中国区域电网二氧化碳基准线排放因子 OM 计算说明》、《企业温室气体排放核算方法与报告指南 发电设施》

## Use advice
使用此数据集时，确保生命周期评价或碳足迹研究的范围与数据所表示的地理边界（中国电网组合）相符。应按照每个电力来源的比例贡献来情境化地应用排放因子。用户还应考虑，CO2基线排放因子是使用与《企业温室气体排放核算方法与报告指南 发电设施》一致的方法以及《中国能源统计年鉴 2020》中的数据计算得出。对于来源于中国的电力，这些值对于能源消耗和温室气体排放建模至关重要。排放因子的更新应随时间监测，以保持准确性。

## Review details
清单： 内部审查通过几个迭代步骤完成，涉及原始数据验证、原始数据记录、代表性、完整性、与 ISO 14040 和 14044 有关的建模的一致性。

## Data sources
- 熊若熙. 中国电力生产和消费二氧化碳与污染物排放因子核算. (清华大学, 2023).
