# 污泥处理与处置|850℃热解

Dataset: ILCD process, Unit process, single operation
Geography: CN
Classification: Materials production / Other mineralic materials
Generated by: 金思甜, 2331276@tongji.edu.cn
Review: Dependent internal review by 天工LCI数据工作小组
Amounts: no units in this file; such an amount is in the reference unit of its flow, which a separate flow dataset defines

## Reference product
- Sludge: 1000; input; estimated
  1t湿污泥含水率 80%

## Inputs
- Electricity: 2080.01
- nitrogen: 5.63

## Outputs
- hydrogen: 1.29
- carbon monoxide: 22.13
- methane: 3.37
- non-methane volatile organic compounds: 0.45
- carbon dioxide: 21.19
- Heat treatment oil: 69.68
- Semi-coke: 75.76

## Review details
清单： 内部审查通过几个迭代步骤完成，涉及原始数据验证、原始数据记录、代表性、完整性、与 ISO 14040 和 14044 有关的建模的一致性。

## Data sources
- 污泥热解反应机制及其能源化工艺的全生命周期评价研究
