# 硅矿开采 | 多排延期爆破技术

Dataset: ILCD process, Unit process, single operation
Geography: CN
Reference year: 2017
Classification: Materials production / Other mineralic materials
Functional unit: In this paper, a 1 kWp solar PV system consisting of five 200 W modules made of 54 multi-Si cells, each with a size of 156*156 mm2 and 16% efficiency, was used as the primary study object
LCI method principle: Attributional
LCI method approaches: Allocation
Generated by: 杨锦锋, yjfzfshn@163.com
Review: Dependent internal review by Tiangong LCI Data Working Group
Amounts: no units in this file; such an amount is in the reference unit of its flow, which a separate flow dataset defines
copyright: false

## General comment
多晶硅

## Geography
2011-2016年中国太阳能光伏产业生命周期环境影响评价

## Time period
文章发表

## Technology and included processes
利用小型井下钻机和炸药，采用多排延时爆破技术，对含有所需矿床的矿源进行分离

## Reference product
- silicon,silicon: 20.2568; article inperiodical
  silicon ore

## Inputs
- Explosive: 1.1254; article inperiodical
  explosive
- gasoline (regular): 0.0081; article inperiodical
  gasoline
- electricity: 2.77128; article inperiodical

## Outputs
All rows: article inperiodical
- carbon dioxide: 0.1324
- sulfur dioxide: 0.1926
- Nitrogen oxides: 0.1384
  oxynitride
- hydrogen sulfide: 0.0963
- ammonia: 0.0512
- Dust (unspecified, from stack): 0.0033
  dust
- mineral treatment residue (unspecified): 0.0014
  solid waste

## Deviations from the LCI method approaches
基于中国太阳能光伏生命周期评价的现有文献
(Fu 等，2015; He，2013; Hong 等，2016; Li 和 Yu，2014; Li 和 Chang，2012; Liang，2012; Yang 等，2015; Yu 等，2017; Xie 等，2015) ，得到了一份生命周期清单

## Review details
Inventory: The internal review was done by several iteration steps concerning raw data validation, raw data documentation, representativity, completeness and consistency of modelling with regard to ISO 14040 and 14044.; Documentation: The review of the documentation was performed by Ecobilan and is in compliance with ISO 14040 and 14044. The data set documentation is correct in view of the appropriateness of the information provided. It includes all relevant information in view of data quality and scope of application of the respective LCI result.

## Data sources
- Xu, L., Zhang, S., Yang, M., Li, W. & Xu, J. Environmental effects of China’s solar photovoltaic industry during 2011–2016: A life cycle assessment approach. Journal of Cleaner Production 170, 310–329 (2018).
