# 水泥生产|水泥, 粉煤灰硅酸盐水泥, 52.5MPa|干法预分解窑|粉煤灰

Dataset: ILCD process, Unit process, black box
Geography: CN
Reference year: 2001
Classification: Materials production / Other mineralic materials
Generated by: 杨思琪
Amounts: no units in this file; such an amount is in the reference unit of its flow, which a separate flow dataset defines
copyright: false

## General comment
干法预分解窑生产水泥。采用计算机自动化系统对从原料贮料到水泥贮存的整个水泥生产进行全面控制，主要设备包括生料磨、熟料磨和熟料煅烧设备。熟料煅烧设备由烧煤新型分解炉（NSF）和熟料冷却机组成。NSF系统包括两列四级旋风预热器和一座分解炉（F.F）。

## Model description
研究范围界定为由原料进厂、原料预处理、生料粉磨、生料煅烧、熟料粉磨，直至水泥均化、储存为止。未包括矿山开采、运输过程、水泥包装等具体过程。

## Reference product
- cement, portland fly-ash cement, 52.5MPa: 1000
  水泥平均标号525号

## Inputs
All rows: measured
- limestone, crushed, for mill: 1274.77
  石灰石
- sandstone: 0.007784
  砂岩
- iron, powder: 51.9989
  铁粉
- bauxite: 61.2503
  矾土
- gypsum (desulphurized): 56.1461
  石膏
- ash: 10.9485
  粉煤灰
- Water (fresh water): 1169.37
  新鲜水
- hard coal: 106.55
  标准煤。原始数据为155.517kt标准煤，这里换算为硬煤，换算公式为1kg硬煤=0.929kg标准煤。
- electricity, medium voltage: 458.389
  电力

## Outputs
- particles (> PM10): 0.320632; measured
  粉尘，未标明粒径，按PM>10处理。
- particles (> PM10): 0.37466; measured
  烟尘，未标明粒径，按PM>10处理。
- sulfur dioxide: 0.574625; measured
  二氧化硫
- Nitrogen oxides: 0.535697; measured
  氮氧化物
- carbon monoxide: 0.080097; measured
  一氧化碳
- carbon dioxide: 811.3
  二氧化碳
- wastewater, unpolluted: 630.543; measured
  原文是工业废水（即水泥生产废水）。

## Data treatment and extrapolations
CO2数据处理：根据1个功能单元的CO2排放数据，计算出生产1567340 t水泥时的CO2排放量。

## Data sources
- 狄向华. (2001). 材料环境协调性评价的标准流程方法研究 [硕士, 北京工业大学].
