# 土壤修复;异位修复;生物堆;工程实施;回填

Dataset: ILCD process
Geography: KR
Classification: Other Services / Repair and maintenance
Generated by: 桑春晖, sangch@mail.bnu.edu.cn
Owner: 天工LCI数据工作小组
Review: Dependent internal review by 天工LCI数据工作小组
Amounts: no units in this file; such an amount is in the reference unit of its flow, which a separate flow dataset defines
licenseType: Free of charge for all users and uses

## General comment
修复后土壤回填至原开挖基坑

## Technical purpose
该数据集描述了一种称为异位生物堆的土壤修复过程。这项技术应用于环境工程，用于处理从原始位置挖出的受污染土壤。处理后，通常将修复后的土壤回填至原开挖基坑。

## Reference product
- clean site: 200; article inperiodical

## Inputs
- Diesel: 0.803; article inperiodical

## Use advice
在使用此数据集进行生命周期评估时，应注意到一经处理的土壤会被送回原地。这意味着在评估的系统边界内应考虑污染土壤的运输和修复土壤的回填。挖掘、处理和回填过程相关的影响应当包括在生命周期评估模型中。此外，与其他修复方法相比，生物堆修复的潜在环境效益（例如污染物的降解）必须在评估中考虑。

## Review details
清单： 内部审查通过几个迭代步骤完成，涉及原始数据验证、原始数据记录、代表性、完整性、与 ISO 14040 和 14044 有关的建模的一致性。
