# Bioethanol ; Fungi

Dataset: ILCD process
Classification: Energy carriers and technologies / Renewable fuels
Generated by: 袁嘉翼, jiayi_y@mail.bnu.edu.cn
Owner: 天工LCI数据工作小组
Review: Dependent internal review by 天工LCI数据工作小组
Amounts: no units in this file; such an amount is in the reference unit of its flow, which a separate flow dataset defines
licenseType: Free of charge for all users and uses

## Inputs
All rows: uniform; article inperiodical
- Electricity: 0
- heat: 376; min 254; max 540
- Electricity: 71.28; max 96.84
- heat: 4230; min 1040; max 5220
- Electricity: 124.2; min 76.68; max 181.08

## Outputs
- heat: 0; uniform; article inperiodical

## Review details
清单： 内部审查通过几个迭代步骤完成，涉及原始数据验证、原始数据记录、代表性、完整性、与 ISO 14040 和 14044 有关的建模的一致性。
