# 水泥生产|水泥, 普通硅酸盐水泥, 52.5MPa|新型干法预分解窑, 焚烧废弃物

Dataset: ILCD process, Unit process, black box
Geography: BJ-CN
Classification: Materials production / Other mineralic materials
Generated by: 杨思琪
Amounts: no units in this file; such an amount is in the reference unit of its flow, which a separate flow dataset defines
copyright: false

## General comment
焚烧废弃物。以新型干法预分解窑系统为对象，对该系统焚烧废弃物的环境影响进行分析。

## Geography
北京地区北京金隅集团下属某水泥厂

## Model description
结合水泥生产过程本身的特点，将研究范围界定为：从原料进厂、原料预处理、生料粉磨、生料煅烧、熟料粉磨，直至水泥均化、储存、包装为止。这里不考虑原料的生产加工过程，只考虑生产过程对环境的影响，即直接原料消耗和直接废物排放的过程。以1吨525#普通硅酸盐水泥所具有的使用性能为一个功能单位，1Fu=52.5tMPa。

## Reference product
- cement, ordinary portland cement, 52.5MPa: 1000
  P.O 52.5水泥

## Inputs
All rows: measured
- limestone, crushed, for mill: 1318.5
  石灰石
- clay: 94.5
  粘土质原料
- iron, powder: 27
  铁质校正原料
- gypsum (desulphurized): 60
  石膏占比为5.5%
- mixed materials, mineral: 200
  混合材
- Waste, from industry: 12.5; min 10; max 15; uniform
  工业废弃物
- hard coal, run-of-mine: 120
  煤耗
- electricity, medium voltage: 363.6
  电耗
- hard coal: 129.156
  标煤。原文实际是燃料油消耗（L），等量为标煤。原始数据为120kg标准煤，这里换算为硬煤，换算公式为1kg硬煤=0.929kg标准煤。

## Outputs
All rows: measured
- Nitrogen oxides: 1.43
  NOx
- sulfur dioxide: 0.003
  SO2
- hydrogen chloride: 0.00945
  HCI
- fluorine: 0.000685
  F
- particles (> PM10): 0.0098
  烟尘，未标明粒径，按PM>10处理。
- mercury: 1.55e-6; min 1.3e-6; max 1.8e-6; uniform
  Hg
- arsenic: 5.1e-5; min 1.3e-5; max 8.9e-5; uniform
  AS
- chromium: 2.6e-5
  Cr
- copper: 3.53e-5; min 2.6e-6; max 6.8e-5; uniform
  Cu
- lead: 5.25e-5; min 2.6e-5; max 7.9e-5; uniform
  Pb
- zinc: 0.00062; min 0.00014; max 0.0011; uniform
  Zn
- cadmium: 3.95e-6; min 2.6e-6; max 5.3e-6; uniform
  Cd
- nickel: 3.15e-5; min 2.6e-5; max 3.7e-5; uniform
  Ni

## Cut-off and completeness
缺少CO2排放数据。

## Data sources
- 富丽. (2004). 生态水泥生命周期评价研究 [硕士, 北京工业大学].
