# 玻璃生产 ;钢化玻璃;钢化处理

Dataset: ILCD process, Unit process, single operation
Geography: KM-YN-CN
Reference year: 2015
Valid until: 2023
Classification: Unit processes / Materials production / Glass and ceramics
Generated by: 和夏夏, 18616148319@163.com
Owner: 天工LCI数据工作小组
Review: Dependent internal review by 天工LCI数据工作小组
Amounts: no units in this file; such an amount is in the reference unit of its flow, which a separate flow dataset defines
copyright: false
licenseType: Free of charge for all users and uses

## General comment
该数据集描述了玻璃生产中的钢化处理阶段，其结果是生产钢化玻璃。钢化玻璃是一种安全玻璃，通过受控的热处理或化学处理来增强其与普通玻璃相比的强度。由于其安全性和强度，它通常用于各种应用，如车辆窗户、淋浴门、建筑玻璃门和桌子，以及在防护屏幕和防弹玻璃中。

## Reference product
- Glass (formed & finished): 250000; measured
  钢化玻璃

## Inputs
- Electricity: 518130; measured
- Glass (formed & finished): 303000; measured

## Outputs
- Glass (formed & finished): 50000; measured
  中空玻璃
- cullet float glass: 3201.5; measured

## Use advice
在使用此数据集进行生命周期评估（LCA）时，应考虑钢化处理过程中的能源消耗和排放。该数据集应用于模拟与生产钢化玻璃相比其他类型的玻璃的特定影响。在应用数据时，应确保数据被应用于正确的生命周期阶段。此外，如果钢化玻璃后来被回收或再利用，应在LCA中适当地计入终生阶段，这可能包括使用单独的数据集来进行回收或再利用过程。

## Review details
清单： 内部审查通过几个迭代步骤完成，涉及原始数据验证、原始数据记录、代表性、完整性、与 ISO 14040 和 14044 有关的建模的一致性。

## Data sources
- 建设项目环境影响报告表（国环评证乙字 第 2501 号）
