# 甲苯生产 | 甲苯 | 石脑油路线 | 石脑油

Dataset: ILCD process, Unit process, black box
Geography: CN
Reference year: 2006
Classification: Materials production / Other mineralic materials
Functional unit: A functional unit is defined as 1 ton of toluene product
LCI method principle: Attributional
LCI method approaches: Allocation - mass
Generated by: 任亚楠, renyn15@tsinghua.org.cn
Review: Dependent internal review by Tiangong LCI Data Working Group
Amounts: no units in this file; such an amount is in the reference unit of its flow, which a separate flow dataset defines
copyright: false

## General comment
芳烃联合装置，阿罗沙文法工艺

## Geography
对二甲苯生产工艺的运行状况和环境负荷等进行了实地调研和数据采集

## Time period
未提及，以文献发表时间代替

## Reference product
- toluene: 1; measured
  甲苯

## Inputs
- naphtha: 0.68; measured
  石脑油
- light fuel oil: 0.27; measured
  燃料油
- electricity mix: 0.072; measured
  电力

## Outputs
All rows: measured
- waste water - untreated: 0.11
  废水总量
- Oils, unspecified: 1e-5
  石油类
- chemical oxygen demand: 0.00124
  COD
- sulfur dioxide: 0.0018
  SO2
- nitrous oxide: 0.00413
  NOx
- carbon monoxide: 0.00363
  CO
- carbon dioxide: 0.74
  CO2
- Dust (unspecified, from stack): 0.00189
  烟尘

## Deviations from the LCI method approaches
研究采用产品质量作为清单数据的分配原则

## Data treatment and extrapolations
采用质量分配法量化产品和副产品之间的环境负荷

## Review details
Inventory: The internal review was done by several iteration steps concerning raw data validation, raw data documentation, representativity, completeness and consistency of modelling with regard to ISO 14040 and 14044.; Documentation: The review of the documentation was performed by Ecobilan and is in compliance with ISO 14040 and 14044. The data set documentation is correct in view of the appropriateness of the information provided. It includes all relevant information in view of data quality and scope of application of the respective LCI result.

## Data sources
- 马骕. 涤纶纺织品的生命周期评价. (东华大学, 2007).
