# 水泥生产|水泥, 未具体说明|混合固废

Dataset: ILCD process, Unit process, black box
Geography: CN
Classification: Materials production / Other mineralic materials
Generated by: 杨思琪
Amounts: no units in this file; such an amount is in the reference unit of its flow, which a separate flow dataset defines
copyright: false

## General comment
磷石膏制备生态水泥。实验室数据。在磷石膏基生态水泥试验中，主要原料主要有以下几种：磷石膏、粉煤灰、消石灰、水泥和早强剂。
先将磷石膏放入温度为 45°C烘箱中烘干至恒重以去除磷石膏中的游离自由水，然后将烘干后的磷石膏放到高温电炉中煅烧一定的时间。将煅烧好的磷石膏放入行星式球磨机中球磨 6min，随后将球磨好的磷石膏过 0.08mm 的标准筛。在准备磷石膏的同时，粉煤灰和消石灰也过 0.08mm 的筛子，然后放入干燥箱中烘干。实验中所用的水泥也需要烘干。上述原料预处理完毕后，通过设计好的配比计算配料，然后再将配好的混合料在球磨机中球磨 3min 来混合均匀。混合均匀后的混合料均化 2-3 小时后，称量倒入 JJ-5 型行星式水泥胶砂搅拌机进行搅拌，用 ZS-15 型水泥胶砂振实台振动成型，成型好的水泥试块放置 24h 后脱模，自然养护，达到一定的龄期后进行强度检测。

## Model description
实验室开发的 1t 磷石膏基生态水泥作为功能单位。磷石膏基生态水泥研究的系统范围边界界定为磷石膏的煅烧、熟料粉磨和生态水泥制备，最后到水泥储存结束。

## Reference product
- cement, unspecified: 1000
  磷石膏基生态水泥。来自实验室数据。

## Inputs
- phosphogypsum: 340
  磷石膏。来自实验室数据。实验室所用磷石膏由湖北襄樊乾泰化工有限公司提供，颜色呈深灰色，为类似泥沙状混合物，其含水率为21.66%。
- ash: 430
  粉煤灰。来自实验室数据。本实验所使用的粉煤灰来自平顶山，为干排灰。
- lime, hydraulic: 10
  消石灰。来自实验室数据。消石灰是生石灰加水消化后的产物。
- cement, ordinary portland cement, 32.5MPa: 200
  P.O.32.5。来自实验室数据。实验所用水泥为PO32.5普通硅酸盐水泥。
- early strength agent: 20
  早强剂。来自实验室数据。实验所用早强剂为自制复合外加剂。
- hard coal, run-of-mine: 100
  煤。来自实验室数据。
- electricity, medium voltage: 165.6
  电。来自实验室数据。

## Outputs
- carbon dioxide: 257
  CO2。来自实验室数据。

## Data sources
- 张乐. (2009). 磷石膏基生态水泥的开发及其生命周期评价研究 [硕士, 华中科技大学].
