# 熟料生产|熟料|新型悬浮预热器

Dataset: ILCD process, Unit process, single operation
Geography: CN
Classification: Materials production / Other mineralic materials
Generated by: 杨思琪
Amounts: no units in this file; such an amount is in the reference unit of its flow, which a separate flow dataset defines
copyright: false

## General comment
在新型悬浮预热器（New suspension preheater，NSP）窑中，生料的研磨和熟料的煅烧紧密地结合成一个完整的程序阶段。此外，在煅烧过程中窑内剩余的热量被用于磨料过程中通过添加煤粉干燥或烘烤原材料。
NSP窑是一个高效、生产连续性好、产量高、总能耗低的生产系统。此外，NSP窑的除尘和降噪设备更好，生产系统可以大大减少资源消耗和污染物排放。

## Model description
系统边界包括生料的制备阶段（包括磨碎）和产生熟料的煅烧阶段。

## Reference product
- clinker: 1000
  水泥熟料

## Inputs
All rows: measured
- limestone, crushed, for mill: 1497.2
  石灰石
- clay: 276.5
  黏土
- iron, powder: 80.8
  铁粉
- Water (fresh water): 45.6
  水（水含量）：输入材料中的水。
- oxygen: 400
  O2
- hard coal, run-of-mine: 150
  煤炭

## Outputs
All rows: measured
- particles (> PM10): 4
  灰尘，未标明粒径，按PM>10处理。
- carbon dioxide: 799.8
  二氧化碳
- sulfur dioxide: 0.6
  SO2
- Nitrogen oxides: 2.4
  NOx
- water vapour: 45.6
  蒸汽
- Waste, solid, from cement production: 103.9
  其他物质。原文没有指明是什么物质，所以我们假设它是固体废物。

## Data sources
- Dan Hu, Zhen Guo, Zhen Wang, & Qiang Xiao. (2015). Metabolism analysis and eco-environmental impact assessment of two typical cement production systems in Chinese enterprises. Ecological Informatics 26, 70–77.
