# 水泥生产|水泥, 普通硅酸盐水泥, 42.5MPa|新型干法, 低温余热发电技术, 2000 t/d|粉煤灰

Dataset: ILCD process, Unit process, black box
Geography: HLJ-CN
Reference year: 2008
Classification: Materials production / Other mineralic materials
Generated by: 杨思琪
Amounts: no units in this file; such an amount is in the reference unit of its flow, which a separate flow dataset defines
copyright: false

## General comment
实验室数据。新型干法低温余热发电。
应用黑龙江乙炔化工行业所产生的电石渣烧制水泥。
新型干法生产线低温余热发电的工艺以窑头熟料冷却机和窑尾预热器排出350左右烟气余热作为供热能源，通过低压补汽式汽轮机进行低温余热发电。在窑头冷机和余风风机之间布置一台篦式冷却机（Air Quenching Cooler，AQC）余热锅炉（立式结构），在篦式冷却机（AQC）锅炉之前布置有沉降室；在窑尾一级旋简出口与高温风机之间装一台悬浮预热器（SP）余热锅炉。
篦式冷却机（AQC）锅炉采用中部抽气带余风再循环方式，将原余风抽风口改为两个抽风口，新开抽风口一个靠前一个挪后，靠前的高温抽风口热风经沉降室回收部分飞灰后送至篦式冷却机（AQC）锅炉，挪后的低温抽风与篦式冷却机（AQC）锅炉出风混合后经原水泥生产线的除尘系统处理。窑尾废气经悬浮预热器（SP）锅炉吸热降温至230C左右，由高温风机将一部分送至原系统的生料磨，另外一部分经增湿塔增湿后至察尾收尘器若发电系统停用，则废气经原系统的废气管道进入高温风机，可确保水泥生产线稳定运行。
通过热能交换，锅炉产生过热蒸汽，送到分汽缸进行混合，然后通过过热蒸汽管进入汽轮机发电。经汽轮机的乏汽进入凝汽器，蒸汽在凝汽器中凝结成水，汇入热水井，然后由水泵送往真空除氧器，再经给水泵泵入篦式冷却机（AQC）锅炉循环使用。

## Geography
牡丹江新材料科技有限公司

## Model description
以1kg28天抗压强度为42.5MPa的水泥所具有的使用性能作为功能单位，即1Fu=42.5kgMPa。评价范围为生料准备、熟料煅烧和水泥制备。粘土类资源消耗造成的环境负荷暂不考虑。铁粉属于铁质校正材料，其引发的环境影响不予考虑。产品系统输出端考虑排放的废弃物主要包括氮氧化物、二氧化硫、二氧化碳及粉尘。

## Reference product
- cement, ordinary portland cement, 42.5MPa: 1000
  42.5普通硅酸盐水泥

## Inputs
- limestone, crushed, for mill: 1104.4
  石灰石
- gypsum (desulphurized): 58.7
  石膏
- ash: 319.4
  粉煤灰
- hard coal: 100.526
  标准煤。原始数据为0.0934kg标准煤，这里换算为硬煤，换算公式为1kg硬煤=0.929kg标准煤。
- electricity, medium voltage: 211.32
  电力

## Outputs
- particles (> PM10): 0.249
  粉尘
- sulfur dioxide: 0.3893
  二氧化硫
- Nitrogen oxides: 1.557
  氮氧化物
- carbon dioxide: 813.1
  二氧化碳

## Data selection and combination
结合牡丹江新材料科技有限公司新型干法余热利用节能技术改造设计，对所确定产品系统的输入、输出数据进行收集，并对数据进行了计算、量化。
（1）可利用余热条件。2000t/d新型干法生产线2条。为保证余热品质，窑头余热炉进风从馆冷机中部抽取，取风量为2x170329Nm^3/h，废气温度360，余热利用温度范围360~86，具有12302E+4kJ/h的热量；尾预热器取风量2x203147Nm^3/h，废气温度350，考虑煤磨供干耗热，余热利用范围350-205，具有7927E+4kJ/h的热量。
（2）装机容量。利用窑尾废气余热，设置窑尾余热锅炉，2台窑尾余热锅炉可生产2x13.5t/h-1.35Mpa-320过热蒸汽；利用窑头熟料冷却机废气余热，设置窑头余热锅炉，2台窑头余热锅炉可生产2x9.0t/h-1.35Mpa-345过热蒸汽，同时生产62t/h-170热水，其中44t/h供给窑头和尾余热锅炉生产主蒸汽，18t/h供给汽轮机房闪蒸生产低压饱和蒸汽。根据余热锅炉所能产生的主汽品味，选用补汽进汽式汽轮机，主蒸汽参数为1.25MPa-320；头、尾共生产主蒸汽量45t/h，头锅炉生产的低压蒸汽量5t/h；按汽轮机和发电机整体效率805%计算，平均余热发电功率为8600kW.
（3）节约电能。根据低温余热电站实际运行状况和发电效率，电站平均发电功率为8600kW，以年运行7200h计算，年发电6192E+4kWh；扣除7.8%电站自用电率，即483E+4kWh，余热电站实际向生产线供电5709E+4kWh。
（4）减少排放。余热锅炉废气入口处设置干扰式分离器，有利于废气中粉尘沉降，使水泥窑废气中粉尘含量下降近50%；由于北方采用火力发电，故节约电能减少发电过程中煤燃烧引发的CO2、SO2及NOx排放。
通过上述分析，计算获取新型干法低温余热发电方案下，水泥工业环境影响评价编目分析数据。

## Data sources
- 于淼. (2008). 黑龙江水泥工业可持续发展研究 [硕士, 哈尔滨工业大学].
