# 水泥生产|水泥, 普通硅酸盐水泥, 42.5MPa|机械立窑

Dataset: ILCD process, Unit process, black box
Geography: CN
Reference year: 2005
Classification: Materials production / Other mineralic materials
Generated by: 杨思琪
Amounts: no units in this file; such an amount is in the reference unit of its flow, which a separate flow dataset defines
copyright: false

## General comment
典型机械化立窑水泥厂。
立窑生产工艺流程相对简单，原料之一的石灰石经破碎机破碎后进入碎石库，原料粘土、铁粉经烘干后分别进入干燥的粘土库、铁粉库。燃料无烟煤经碎煤机破碎后（有时也要烘干）进入原料库，在库底经下料、计量设备按比例准确配合后喂入生料磨粉磨。经粉磨合格后的生料入生料库进行均化、存储。均化后的生料经计量与适量水配合，在生料成球系统中进行成球，然后送入立窑上部经布料器撒入窑内煅烧成熟料。出窑熟料进入熟料库中存储；混合材料经烘干机烘千后也入库存储；石膏经破碎后进入石膏库。熟料、混合材料和适量石膏经计量后按比例配合送入水泥磨中粉磨，粉磨合格后的水泥送入水泥库中，经检验，最后进行包装或散装出厂。

## Model description
以1千克28天抗压强度为42.5MPa的水泥所具有的使用性能为功能单位，即IFu=42.5kgMPa。
研究范围界定为：原料预处理一生料粉磨一生料煅烧一熟料粉磨一水泥均化一水泥储存。

## Reference product
- cement, ordinary portland cement, 42.5MPa: 1000
  P.O. IFu=42.5kg MPa。

## Inputs
All rows: measured
- limestone, crushed, for mill: 1093.8
  石灰石
- clay: 159.6
  粘土
- gypsum (desulphurized): 51.9
  石膏
- hard coal: 210.201
  标准煤。原始数据为0.1953kg标准煤，这里换算为硬煤，换算公式为1kg硬煤=0.929kg标准煤。
- electricity, medium voltage: 298.8
  电力

## Outputs
- particles (> PM10): 0.6; measured
  粉尘，未标明粒径，按PM>10处理。
- sulfur dioxide: 0.3993; measured
  二氧化硫。考虑到国内水泥厂运行的实际情况和未来很长时间的发展趋势，本次评价采用实测数据的统计平均值。
- Nitrogen oxides: 0.8225; measured
  氮氧化物。考虑到国内水泥厂运行的实际情况和未来很长时间的发展趋势，本次评价采用实测数据的统计平均值。
- carbon dioxide: 1070.3; measured
  二氧化碳。考虑到国内水泥厂运行的实际情况和未来很长时间的发展趋势，本次评价采用实测数据的统计平均值。

## Data sources
- 曹晓润. (2005). 低环境负荷型水泥的生态环境评价 [硕士, 武汉理工大学].
