# 盆地模拟| 海相碳酸盐岩6000-10000m| 动力学模拟技术

Dataset: ILCD process, Unit process, single operation
Geography: XJ-CN
Reference year: 2022
Classification: Materials production / Other mineralic materials
LCI method principle: Attributional
LCI method approaches: Consequential
Generated by: 康诗康, 908798159@qq.com
Review: Dependent internal review by Tiangong LCI Data Working Group
Amounts: no units in this file; such an amount is in the reference unit of its flow, which a separate flow dataset defines
copyright: false

## General comment
针对塔里木盆地寒武系超深层含油气系统复杂的成藏特征，采用动力学模拟技术探讨了寒武系“源－圈－藏”的 演 化 过 程，揭 示 了超深层含油气系统油气“生 成 －运 移 －聚 集 －调 整 ”的 演 化 历 史

## Geography
塔里木盆地

## Time period
文献发表时间

## Technology and included processes
对台盆区巴楚隆起和塔 北隆起的超深层含油气系统开展成藏动力学模拟，通 过对典型剖面地质条件进行时间设定，来约束各时期油气充注和运移的通道和方向。

## Reference product
- natural gas: 30200; max 30200; uniform; article inperiodical
  吾松格尔组 （6597～6835ｍ）的 天 然 气 产 量

## Outputs
- natural gas: 0.2; log-normal; article inperiodical
  整体成熟度
- natural gas: 0.00055; log-normal; article inperiodical
  HI的平均值

## Data selection and combination
采用盆地模拟技术对塔里木盆地寒武 系超深层 “源－圈－藏”系 统 重 点开展了热演化史 、生 烃史和运聚史分析 ，并 结合关键时刻流体的流线模拟结 果，探讨了寒武系超深层含油气系统的油气充注过程，以期为塔里木盆地超深层油气勘探提供相关依据

## Data treatment and extrapolations
塔北斜坡带、顺托果勒低隆起和麦盖提斜坡带烃源岩的整体成熟度低于２％ ，处于高成熟阶段，目前仍然具有较好的生烃潜力

## Review details
Inventory: The internal review was done by several iteration steps concerning raw data validation, raw data documentation, representativity, completeness and consistency of modelling with regard to ISO 14040 and 14044.; Documentation: The review of the documentation was performed by Ecobilan and is in compliance with ISO 14040 and 14044. The data set documentation is correct in view of the appropriateness of the information provided. It includes all relevant information in view of data quality and scope of application of the respective LCI result.

## Data sources
- 李斌;张欣;郭强;吕海涛;杨素举;徐勤琪;彭军; 塔里木盆地寒武系超深层含油气系统盆地模拟. 石油学报 804–815 (2022).
