# 开采阶段|油、气|水平井|钻井

Dataset: ILCD process, Unit process, single operation
Geography: LN-CN
Reference year: 2006
Classification: Materials production / Other mineralic materials
LCI method principle: Attributional
LCI method approaches: Consequential
Generated by: 李梓萌, 1577978537@qq.com
Review: Dependent internal review by Tiangong LCI Data Working Group
Amounts: no units in this file; such an amount is in the reference unit of its flow, which a separate flow dataset defines
copyright: false

## General comment
水平井钻井技术经过长期实践证明能够提高采收率,是转换开发各类油气藏的有效方法

## Geography
欢喜岭油田位于辽河坳陷西部凹陷西斜坡南段

## Time period
2006年6月12日,我国欢喜岭油田的新井开始投产使用

## Technology and included processes
欢喜岭油田因地制宜的设计和改进水平井技术,在其主井眼上钻出几个水平的井眼,形成了水平井的分支,增大了油田的开采效率,也促进了我国采油技术方法的进步和完善。

## Reference product
- LPG - liquefied petroleum gas: 21100; uniform; article inperiodical
  日产油吨数

## Outputs
- LPG - liquefied petroleum gas: 22000; uniform; article inperiodical
  每天日产液吨数
- LPG - liquefied petroleum gas: 3840; uniform; article inperiodical
  日产气

## Review details
Inventory: The internal review was done by several iteration steps concerning raw data validation, raw data documentation, representativity, completeness and consistency of modelling with regard to ISO 14040 and 14044.; Documentation: The review of the documentation was performed by Ecobilan and is in compliance with ISO 14040 and 14044. The data set documentation is correct in view of the appropriateness of the information provided. It includes all relevant information in view of data quality and scope of application of the respective LCI result.

## Data sources
- 浅析水平井钻井技术在石油开发中的应用 - 中国知网.
