# 熟料生产|熟料|新型干法, 5000 t/d

Dataset: ILCD process, Unit process, black box
Geography: GD-CN
Reference year: 2009
Classification: Materials production / Other mineralic materials
Generated by: 杨思琪
Amounts: no units in this file; such an amount is in the reference unit of its flow, which a separate flow dataset defines
copyright: false

## General comment
新型干法生产水泥熟料。原料消耗和能源消耗记录平均值。

## Geography
广州珠江水泥厂

## Model description
每生产1t熟料定义为1功能单位。将原料入厂设定为生命周期的起点，终点设定为熟料烧成阶段。

## Reference product
- clinker: 1000
  熟料

## Inputs
All rows: measured
- limestone, crushed, for mill: 1300
  石灰石
- clay: 100
  黏土
- gypsum (desulphurized): 70
  石膏
- iron ore: 21
  铁矿石
- hard coal, run-of-mine: 110
  煤
- electricity, medium voltage: 378
  电

## Outputs
- carbon dioxide (fossil): 277; calculated
  CO2（化石燃料燃烧）
- carbon dioxide: 647; calculated
  CO2（石灰石分解）
- sulfur dioxide: 0.31; measured
  SO2
- Nitrogen oxides: 1.88; measured
  NOx
- particles (> PM10): 0.025; measured
  粉尘，未标明粒径，按PM>10处理。

## Data sources
- 周奇, 黄启飞, 王琪, & 李丽. (2009). 废皮革水泥窑共处置生命周期评价. 环境科学研究, 22(4), 506–510.
