# 电力生产 ; 电力 ; 火电（58.6%）+水电（34.9%）+风电（4.8%）+太阳能发电（1.7%）

Dataset: ILCD process, Partly terminated system
Geography: HUN-CN
Reference year: 2019
Classification: Energy carriers and technologies / Electricity
LCI method principle: Other
Generated by: 熊若熙, xiongrx0126@163.com
Owner: 天工LCI数据工作小组
Review: Dependent internal review by 天工LCI数据工作小组
Amounts: no units in this file; such an amount is in the reference unit of its flow, which a separate flow dataset defines
copyright: false
licenseType: Free of charge for all users and uses

## General comment
电力产生形式包括火力发电、水力发电、风力发电和太阳能发电

## Time period
根据2019年能源统计年鉴数据计算

## Technical purpose
所描述的工业过程是通过混合来源产生电力：火力发电（58.6%）、水力发电（34.9%）、风力发电（4.8%）和太阳能发电（1.7%）。这种电力可以用于包括居民、商业、工业和交通部门在内的广泛应用，具体取决于现有的电网和配电系统。

## Reference product
- Electricity: 3.6; calculated

## Outputs
- carbon dioxide: 0.482; calculated
- sulfur dioxide: 8.1e-5; calculated
- Nitrogen oxides: 0.000129406; calculated
- Dust (unspecified, from stack): 1.7427e-5; calculated

## Data treatment and extrapolations
核算方法参考《企业温室气体排放核算方法与报告指南 发电设施》。不同形式发电量及燃料用量来自于《中国能源统计年鉴 2020》中的第三章（能源生产） 和第六章（地区能源平衡表）。用于计算二氧化碳排放因子的低位发热量、单位热值含碳量等燃料参数来自于《2019 年度中国区域电网二氧化碳基准线排放因子 OM 计算说明》、《企业温室气体排放核算方法与报告指南 发电设施》

## Use advice
在使用数据集时，确保正确应用碳排放因子至所指明的电力生成类型至关重要。计算应参考《企业温室气体排放核算方法与报告指南 发电设施》提供的方法论指南。重要的是要账户记录区域变化和统计数据的特定年份，如《中国能源统计年鉴 2020》所示。用户必须考虑这一数据集对其具体应用的技术相关性，并确保适当模拟每种类型的发电的使用阶段行为。

## Review details
清单： 内部审查通过几个迭代步骤完成，涉及原始数据验证、原始数据记录、代表性、完整性、与 ISO 14040 和 14044 有关的建模的一致性。

## Data sources
- 熊若熙. 中国电力生产和消费二氧化碳与污染物排放因子核算. (清华大学, 2023).
