# 华东(恒台)玉米生产 | 玉米种植（N2）

Dataset: ILCD process
Geography: ZB-SD-CN
Reference year: 2003
Valid until: 2004
Classification: Materials production / Other mineralic materials
Functional unit: 1t
Generated by: 张浩然, hrzhang@whu.edu.cn
Review: Dependent internal review by Tiangong LCI Data Working Group
Amounts: no units in this file; such an amount is in the reference unit of its flow, which a separate flow dataset defines
copyright: false

## Geography
恒台县

## Reference product
- maize: 1000

## Outputs
All rows: article inperiodical
- water: 244
  N2
- carbon monoxide: 0.31
  N2
- Nitrogen oxides: 0.26, 2.81 (2 entries)
  N2
- carbon dioxide (fossil): 1244.75
  N2
- methane (fossil): 1.05
  N2
- sulfur dioxide: 2.83
  N2
- ammonia: 3.5
  N2
- nitrate: 3.64
  N2
- ammonium: 0.6
  N2
- nitrogen, total (excluding N2): 0.05
  N2
- phosphorus, total: 0.04
  N2
- chemical oxygen demand: 0.44
  N2

## Deviations from the LCI method approaches
研究的起始边界从与夏玉米生命周期有关的 矿石和能源开采开始终止边界为作物种植管理输 出农产品和污染物

## Data selection and combination
原料阶段和农资阶段的能耗、水耗等技术经济 指标来自《中国统计年鉴》（2005～2008）、《中国环 境年鉴》（2004～2006）、《中国能源统计年鉴》（2004 ～2006）、《中国化学工业年鉴》（2006）和《中国电力 年鉴》（2005～2006）等种植阶段的相关数据来自 田间记录．各阶段主要的大气污染物和水污染物包 括ＳＯ2、ＣＨ4、ＣＯ2、ＣＯ、Ｎ2Ｏ、ＣＯＤ、ＮＨ3和ＮＯｘ等其 排放系数来自国内公开发表文献（狄向华等2005； 胡志远等2006；段宁2007）．种植阶段与碳、氮有 关的各种排污系数来自中国农业大学山东桓台实 验站及其它研究机构在华北平原开展的研究报道

## Data treatment and extrapolations
分为特 征化、标准化和加权评估3个步骤

## Sampling procedure
中国农业大学山东桓台实验站2003～ 2004年夏玉米肥料实验的4个施氮处理为典型研 究对象4个氮肥处理用量分别是0、100、200、300 ｋｇ·ｈｍ—2·ａ—1分别以Ｎ0、Ｎ1、Ｎ2、Ｎ3表示

## Review details
Inventory: The internal review was done by several iteration steps concerning raw data validation, raw data documentation, representativity, completeness and consistency of modelling with regard to ISO 14040 and 14044.; Documentation: The review of the documentation was performed by Ecobilan and is in compliance with ISO 14040 and 14044. The data set documentation is correct in view of the appropriateness of the information provided. It includes all relevant information in view of data quality and scope of application of the respective LCI result.

## Data sources
- 王明新吴文良夏训峰．2010．华北高产粮区夏玉米生命周期环境影响评价［Ｊ］．环境科学学报30（6）：1339—1344
