# 土壤修复;原位修复;生物强化修复;设备运行;加热&冷却

Dataset: ILCD process, Unit process, single operation
Geography: SH-CN
Classification: Other Services / Repair and maintenance
Generated by: 肖萌, xiaomeng@mail
Owner: 天工LCI数据工作小组
Review: Dependent internal review by 天工LCI数据工作小组
Amounts: no units in this file; such an amount is in the reference unit of its flow, which a separate flow dataset defines
licenseType: Free of charge for all users and uses

## General comment
CHC+ISB工艺用于含氯挥发性有机化合物(CVOCs)污染场地的原位土壤和地下水修复。该工艺特别适用于旨在净化含氯挥发性有机污染物地下水含水层的环境工程项目。工艺包括使用设备通过加热和冷却调控温度，以加强土壤中微生物降解污染物的能力。该技术适用于大规模修复工作，例如中国上海地区面积为20,000平方米、深度为50米的场所，水位位于地表下30米深处。

## Geography
The aquifer in a certain area in Shanghai, China, is uniformly contaminated with chlorinated volatile organic compounds (CVOCs), with a surface area of 20,000 m2 and a depth of 50 m, with the water table located at a depth of 30 m.

## Reference product
- Cooling groundwater: 600000; measured
  加热冷却后的污染地下水

## Inputs
- Electricity: 1.5552e8; software or database

## Use advice
使用CHC+ISB原位修复工艺数据时，确保LCA的范围包括修复项目的整个生命周期，包括设备的制造、操作和报废。特别需考虑加热与冷却阶段的特定能耗和排放。此数据特定于上海含水层的具体情境和污染水平；在不同情境或不同CVOC浓度状况下应用可能需要进行调整。在LCA模型中，必须考虑温度调节对含水层生态系统可能产生的环境影响。

## Review details
清单： 内部审查通过几个迭代步骤完成，涉及原始数据验证、原始数据记录、代表性、完整性、与 ISO 14040 和 14044 有关的建模的一致性。

## Data sources
- Ni, Z. et al. Comparative Life-Cycle Assessment of Aquifer Thermal Energy Storage Integrated with in Situ Bioremediation of Chlorinated Volatile Organic Compounds. Environ. Sci. Technol. 54, 3039–3049 (2020).
