# 土壤和地下水修复;原位;地下水抽出处理;施工;抽提井施工

Dataset: ILCD process, Unit process, single operation
Geography: JS-CN
Reference year: 2022
Classification: Other Services / Repair and maintenance
Generated by: 王宁, wang_ning@caep.org.cn
Owner: 天工LCI数据工作小组
Review: Dependent internal review by 天工LCI数据工作小组
Amounts: no units in this file; such an amount is in the reference unit of its flow, which a separate flow dataset defines
licenseType: Free of charge for all users and uses

## General comment
使用聚氯乙烯、水泥、云母砂、钢材、电力建造抽水井

## Geography
a closed pesticide manufacturing plant located in Jiangsu Province, China.

## Technical purpose
该数据集描述了土壤和地下水修复的抽水井施工过程。此过程具体涉及应用于前农药制造工厂的场地的外部地下水抽取与处理系统。施工过程涉及使用聚氯乙烯、水泥、云母砂、钢材和电力等材料，建设必要的基础设施以净化受污染的环境介质。

## Reference product
- Extraction wel: 1; article inperiodical

## Inputs
All rows: article inperiodical
- Polyvinyl chloride: 38.1
- cement: 1074.88
- quartz sand: 2836.86
- Steel sections: 50
- Electricity: 760.32

## Use advice
该数据集专用于中国江苏省一个外部地下水修复过程的抽水井施工。在应用此数据集时，用户应确保环境影响评估的背景反映了等效的技术和地理适用性。应考虑到这些数据与正在进行修复的已关闭农药制造厂相关，未经修改可能不直接适用于其他场所。此外，在使用此数据集时，用户应考虑当地建设实践和环境法规的任何差异。

## Review details
清单： 内部审查通过几个迭代步骤完成，涉及原始数据验证、原始数据记录、代表性、完整性、与 ISO 14040 和 14044 有关的建模的一致性。

## Data sources
- Ding, D. et al. Assessing the environmental impacts and costs of biochar and monitored natural attenuation for groundwater heavily contaminated with volatile organic compounds. Science of The Total Environment 846, 157316 (2022).
