# 圈闭预探 | 烃源岩和陆源海相烃源岩 | 天然气勘探

Dataset: ILCD process, Unit process, single operation
Geography: GD-CN
Reference year: 1999
Classification: Materials production / Other mineralic materials
LCI method principle: Attributional
LCI method approaches: Consequential
Generated by: 康诗康, 908798159@qq.com
Review: Dependent internal review by Tiangong LCI Data Working Group
Amounts: no units in this file; such an amount is in the reference unit of its flow, which a separate flow dataset defines
copyright: false

## General comment
白云凹陷恩平组发育三角洲煤系烃源岩和陆源海相烃源岩，其潜在的岩性地层圈闭具有自生、自储、自盖的成藏条件，勘探潜力巨大，预测是白云凹陷主力成藏组合，是深水区天然气勘探的主体方向。

## Geography
珠江口盆地白云凹陷

## Time period
文献综述提及

## Technology and included processes
恩平组岩性地层圈闭具有成藏条件：自生条件、自储条件、自封条件。

## Reference product
- natural gas: 4500; input; min 4000; max 5000; uniform; article inperiodical
  集体埋藏深度

## Inputs
- natural gas: 0.8; log-normal; article inperiodical
  储层孔隙度,数据为分布，量中填写的数据为取平均（取中值）的结果
- natural gas: 1.6; min 1.55; max 1.65; uniform; article inperiodical
  压力系数
- natural gas: 0.85; log-normal; article inperiodical
  孔隙空间,数据为分布，量中填写的数据为取平均（取中值）的结果

## Data selection and combination
白云凹陷恩平组沉积条件形成了适中的砂地比 ，有利于岩性地层圈闭的发育 ，目前共搜索到潜在大中型岩性地层圈 闭20多个，包括地层超 覆、近岸水下扇、滩坝、低位扇、三角洲前缘前积楔形砂岩体和上 倾尖灭砂岩体等6种类型 。

## Data treatment and extrapolations
白云凹陷恩平组发育三角洲煤系烃源岩和陆源海相烃源岩，其潜在的岩性地层圈闭具有自生、自 储、自盖的成藏条件，勘探潜力巨大，预测是白云凹陷主力成藏组合，是深水区天然气勘探的主体方向

## Review details
Inventory: The internal review was done by several iteration steps concerning raw data validation, raw data documentation, representativity, completeness and consistency of modelling with regard to ISO 14040 and 14044.; Documentation: The review of the documentation was performed by Ecobilan and is in compliance with ISO 14040 and 14044. The data set documentation is correct in view of the appropriateness of the information provided. It includes all relevant information in view of data quality and scope of application of the respective LCI result.

## Data sources
- 张功成;陈莹;杨海长;韩银学;赵钊;杨东升;王龙颖;黄萱; 恩平组岩性地层圈闭——白云凹陷深水区天然气勘探新领域. 中国海上油气 1–9 (2015).
