# 生物基甲醇生产 | 甲醇 | PV/CCU-CH3OH 路线 | CO2, H2

Dataset: ILCD process, Unit process, black box
Geography: CN
Classification: Materials production / Other mineralic materials
Functional unit: In this study, the functional unit is defined as 1 kg and 1 MJ of H2 carrier produced from coal, natural gas, and renewables.
LCI method principle: Attributional
Generated by: 唐子睿, tangzirui123@gmail.com
Review: Dependent internal review by Tiangong LCI Data Working Group
Amounts: no units in this file; such an amount is in the reference unit of its flow, which a separate flow dataset defines
copyright: false

## General comment
二氧化碳制甲醇的技术路线包含三个关键步骤，即捕获二氧化碳、通过水电解产生 H2 以及利用二氧化碳的水力发电合成甲醇。

## Geography
研究假设甲醇和合成氨生产厂都位于中国西北部，那里煤炭、天然气和太阳能资源丰富。

## Technology and included processes
我们假设二氧化碳的来源是为系统提供电力和蒸汽的发电厂的废气。如图 1C 所示，在碳捕集阶段，烟气在风机的驱动下进入吸收器。当吸收了足够的二氧化碳后，溶剂被泵入再生塔，在蒸汽的作用下，二氧化碳从吸收器中分离出来。在产生 H2 阶段，利用水电解产生 H2，H2 由光伏供电。最后，H2 和捕获的 CO2 被送入甲醇合成系统，通过对捕获的 CO2 进行催化加氢生成甲醇。

## Reference product
- Methanol: 1000; article inperiodical

## Inputs
All rows: article inperiodical
- electricity: 153.9
- Hydrogen: 190
- carbon dioxide: 1455
- Aluminium oxide: 0.012
- Copper oxide: 0.062
- zinc oxide: 0.029

## Outputs
- waste water - untreated: 630; article inperiodical

## Data selection and combination
相关数据收集自 Ravikumar 的研究成果(Ravikumar et al., 2020).

## Data treatment and extrapolations
取参考文献中的平均值，参考文献根据文献综述总结了常见的 14 种情况。

## Review details
Inventory: The internal review was done by several iteration steps concerning raw data validation, raw data documentation, representativity, completeness and consistency of modelling with regard to ISO 14040 and 14044.; Documentation: The review of the documentation was performed by Ecobilan and is in compliance with ISO 14040 and 14044. The data set documentation is correct in view of the appropriateness of the information provided. It includes all relevant information in view of data quality and scope of application of the respective LCI result.

## Data sources
- Zhu, R., Wang, Z., He, Y., Zhu, Y. & Cen, K. LCA comparison analysis for two types of H2 carriers: Methanol and ammonia. Int. J. Energy Res. 46, 11818–11833 (2022).
