# Integrated gravitational-flow wastewater treatment system

Dataset: ILCD process
Classification: Materials production / Other mineralic materials
Generated by: 黄润垚, runyaoh@163.com
Review: Dependent internal review by 天工LCI数据工作小组
Amounts: no units in this file; such an amount is in the reference unit of its flow, which a separate flow dataset defines

## Reference product
- Geomembrane,Pensile carrier,Plastic,挖弃土方,biochemical oxygen demand: 4.2042, 48.5078, 2.42539 (3 entries); input
- Electricity: 0.09702; input

## Review details
清单： 内部审查通过几个迭代步骤完成，涉及原始数据验证、原始数据记录、代表性、完整性、与 ISO 14040 和 14044 有关的建模的一致性。

## Data sources
- PPCPs in wastewater – Update and calculation of characterization factors for their inclusion in LCA studies
