# 土壤修复;原位修复;植物提取修复;工程实施;沥青运输

Dataset: ILCD process, Unit process, single operation
Geography: IT
Classification: Other Services / Repair and maintenance
Generated by: 肖萌, xiaomeng@mail
Owner: 天工LCI数据工作小组
Review: Dependent internal review by 天工LCI数据工作小组
Amounts: no units in this file; such an amount is in the reference unit of its flow, which a separate flow dataset defines
licenseType: Free of charge for all users and uses

## General comment
该数据集描述了在工业背景下应用植物提取技术进行原位土壤修复的应用。具体而言，该过程适用于被重金属（包括铅（Pb）、砷（As）和铊（Tl））污染的区域，在工程实施项目中的应用范围。此外，它涉及挖掘沥青的运输，强调其在处理废弃工业区污染中的使用。

## Geography
The site taken as a reference for the remediation is an area of 712 m2 located in a disused industrial district of Tuscany (Italy), in the past subjected to various productive activities that led to contamination with various metals, some of which potentially toxic such as lead (Pb), arsenic (As) and thallium (Tl). As it is a “site of national interest”, its exact location is considered confidential and cannot be disclosed.

## Reference product
- Transported asphalt: 142.4; measured
  运输到处理场地的沥青

## Inputs
- Excavated asphalt: 142.4; measured
  场地处理过程开挖的沥青
- transport in t*km: 21360; measured

## Use advice
使用此数据集时，用户应注意参考场地的位置是保密的，不应尝试披露或推断其确切位置。该LCA数据特定于定义的平方英尺和提到的特定污染物，因此对其他场地或污染物的推断需要仔细考虑当地情况和污染物概况。确保此数据的应用适用于正处理的污染的规模和性质。应特别注意修复过程的方法论一致性，包括植物提取对特定污染物的适用性和在此背景下沥青运输的物流影响。

## Review details
清单： 内部审查通过几个迭代步骤完成，涉及原始数据验证、原始数据记录、代表性、完整性、与 ISO 14040 和 14044 有关的建模的一致性。

## Data sources
- Vocciante, M., De Folly D’Auris, A., Franchi, E., Petruzzelli, G. & Ferro, S. CO2 footprint analysis of consolidated and innovative technologies in remediation activities. J Clean Prod 297, 126723 (2021).
