# 熟料生产|熟料|新型干法, 5000 t/d|废皮革

Dataset: ILCD process, Unit process, black box
Geography: GD-CN
Reference year: 2009
Classification: Materials production / Other mineralic materials
Generated by: 杨思琪
Amounts: no units in this file; such an amount is in the reference unit of its flow, which a separate flow dataset defines
copyright: false

## General comment
试烧试验以废皮革为替代燃料。
其热值约为3768.12kJ/kg，选择广州珠江水泥广日产水泥约5000t/d的新型干法水泥生产线进行试烧，废皮革入广后先进行破碎，包装成袋（200kg袋）经广内运输至窑尾位置，从三次风管与分解炉连接处通过绞式喂料机投入分解炉内试烧。每h投入废皮革约5t连续投料6h。记录试烧时的水泥产量、原料消耗和能源消耗量。并测定尾气的污染物成分及浓度。

## Geography
广州珠江水泥厂

## Model description
生产1t熟料定义为1功能单位。将原料入厂设定为生命周期的起点，终点设定为熟料烧成阶段。

## Reference product
- clinker: 1000
  熟料

## Inputs
All rows: measured
- limestone, crushed, for mill: 1300
  石灰石
- clay: 100
  黏土
- gypsum (desulphurized): 70
  石膏
- iron ore: 21
  铁矿石
- Leather waste: 30
  废皮革
- hard coal, run-of-mine: 95
  煤
- electricity, medium voltage: 360
  电

## Outputs
- carbon dioxide (fossil): 239; calculated
  CO2（化石燃料燃烧）
- carbon dioxide: 647; calculated
  CO2（石灰石分解）
- sulfur dioxide: 0.44; measured
  SO2
- Nitrogen oxides: 1.54; measured
  NOx
- particles (> PM10): 0.021; measured
  粉尘，未标明粒径，按PM>10处理。

## Data sources
- 周奇, 黄启飞, 王琪, & 李丽. (2009). 废皮革水泥窑共处置生命周期评价. 环境科学研究, 22(4), 506–510.
