# 湿蒸法棉布染整加工;印染棉布;翻缝

Dataset: ILCD process, Unit process, single operation
Geography: SZ-JS-CN
Reference year: 2012
Classification: Unit processes / Systems / Textiles, furnitures and other interiors
Generated by: 段颖凡, 1300925579@qq.com
Owner: 天工LCI数据工作小组
Review: Dependent internal review by 天工LCI数据工作小组
Amounts: no units in this file; such an amount is in the reference unit of its flow, which a separate flow dataset defines
copyright: false
licenseType: Free of charge for all users and uses

## General comment
“翻缝”是一种常见的缝纫工艺，其主要目的在于改善面料边缘的外观和强度。该工艺包括将面料边缘折叠至内部，通过特殊的缝纫技术将其固定，使线迹难以察觉，并经过整烫处理以确保平整。翻缝常应用于高档服装、家居纺织品等对外观和质感要求较高的制品，适用于各种面料，如棉布、羊毛和丝绸，以提升产品的整体品质感和耐久性。

## Geography
本研究选取江苏省某印染企业为重点调研对象，该企业位于长三角经济圈中的常熟。

## Technical purpose
所描述的工业过程是指湿蒸法棉布染整加工，这个工艺主要用于纺织行业。该布料处理主要应用于印染棉质材料，并涉及布料的翻缝作为单元操作。

## Reference product
- Cotton Fabric: 167; measured

## Inputs
- Cotton Yarn: 0.118; measured

## Outputs
- carbon dioxide (fossil): 11.4; calculated
- carbon monoxide (fossil): 0.0263; calculated
- sulfur dioxide: 0.000358; calculated
- methane (fossil): 0.000232; calculated
- Nitrogen oxides: 0.116; calculated
- nitrous oxide: 0.000217; measured
- particles (> PM10): 0.00483; calculated
- ammonia: 8.35e-5; measured
- non-methane volatile organic compounds: 0.00942; measured

## Use advice
对生命周期评估数据的用户来说，考虑过程的区域背景至关重要，因为这个数据集涉及位于长江三角洲经济区常熟的印染企业。使用这些数据时，用户应考虑该地区纺织行业标准所特有的具体能源消耗和资源利用。此外，还应明确说明下游回收过程的包括或排除。在模拟棉布使用阶段行为时应注意，严格遵守江苏省环境规定中提及的技术适用性条件。

## Review details
清单： 内部审查通过几个迭代步骤完成，涉及原始数据验证、原始数据记录、代表性、完整性、与 ISO 14040 和 14044 有关的建模的一致性。

## Data sources
- 朱亚楠. 棉布连续轧染工艺生命周期环境影响评价. (南京大学, 2012).
