# Bioethanol ; Alkline

Dataset: ILCD process
Classification: Energy carriers and technologies / Renewable fuels
Generated by: 袁嘉翼, jiayi_y@mail.bnu.edu.cn
Owner: 天工LCI数据工作小组
Review: Dependent internal review by 天工LCI数据工作小组
Amounts: no units in this file; such an amount is in the reference unit of its flow, which a separate flow dataset defines
licenseType: Free of charge for all users and uses

## Inputs
All rows: uniform; article inperiodical
- sodium hydroxide: 132; min 46; max 400
- Electricity: 0.12132; max 2.2428
- heat: 3510; max 6100
- Electricity: 163.08; min 41.04; max 691.2
- heat: 2950; min 591; max 5220
- Electricity: 590.4; min 43.56; max 1965.6

## Outputs
- heat: 1620; max 3000; uniform; article inperiodical

## Review details
清单： 内部审查通过几个迭代步骤完成，涉及原始数据验证、原始数据记录、代表性、完整性、与 ISO 14040 和 14044 有关的建模的一致性。
