# M. OSB的生产 | 基于芦苇芒属的刨花板 | 添加了一种特殊的改性淀粉基粘合剂（不含石蜡）

Dataset: ILCD process, Unit process, single operation
Geography: HUN-CN
Reference year: 2021
Classification: Materials production / Other mineralic materials
LCI method principle: Attributional
LCI method approaches: Allocation
Generated by: 谭惋月, tanwanyue@foxmail.com
Review: Dependent internal review by Tiangong LCI Data Working Group
Amounts: no units in this file; such an amount is in the reference unit of its flow, which a separate flow dataset defines
copyright: false

## General comment
芦苇芒属植物生长后期的纤维素、半纤维素和木质素含量分别达到 39.07%、8.90% 和 12.48%，高于其他三种农作物秸秆（稻草、玉米秆和麦秆）。因此，它作为刨花板的基材具有更好的物理特性。本文的研究结果是对以往有关非木材刨花板研究的补充。
在传统工艺中，通常使用两种化学品：热固性树脂（如脲醛树脂）作为粘合剂；石蜡乳液可改善板材的吸湿性能。在 M.OSB 中添加了一种不含石蜡的改性淀粉基粘合剂。改性淀粉基粘合剂的主要成分是玉米淀粉、聚乙烯醇和水。由于该配方属于非专利技术，因此这并不是一份详尽的清单，质量小于 1%的成分也未列出。

## Geography
这是一项关于中国洞庭湖区（湖南省）的生命周期评估案例研究。

## Technology and included processes
该工业系统的主要步骤包括制备主要材料、干燥、生产粘合剂、上浆、成型和完成板材。在原料准备阶段，需要对原料进行堆放和筛选，以去除杂质，如树叶、节疤和灰尘。在烘干阶段，将栗木切碎，然后烘干以达到所需的含水量，之后生产颗粒并重复筛选。粘合剂的生产过程涉及非专利技术，因此在此不再赘述。在施胶阶段，生物粘合剂是提前准备好的，颗粒和胶水是自动处理的，直到粘合剂在胶水混合器中通过相互摩擦均匀地保持在表面上。成型阶段包括将已确定尺寸的颗粒成型为板坯，并对板坯进行预压，以减小厚度并提高抗拉强度。合格的板坯继续成型和修补，不合格的板坯通过重复这一过程进行回收。最后一道工序是板材加工，成型的板材在卸载、干燥和切割后堆放两天。这些步骤又分为四个阶段：材料准备（I）、粘合剂生产（II）、刨花板生产（III）和发热（IV）。此外，还有一些辅助工序（V），包括现场清洁和内部运输。

## Reference product
- particle board: 1; measured
  The particle board is selected here, which substitutes for the "M.MDP (M.OSB)" in the paper.

## Inputs
- Miscanthus lutarioriparius: 1010; measured
  This is the input flow called M.lutarioriparius in the paper.
- starch-based adhesive: 52; measured
  This is the input flow called starch-based adhesive in the paper.
- Lubricant: 0.0003; measured
  This is the input flow called lubricants in the paper.
- Water for industrial use: 17.85; software or database
  The "Water for industrial use" is selected here, which substitutes for the "Water" in the paper.
- secondary fuel renewable: 41.9; software or database
  The secondary fuel renewable is selected here, which substitutes for the renewable fuel in the paper.
- Electricity: 236.705; software or database
- Diesel: 1.34
- transport in t*km: 170.5; article inperiodical

## Outputs
- Nitrogen oxides: 0.0426; software or database
- sulfur dioxide: 0.00712; software or database
- carbon dioxide: 68.47; calculated
- soft wood (dry matter): 0.017; software or database
  The inorganic dissolved matter is selected here, which substitutes for the particulate matter in the paper.
- chemical oxygen demand: 0.0038; software or database
  The chemical oxygen demand is selected here, which substitutes for the CODcr in the paper.
- biological oxygen demand: 0.00094; software or database
  The biological oxygen demand is selected here, which substitutes for the BOD_5 in the paper.
- Suspended solids, unspecified: 0.0028; software or database
- Ammonia (NH4+, NH3, as N): 0.00032; software or database
  The Ammonia (NH4+, NH3, as N) is selected here, which substitutes for the "NH3-N" in the paper.
- Oils, unspecified: 0.01364; software or database
  The "Oils" is selected here, which substitutes for the "Waste oil" in the paper.
- Waste (solid): 303.36; software or database
  The Waste (solid) is selected here, which substitutes for the recyclable solid in the paper.

## Data selection and combination
M.OSB（农业和工业生产）的库存数据来自中国常德市安乡县汉创刨花板制造有限公司。中国常德市安乡县汉创刨花板制造有限公司的库存数据。M.OSB产量的平均值来自实地测量数据和第三方机构（中国长沙金科检测机构）的内部文件。聚乙烯醇 (PVA) 的生产数据来自中国宁夏回族自治区的一家化工厂（宁东能源化工投资有限公司）。生物质燃料清单是根据一家生物质固体燃料厂的生产概况编制的，该厂距离 M.OSB 生产基地仅 2 公里。生物质燃料燃烧过程中的二氧化碳排放量根据 IPCC 2006 进行计算。运输的清单数据来自文献。其余背景数据来自 SimaPro 9.0 中的各种数据库，如 ELCD 和 Ecoinvent。

## Data treatment and extrapolations
对多个数据源进行了平均处理。清单中使用的是平均值。

## Review details
Inventory: The internal review was done by several iteration steps concerning raw data validation, raw data documentation, representativity, completeness and consistency of modelling with regard to ISO 14040 and 14044.; Documentation: The review of the documentation was performed by Ecobilan and is in compliance with ISO 14040 and 14044. The data set documentation is correct in view of the appropriateness of the information provided. It includes all relevant information in view of data quality and scope of application of the respective LCI result.

## Data sources
- Liao, Q., Zhang, J., Yi, Z. & Li, Y. Do Miscanthus lutarioriparius-Based Oriented Strand Boards Provide Environmentally Benign Alternatives? An LCA Case Study of Lake Dongting District in China. Sustainability 13, 12976 (2021).
