# 运输到场的设备和材料;农田修复;原位钝化;药剂运输

Dataset: ILCD process, Unit process, single operation
Geography: NJ-YN-CN
Reference year: 2023
Classification: Unit processes / Other Services / Repair and maintenance
Generated by: 肖萌, xiaomeng@mail
Owner: 天工LCI数据工作小组
Review: Dependent internal review by 天工LCI数据工作小组
Amounts: no units in this file; such an amount is in the reference unit of its flow, which a separate flow dataset defines
copyright: false
licenseType: Free of charge for all users and uses

## General comment
稳定化修复施工准备阶段，药剂运输过程。

## Geography
云南省怒江州受铅锌矿污染某耕地土壤 污染修复工程

## Technical purpose
该工业过程涉及云南省怒江州16公顷受铅锌矿污染农田的修复工作。过程目标是将土壤中的镉（Cd）和铅（Pb）的有效浓度降低70％以上，同时确保农作物中Cd和Pb的浓度100％满足规定标准。该过程采用原位固化/稳定化技术，通常用于稳定并降低土壤中污染物的生物有效性。数据集代表稳定化修复施工准备阶段，包括所需修复剂的运输。

## Reference product
- Equipment and Materials Arriving on Site: 240000; measured
  运输到场的药剂

## Inputs
- transport in t*km: 875458; measured

## Use advice
使用此数据集时，生命周期评价实践者应确保包括与材料运输、原位化学处理和稳定剂应用相关的所有相关过程。还应考虑可能影响修复过程效率的场地特定条件，如土壤构成和污染物特性。应注意仅将数据集应用于污染水平和修复目标相当的情景。此外，如果在比较研究中应用该数据集，请确保各个比较情景的代表性。

## Review details
清单： 内部审查通过几个迭代步骤完成，涉及原始数据验证、原始数据记录、代表性、完整性、与 ISO 14040 和 14044 有关的建模的一致性。

## Data sources
- 肖萌 et al. 农田污染钝化修复环境影响定量评估方法与案例分析. 中国环境科学 43, 3571–3581 (2023).
