# monitored natural attenuation;In-situ repair Charred soil

Dataset: ILCD process, Unit process, single operation
Geography: JS-CN
Classification: Other Services / Repair and maintenance
Generated by: 贾瀛洛, 202321051222@mail.bnu.edu.cn
Owner: 天工LCI数据工作小组
Review: Dependent internal review by 天工LCI数据工作小组
Amounts: no units in this file; such an amount is in the reference unit of its flow, which a separate flow dataset defines
licenseType: Free of charge for all users and uses

## General comment
监测自然衰减（MNA）是一种被广泛应用于受污染土壤和地下水的被动修复方法。适用于自然过程，包括生物降解、扩散和稀释，能够在没有人为干预的情况下，有效地随时间降低污染物浓度的环境。

## Reference product
- carbon dioxide (biogenic): 273.03; article inperiodical

## Inputs
- Electricity: 202.176
- Water Cooling fresh: 978540
- Steel sections: 795
- High Density Polyethylene: 611.27
- Very fine milled silica sand d50 = 20 micrometer: 52640
- bentonite: 10530
- Polyvinyl chloride: 934.2

## Use advice
在将监测自然衰减（MNA）过程数据纳入生命周期评估（LCA）时，需仔细考虑场地特定条件，例如污染物类型、浓度和自然衰减过程的速率。应有充足的监测数据支持使用MNA作为修复策略的合理性。在LCA中用于预测MNA有效性的任何估计或预测应被透明地记录，并且需仔细评估其准确性。

## Review details
清单： 内部审查通过几个迭代步骤完成，涉及原始数据验证、原始数据记录、代表性、完整性、与 ISO 14040 和 14044 有关的建模的一致性。

## Data sources
- Assessing the environmental impacts and costs of biochar and monitored
