# 熟料煅烧;熟料, 硅酸盐水泥熟料;新型干法, >4000 t/d

Dataset: ILCD process, Unit process, single operation
Geography: CN
Reference year: 2020
Classification: Materials production / Inorganic chemicals
Generated by: 杨思琪, ysqsophia@gmail.com
Owner: 天工LCI数据工作小组
Review: Dependent internal review by 天工LCI数据工作小组
Amounts: no units in this file; such an amount is in the reference unit of its flow, which a separate flow dataset defines
copyright: false
licenseType: Free of charge for all users and uses

## General comment
新型干法在水泥工业工艺中市场份额占比较大。熟料煅烧时排放废水、颗粒物、CO2、SO2、NOx、汞（Hg）、 氟（F）和氨（NH3）等。

## Technical purpose
该数据集代表了日产能超过4000吨的新型干法硅酸盐水泥熟料生产过程的环境方面。通过这一工艺生产的水泥熟料，旨在用于建筑业生产各种等级的硅酸盐水泥。

## Model description
以 P·O 42.5 型水泥熟料为研究对象，功能单位与基准流为生产 1.00 吨水泥熟料，系统边界为熟料煅烧（包括煤粉制备）单元过程，基准年为 2020 年。

## Reference product
- clinker, portland cement clinker: 1000
  熟料，PO42.5

## Inputs
- raw meal: 1445.3
  生料
- electricity, medium voltage: 125.28
  电力。电力由电厂输送。
- tap water: 400
  自来水
- coal, powder: 139.25
  煤粉

## Outputs
- Water (groundwater from technosphere, waste water): 11.36
  废水。废水为循环冷却水排水，水质除水温及浑浊度升高外基本无其它污染。
- particles (> PM10): 0.08159
  颗粒物。袋式收尘器收集到的粉尘经返料系统全部返回生料均化阶段，工艺产出固废可有效循环利用。未标明粒径，按PM>10处理。
- sulfur dioxide: 0.07354
  二氧化硫
- Nitrogen oxides: 0.85
  氮氧化物
- mercury: 2.071e-5
  汞
- fluorene: 0.00636
  氟
- ammonia: 0.00944
  氨
- carbon dioxide: 798.65
  二氧化碳。水泥行业通常不监测CO2排放量，CO2主要来源于石灰石分解和煤炭燃烧两个过程，根据化学平衡运用公式计算其产生量。

## Data selection and combination
除CO2外，其他数据来源于高安红狮、江西德安万年青等企业报告、水泥行业清洁生产评价指标体系及水泥熟料研究论文等。

## Use advice
在使用新型干法估算硅酸盐水泥熟料生产环境影响的生命周期评估中使用此数据集。数据应在特定于熟料煅烧的系统边界内应用，包括煤粉的制备。根据CLCD取舍原则，小量原料的上游生产数据应相应省略。解释结果时，应考虑背景数据库的不确定性和累积不确定性效应，以确保全面评估。

## Review details
清单： 内部审查通过几个迭代步骤完成，涉及原始数据验证、原始数据记录、代表性、完整性、与 ISO 14040 和 14044 有关的建模的一致性。

## Data sources
- 陆柳鲜. (2022). 江西省多源有色冶炼固废资源化过程生命周期评价研究 [硕士, 江西理工大学].
