# 土壤和地下水修复;原位;地下水抽出处理;施工;空气吹脱装置施工

Dataset: ILCD process, Unit process, single operation
Geography: JS-CN
Reference year: 2022
Classification: Other Services / Repair and maintenance
Generated by: 王宁, wang_ning@caep.org.cn
Owner: 天工LCI数据工作小组
Review: Dependent internal review by 天工LCI数据工作小组
Amounts: no units in this file; such an amount is in the reference unit of its flow, which a separate flow dataset defines
licenseType: Free of charge for all users and uses

## General comment
使用铝、高密度聚乙烯和钢材制造空气吹脱装置

## Geography
a closed pesticide manufacturing plant located in Jiangsu Province, China.

## Technical purpose
空气吹脱装置的技术应用是用于土壤和地下水修复，尤其是用于已关闭的江苏省农药制造厂的地下水污染物的原位处理。这包括使用抽水处理方法，即将受污染的地下水抽至地面，然后使用空气吹脱装置处理，以去除挥发性物质。

## Reference product
- Air stripping unit: 1; input; article inperiodical

## Inputs
- Steel sections: 250; article inperiodical
- aluminium: 550; article inperiodical
- High Density Polyethylene: 1650; article inperiodical

## Use advice
在使用该数据集进行生命周期评估时，确保修复范围考虑到了空气吹脱装置所处理的具体污染物。考虑装置的制造材料（铝、高密度聚乙烯和钢材）在评估环境影响时的重要性。因为数据反映了来自特定地点（中国江苏省）的单元过程，所以在将结果泛化至其他情景或地点时应该小心。此外，在生命周期评估模型中，应仔细考虑装置材料的终生阶段，以及回收的包括或排除情况。

## Review details
清单： 内部审查通过几个迭代步骤完成，涉及原始数据验证、原始数据记录、代表性、完整性、与 ISO 14040 和 14044 有关的建模的一致性。

## Data sources
- Ding, D. et al. Assessing the environmental impacts and costs of biochar and monitored natural attenuation for groundwater heavily contaminated with volatile organic compounds. Science of The Total Environment 846, 157316 (2022).
