# 电力生产 ; 电力 ; 火电（92.3%）+水电（1.8%）+风电（1.6%）+太阳能发电（4.3%）

Dataset: ILCD process, Partly terminated system
Geography: AH-CN
Reference year: 2019
Classification: Energy carriers and technologies / Electricity
LCI method principle: Other
Generated by: 熊若熙, xiongrx0126@163.com
Owner: 天工LCI数据工作小组
Review: Dependent internal review by 天工LCI数据工作小组
Amounts: no units in this file; such an amount is in the reference unit of its flow, which a separate flow dataset defines
copyright: false
licenseType: Free of charge for all users and uses

## General comment
电力产生形式包括火力发电、水力发电、风力发电和太阳能发电

## Time period
根据2019年能源统计年鉴数据计算

## Technical purpose
此数据集代表通过包括火力发电、水力发电、风力发电和太阳能发电等多种方式进行电力生产的应用。这些发电方式的混合体现了参考年份中的使用比例，并指示了主要依赖热力发电的电力网。该信息与模拟能源系统和评估在具有类似能源生产概况的地区内的电力消费环境影响相关。

## Reference product
- Electricity: 3.6; calculated

## Outputs
- carbon dioxide: 0.706; calculated
- sulfur dioxide: 0.000121; calculated
- Nitrogen oxides: 0.000193071; calculated
- Dust (unspecified, from stack): 2.3962e-5; calculated

## Data treatment and extrapolations
核算方法参考《企业温室气体排放核算方法与报告指南 发电设施》。不同形式发电量及燃料用量来自于《中国能源统计年鉴 2020》中的第三章（能源生产） 和第六章（地区能源平衡表）。用于计算二氧化碳排放因子的低位发热量、单位热值含碳量等燃料参数来自于《2019 年度中国区域电网二氧化碳基准线排放因子 OM 计算说明》、《企业温室气体排放核算方法与报告指南 发电设施》

## Use advice
在使用此数据集进行生命周期评估（LCA）或其他环境影响建模时，确保考虑所提供的特定能源混合，因为不同发电技术之间的不同排放因子会显著影响结果。该数据集是根据2019年能源统计年鉴计算的，并且核算方法参考了针对发电设施的温室气体报告指南。确保更新数据以反映能源混合随时间的变化或匹配特定关注区域的能源概况。应注意使用与所提供的方法论指导一致的热电、水电、风电和太阳能的正确排放因子。

## Review details
清单： 内部审查通过几个迭代步骤完成，涉及原始数据验证、原始数据记录、代表性、完整性、与 ISO 14040 和 14044 有关的建模的一致性。

## Data sources
- 熊若熙. 中国电力生产和消费二氧化碳与污染物排放因子核算. (清华大学, 2023).
