# 土壤和地下水修复;原位;土壤生物通风;到达现场的设备和材料

Dataset: ILCD process, Unit process, single operation
Geography: CN
Reference year: 2022
Classification: Other Services / Engineering and consulting
Generated by: 王宁, wang_ning@caep.org.cn
Owner: 天工LCI数据工作小组
Review: Dependent internal review by 天工LCI数据工作小组
Amounts: no units in this file; such an amount is in the reference unit of its flow, which a separate flow dataset defines
copyright: false
licenseType: Free of charge for all users and uses

## General comment
将设备与材料运输至现场

## Geography
案例焦化厂位于我国北方中纬度地带

## Technology and included processes
使用汽油将设备与材料运输至现场

## Technical purpose
本数据集描述了土壤和地下水原位生物通风修复过程，重点是使用汽油将设备和材料运输到修复现场。它适用于位于中国北方中纬度地区的焦化厂案例。

## Reference product
- Equipment and Materials Arriving on Site: 1; measured

## Inputs
- Gasoline (regular): 1.547; measured

## Use advice
使用此数据集的用户应考虑准确表示运输距离和用于运输的汽油类型，以真实反映能源消耗和排放。应考虑当地燃料质量和运输车辆效率等相关因素。还必须注意这个运输过程阶段是否是更大的生命周期研究的一部分，并将其置于整体系统边界的背景下。

## Review details
清单： 内部审查通过几个迭代步骤完成，涉及原始数据验证、原始数据记录、代表性、完整性、与 ISO 14040 和 14044 有关的建模的一致性。

## Data sources
- 刘文晓,夏天翔,张丽娜等.基于修复效果的污染土壤修复工程环境足迹分析[J].环境科学研究,2022,35(10):2367-2377.DOI:10.13198/j.issn.1001-6929.2022.07.05.
