# 煤炭井工开采;开采煤炭

Dataset: ILCD process, Unit process, black box
Geography: LF-SX-CN
Reference year: 2022
Classification: Energy carriers and technologies / Energetic raw materials
Generated by: 尹琳琳, yinlinlin0623@163.com
Owner: 天工LCI数据工作小组
Review: Dependent internal review by 天工LCI数据工作小组
Amounts: no units in this file; such an amount is in the reference unit of its flow, which a separate flow dataset defines
licenseType: Free of charge for all users and uses

## General comment
该低瓦斯井下煤矿数据代表了从巷道掘进、设备安装、煤炭回采到设备撤出的煤炭开采完整生命周期过程。该数据适用于分析用于能源发电、工业加热和各种碳基产品原料的煤炭生产。

## Geography
低瓦斯的井工煤矿

## Technology and included processes
巷道掘进；设备安装；煤炭回采；设备回撤

## Reference product
- Hard coal, at consumer EU-27: 1.66212e9; uniform; calculated
  M煤矿位于山西省临汾市,是一座低瓦斯的井工煤矿,作为研究对象的工作面长为2400m,宽为180m,煤层平均厚度为 2.85m,煤的平均密度为 1.35t/m3,根据上述基本信息可以计算得出该工作面的煤炭总量为1662120t.

## Inputs
- Electricity: 739.9; uniform; software or database
  电力排放因子,消耗1MW·h的电力产生0.7399t的CO2（山西能源局提供的数据）
- Electricity: 1.48485e9; uniform; measured
  M煤矿电力活动水平数据
- water: 3.18566e8; uniform; measured
  M煤矿新鲜水活动水平数据

## Outputs
All rows: uniform
- methane (fossil): 10; software or database
  甲烷排放系数,开采1t煤炭释放10m3的甲烷气体。据M煤矿实际情况，该煤矿属于低瓦斯浓度煤矿，因此煤炭中的甲烷含量选择2006年IPCC清单中低甲烷排放系数。
- carbon dioxide (fossil): 3.05179e8; calculated
  M煤矿煤炭开采过程中电力消耗产生的CO2量
- carbon dioxide (fossil): 67540; calculated
  M煤矿—煤炭开采过程中新鲜水消耗产生的CO2量
- methane (fossil): 1.08851e7; measured
  M煤矿的煤炭开采过程中甲烷逃逸排放量的活动水平数据
- carbon dioxide (fossil): 2.28588e8; calculated
  M煤矿煤炭开采过程中甲烷逃逸排放产生的CO2量
- carbon dioxide (fossil): 321; calculated
  碳排放强度,M煤矿煤炭开采的碳排放强度为0.321tCO2e/t，即该煤矿生产1t原煤会排放 0.321t二氧化碳

## Use advice
使用此数据集时，请确保系统边界包括井下煤矿开采过程的所有四个阶段。考虑到矿井的低瓦斯特性，因为它会影响安全措施和生产率。应该在排除任何潜在的回收过程的情况下使用此数据，因为回收过程不适用于煤炭开采阶段。在能量计算中，应包括开采煤炭的热值和任何逸散排放。

## Review details
清单： 内部审查通过几个迭代步骤完成，涉及原始数据验证、原始数据记录、代表性、完整性、与 ISO 14040 和 14044 有关的建模的一致性。
