# 污泥处理与处置|干化焚烧

Dataset: ILCD process, Unit process, single operation
Geography: GZ-GD-CN
Classification: Materials production / Other mineralic materials
Generated by: 金思甜, 2331276@tongji.edu.cn
Review: Dependent internal review by 天工LCI数据工作小组
Amounts: no units in this file; such an amount is in the reference unit of its flow, which a separate flow dataset defines

## General comment
厂内运输+干化焚烧

## Reference product
- Sludge: 1000; input; estimated
  1t湿污泥（水分含 量在 70％ ～75％左右 ）

## Inputs
- hard coal; 26.3 MJ/kg: 85; calculated
- Electricity: 398.304; calculated

## Outputs
All rows: calculated
- carbon monoxide: 0.38
- carbon dioxide: 506.18
- Nitrogen oxides: 1.29699
- sulfur oxides: 0.99222
- hydrogen chloride: 0.00018
- Flue dust: 0.28
  烟尘

## Review details
清单： 内部审查通过几个迭代步骤完成，涉及原始数据验证、原始数据记录、代表性、完整性、与 ISO 14040 和 14044 有关的建模的一致性。

## Data sources
- 城市污水污泥焚烧处理环境影响分析
