# 水泥生产|水泥, 普通硅酸盐水泥, 42.5MPa|新型五级悬浮预热器干法, 1800 t-cl/d|混合固废

Dataset: ILCD process, Unit process, black box
Geography: SC-CN
Reference year: 2007
Classification: Materials production / Other mineralic materials
Generated by: 杨思琪
Amounts: no units in this file; such an amount is in the reference unit of its flow, which a separate flow dataset defines
copyright: false

## General comment
电石渣水泥采用电石渣与石灰石、硅质原料、铁质原料配料后入立磨制成生料粉，然后采用运行较稳定的新型五级悬浮预热器干法工艺生产水泥。

## Geography
四川省某水泥生产企业

## Model description
1个功能单位为42.5千克普通硅酸盐水泥，即1Fu=1kgP·O42.5普通硅酸盐水泥。研究范围从水泥原料开采、能源生产、生料制备、熟料锻烧及粉磨到水泥储存为止，主要考虑水泥生产工艺过程及与水泥生产相关的原料开采、 原料运输、电力和燃煤生产以及水泥生产过程产生的环境影响。

## Reference product
- cement, ordinary portland cement, 42.5MPa: 1000
  电石渣水泥。P.O42.5普通硅酸盐水泥。

## Inputs
All rows: measured
- limestone, crushed, for mill: 741.7
  石灰石。汽车运输，15km。
- shale: 70.4
  页岩。汽车运输，15km。
- sandstone: 78.56
  砂岩。汽车运输，15km。
- Carbide slag: 137.04
  电石渣。汽车运输，40km。
- iron, powder: 18.96
  铁粉。汽车运输，190km。
- gypsum (desulphurized): 24.07
  石膏。汽车运输，45km。
- Ferroalloy slag: 68.67
  铁合金炉渣。汽车运输，20km。
- hard coal, run-of-mine: 99.58
  煤。汽车运输，34km。
- electricity, medium voltage: 360
  电

## Outputs
- carbon dioxide: 645.3; calculated
  CO2。只涉及生产阶段（计算）。
- sulfur dioxide: 0.049; measured
  SO2。只涉及生产阶段（实测）。
- Nitrogen oxides: 1.95; measured
  NOx。只涉及生产阶段（实测）。
- particles (> PM10): 2.585; measured
  粉尘。只涉及生产阶段（计算：除尘处理后的数据除以除尘效率）。未标明粒径，按PM>10处理。

## Sampling procedure
采用先进的新型五级悬浮预热器干法工艺技术，以一条F3.3x50m，以石灰石和电石渣为主要原料，日产1800吨水泥熟料的新型干法回转窑水泥生产线，年可利用工业废渣123426吨，其中电石渣8222吨、铁合金炉渣41204吨。

## Data sources
- 王超. (2007). 电石渣水泥和石灰石水泥生命周期评价的比较研究 [硕士, 西南交通大学].
