# 污泥处理与处置|水泥窑协同处置

Dataset: ILCD process, Unit process, single operation
Geography: CN
Classification: Materials production / Other mineralic materials
Generated by: 金思甜, 2331276@tongji.edu.cn
Review: Dependent internal review by 天工LCI数据工作小组
Amounts: no units in this file; such an amount is in the reference unit of its flow, which a separate flow dataset defines

## Geography
京津冀地区

## Reference product
- Sludge: 1000; input; estimated

## Inputs
- Energy, gross calorific value, in biomass, primary forest: 334; measured
- Land Occupation: 0.544; measured

## Outputs
- carbon dioxide: 45.6; software or database
- Nitrogen oxides: -9.36; software or database

## Review details
清单： 内部审查通过几个迭代步骤完成，涉及原始数据验证、原始数据记录、代表性、完整性、与 ISO 14040 和 14044 有关的建模的一致性。

## Data sources
- 水泥窑协同处置污泥的环境负荷分析
