# 牛奶生产 | 包装

Dataset: ILCD process, Unit process, single operation
Geography: CC-JL-CN
Reference year: 2006
Classification: Materials production / Other mineralic materials
Functional unit: 1t milk
Generated by: 杨瑞, 1632707028@qq.com
Review: Dependent internal review by Tiangong LCI Data Working Group
Amounts: no units in this file; such an amount is in the reference unit of its flow, which a separate flow dataset defines
copyright: false

## General comment
根据本文的研究范围, 将牛奶生产生命周期 分为如下两个子系统: 生产和包装。由于企业内部 生产车间相对集中, 物料运输所造成的环境影响 忽略不计。

## Geography
本文研究对象为长春地区某市销售的普通袋装牛奶

## Technology and included processes
本文只考虑与研究目的和功能单位直接相关 的过程, 不考虑工厂以外产生环境负荷的各阶段

## Reference product
- milk: 1000
  成品牛奶

## Inputs
All rows: measured
- Plastic (unspecified): 13.6
  塑料袋
- Plastic (unspecified): 1.5
  封口膜
- Plastic (unspecified): 4854
  吸管straw
- Plastic (unspecified): 4854
  塑标
- cartonboard boxes; mixed technology; production mix, a plant, 46% primary fibre, 54% recovered fibre: 135
  纸箱
- Electricity: 83.88
- water: 4122
- process steam: 151.4

## Outputs
All rows: measured
- carbon dioxide: 285
- carbon monoxide: 0.4
- sulfur dioxide: 2.1
- nitrogen, total (excluding N2): 0.9
  氮氧化物
- ammonia: 0.15
- Dust (unspecified, from stack): 2.65
- municipal solid waste deposition: 21.9

## Deviations from the LCI method approaches
本文按照 ISO 的有关标准, 采用 LCA 方法分析牛奶生产各阶段的消耗和环境排放, 建立牛奶生产生命周期 基础数据库, 辨识牛奶各阶段对环境影响的相对 大小, 找出环境影响状况的主要因子, 从而为牛奶 企业实施清洁生产、改进牛奶生产环境性能提供 机会和途径。

## Review details
Inventory: The internal review was done by several iteration steps concerning raw data validation, raw data documentation, representativity, completeness and consistency of modelling with regard to ISO 14040 and 14044.; Documentation: The review of the documentation was performed by Ecobilan and is in compliance with ISO 14040 and 14044. The data set documentation is correct in view of the appropriateness of the information provided. It includes all relevant information in view of data quality and scope of application of the respective LCI result.

## Data sources
- 秦凤贤. 生命周期评价在牛奶生产中的应用研究. 乳业科学与技术 224–226 (2006).
