# 土壤和地下水修复;原位;地下水抽出处理;施工;抽水井

Dataset: ILCD process, Unit process, single operation
Geography: DK
Reference year: 2021
Classification: Other Services / Engineering and consulting
Generated by: 王宁, wang_ning@caep.org.cn
Owner: 天工LCI数据工作小组
Review: Dependent internal review by 天工LCI数据工作小组
Amounts: no units in this file; such an amount is in the reference unit of its flow, which a separate flow dataset defines
copyright: false
licenseType: Free of charge for all users and uses

## General comment
使用高密度聚乙烯、混凝土、碎石、泵等建造抽水井

## Technology and included processes
使用电力、混凝土、碎石、高密度聚乙烯建设抽提井

## Technical purpose
该数据集描述了抽提井的建设，这些井被用于土壤和地下水修复。通过抽取受污染的地下水进行处理，这些抽提井协助开展离场泵处理过程，有助于环境管理和污染控制。

## Reference product
- Extraction wel: 1; input; estimated

## Inputs
- polyethylene high density granulate (PE-HD): 40; estimated
- Electricity: 2300; estimated
- cement: 200; estimated
- gravel: 330; estimated

## Use advice
使用此数据集时，需考虑具体的区域环境和地下水中存在的污染物。诸如井深，当地土壤组成和地下水流速等因素可能会影响需建模的建筑材料和方法。注意要包括建设中所有间接环境影响的考虑，如材料（高密度聚乙烯、混凝土、碎石）的生产和运输以及消耗的电力。

## Review details
清单： 内部审查通过几个迭代步骤完成，涉及原始数据验证、原始数据记录、代表性、完整性、与 ISO 14040 和 14044 有关的建模的一致性。

## Data sources
- Sustainable remediation assessment of a chlorinated ethene plume: method evelopment, application, and assessment
