# 秸秆浆、木浆造纸;本色文化纸

Dataset: ILCD process, Unit process, black box
Geography: SD-CN
Classification: Unit processes / Materials production / Paper and cardboards
Functional unit: We chose 1t of natural colour cultural paper product as the functional unit.
LCI method principle: Attributional
Generated by: 高逸翔, 22210740040@m.fudan.edu.cn
Owner: 天工LCI数据工作小组
Review: Dependent internal review by 天工LCI数据工作小组
Amounts: no units in this file; such an amount is in the reference unit of its flow, which a separate flow dataset defines
copyright: false
licenseType: Free of charge for all users and uses

## General comment
泉林纸业的文化用纸的原材料结构是80%秸秆和20%进口木浆。本色文化纸的生产过程主要是指抄纸， 其中包括散浆、除杂质、精浆、 打浆、配制各种添加剂、纸料的混合、纸料的流送、压榨部、干燥部、表面施胶、 干燥、 压光、 卷取成纸等。

## Technology and included processes
本色文化纸生命周期评价的系统边界应包括从原料的收集 、备料一直到销售渠道整个过程， 其中包括稻秆收集运输、进口木装运输、制浆过程、本色文化纸生产、 运输和销售过程以及废水和黑液的处理等。

## Technical purpose
所描述的工业过程涉及本色文化纸的生产，这种纸张主要用于文具、书籍和办公用纸。泉林纸业的本色文化纸原料结构由80%的秸秆浆和20%的进口木浆组成。该生产过程主要涉及造纸步骤，如散浆、去除杂质、精浆、打浆、准备各种添加剂、纸料混合、纸料输送、压榨、干燥、表面施胶、再次干燥、压光和卷取成纸。

## Reference product
- Natural Cultural Paper Products: 1000; measured
  本色文化纸产品

## Inputs
- Straw: 1600; measured
  秸秆
- Wood Pulp: 160; measured
  进口木浆
- water: 24000; measured
  水
- Electricity: 1440; measured
  电

## Outputs
All rows: measured
- carbon dioxide (fossil): 1756.18
  CO2
- Nitrogen oxides: 3.01
  NOx
- sulfur dioxide: 3.61
  SO2
- methane (fossil): 0.28
  CH4
- chemical oxygen demand: 0.512
  COD
- biological oxygen demand: 0.1224
  BOD5
- nitrogen, total (excluding N2): 0.04
  TN
- Ammonia Nitrogen: 0.022
  NH3-N
- phosphorus, total: 0.0012
  TP
- Suspended solids, unspecified,Suspended solids, unspecified: 0.308
  SS
- Waste solid: 214.4
  固废

## Data selection and combination
本文的数据来源主要是深入到泉林纸业实地调研、泉林纸业企业报表、 山东省聊城市统计局统计资料、 聊城市环保局环评材料等。

## Use advice
在使用泉林纸业本色文化纸的生命周期评价（LCA）数据时，确保系统边界涵盖从原料收集、准备到分销渠道的整个过程。这包括稻秆的收集与运输、进口木材的运输、制浆过程、本色文化纸的生产、运输和销售，以及废水和黑液的处理。数据来源包括泉林纸业的实地调研、企业报表，以及山东省聊城市统计局和聊城市环保局的环评资料。功能单位是1吨本色文化纸产品。根据调研，泉林纸业在造纸过程中添加的化学品占原料总量的比例极少，且不使用漂白剂，因此其对环境的污染较小，在LCA中不计入化学品的投入。

## Review details
清单： 内部审查通过几个迭代步骤完成，涉及原始数据验证、原始数据记录、代表性、完整性、与 ISO 14040 和 14044 有关的建模的一致性。

## Data sources
- 周婷. 基于生命周期评价的秸秆造纸环境影响研究. (南京农业大学, 2013).
