# 电力生产 ; 电力 ; 火电（85.9%）+水电（6.0%）+风电（3.8%）+太阳能发电（4.3%）

Dataset: ILCD process, Partly terminated system
Geography: SAX-CN
Reference year: 2019
Classification: Energy carriers and technologies / Electricity
LCI method principle: Other
Generated by: 熊若熙, xiongrx0126@163.com
Owner: 天工LCI数据工作小组
Review: Dependent internal review by 天工LCI数据工作小组
Amounts: no units in this file; such an amount is in the reference unit of its flow, which a separate flow dataset defines
copyright: false
licenseType: Free of charge for all users and uses

## General comment
电力产生形式包括火力发电、水力发电、风力发电和太阳能发电

## Time period
根据2019年能源统计年鉴数据计算

## Technical purpose
该电力生产数据集详细介绍了包括火力发电、水力发电、风力发电和太阳能发电在内的能源混合，其中以火力发电为主。它适用于评估发电的环境影响，特别是在生命周期评估的背景下。这些数据适用于使用来自传统和可再生能源源混合的电力的工业、商业和居住应用。

## Reference product
- Electricity: 3.6; calculated

## Outputs
- carbon dioxide: 0.603; calculated
- sulfur dioxide: 0.000116; calculated
- Nitrogen oxides: 0.000184919; calculated
- Dust (unspecified, from stack): 2.2902e-5; calculated

## Data treatment and extrapolations
核算方法参考《企业温室气体排放核算方法与报告指南 发电设施》。不同形式发电量及燃料用量来自于《中国能源统计年鉴 2020》中的第三章（能源生产） 和第六章（地区能源平衡表）。用于计算二氧化碳排放因子的低位发热量、单位热值含碳量等燃料参数来自于《2019 年度中国区域电网二氧化碳基准线排放因子 OM 计算说明》、《企业温室气体排放核算方法与报告指南 发电设施》

## Use advice
在使用此数据集进行发电生命周期评估时，考虑提供的电力来源的具体混合，包括它们各自的份额：火力发电（85.9%）、水力发电（6.0%）、风力发电（3.8%）和太阳能发电（4.3%）。应相应地应用碳排放因子，以反映每种能源源所归因的环境影响。请注意，排放因素是使用2019年能源统计年鉴和相关企业温室气体排放核算发电设施指南中规定的方法论和参考点得出的。建议与这些来源保持方法论的一致性，以在评估中准确地表示。

## Review details
清单： 内部审查通过几个迭代步骤完成，涉及原始数据验证、原始数据记录、代表性、完整性、与 ISO 14040 和 14044 有关的建模的一致性。

## Data sources
- 熊若熙. 中国电力生产和消费二氧化碳与污染物排放因子核算. (清华大学, 2023).
