# 水泥生产|水泥, 复合硅酸盐水泥|新型干法回转窑, 4000 t/d|混合固废

Dataset: ILCD process, Unit process, black box
Geography: DL-LN-CN
Reference year: 2009
Classification: Materials production / Other mineralic materials
Generated by: 杨思琪
Amounts: no units in this file; such an amount is in the reference unit of its flow, which a separate flow dataset defines
copyright: false

## General comment
新型干法回转窑生产水泥。混合固废指粉煤灰和矿渣。

## Geography
大连金刚天马水泥厂

## Time period
数据采集时间为2009年和2010年。

## Model description
水泥生命周期评价的功能单位为1吨水泥产品。
整个水泥生命周期划分为原料准备单元、煤粉制备单元、熟料煅烧单元和水泥粉磨单元。其中原料准备阶段（生料制备）包括原材料破碎粉磨、烘干及预均化过程；煤粉制备阶段包括原煤运输、储存和粉磨；熟料煅烧阶段是预热分解和回转窑中加入煤粉和原料进行加热过程，期间有CO2、SO2、NOx等废气的排放；水泥粉磨阶段包括石膏、石灰石破碎与水泥粉磨。

## Reference product
- cement, portland-composite cement: 1000
  水泥产品

## Inputs
All rows: measured
- calcium carbonate: 841.4
  石灰石
- shale: 54
  页岩
- sandstone: 27.66
  砂岩
- iron, powder: 16.95
  铁粉
- gypsum (desulphurized): 51.5
  石膏
- ash: 154.3
  粉煤灰
- blast furnace slag: 257
  矿渣
- hard coal, run-of-mine: 92
  煤炭
- electricity, medium voltage: 318.06
  电。水泥生产能源消耗主要分为原煤和电力，其中公用系统中的电力生产、原煤生产部分利用国内开发的CLCD基础数据库获得。

## Outputs
- carbon dioxide: 632.65; measured
  CO2。CO2排放量来自于熟料燃煤和石灰石煅烧两部分，由于CO2排放量一般不做检测，排放量根据CO2排放公式计算得到。
- sulfur dioxide: 0.207; measured
  SO2。废气中SO2排放量由企业提供。
- Nitrogen oxides: 0.66; measured
  NOx。废气中NOx排放量由企业提供。
- carbon monoxide: 0.0222; measured
  CO
- particles (> PM10): 0.466; measured
  粉尘（排放）：废气，未标明粒径，按PM>10处理。
- Chlorides, unspecified: 2.38; software or database
  氯化物：废水。此外运输过程中排放的污染物和污水排放数据来自于生命周期评价软件GaBi4.0软件的数据。
- sulfate: 0.31; software or database
  硫酸盐：废水。此外运输过程中排放的污染物和污水排放数据来自于生命周期评价软件GaBi4.0软件的数据。
- blast furnace dust, for recovery: 596.6; measured
  粉尘（回收）：固废。固体废弃物包括收尘器收集的粉尘和生活垃圾，其中粉尘统一收集后返回工艺，生活垃圾全部投入回转窑进行焚烧处理，固体废弃物只考虑粉尘，其数据由企业提供。

## Data selection and combination
各单元主要输入原料和能源的数据以该企业实际生产流程和2009-2010两年的全年生产数据为基础，根据水泥产量折算成1t水泥所需要的原料和能量。与水泥生产相关的数据为实地调查、计算得到。

## Sampling procedure
大连某水泥企业拥有日产4000t新型干法窑水泥熟料生产线和独立开采的露天石灰石矿山，厂区周围分布有石灰石、页岩等矿产资源。现有直径3.8m、长13m水泥磨一台，直径3.2m、长13m矿渣磨两台。水泥生产过程主要分为生料制备阶段熟料制备阶段，煤粉制备阶段、水泥粉磨阶段等4个阶段。生料阶段主要原料有石灰石、页岩、硅石、铁粉；熟料阶段主要燃料是煤炭；水泥粉磨阶段主要原料是石膏、石灰石、粉煤灰、矿渣；其中主要能源来自煤炭和电力。该企业年产熟料135万t年生产复合硅酸盐水泥70万t；回转窑全年生产330d，水泥磨全年生产270d。产品为普通硅酸盐42.4级水泥和复合硅酸盐32.5级水泥。

## Data sources
- 朴文华, 陈郁, 张树深, & 徐小宁. (2012). 基于LCA方法的水泥企业清洁生产审核. 环境科学学报, 32, 1785–1792.
