# 土壤修复;异位修复;水泥窑协同处置;准备阶段;煤粉制备;二氧化碳

Dataset: ILCD process, Unit process, single operation
Geography: CN
Reference year: 2015
Classification: Other Services / Repair and maintenance
Generated by: 曹嘉萌, 2979480760@qq.com
Owner: 天工LCI数据工作小组
Review: Dependent internal review by 天工LCI数据工作小组
Amounts: no units in this file; such an amount is in the reference unit of its flow, which a separate flow dataset defines
copyright: false
licenseType: Free of charge for all users and uses

## General comment
水泥厂拥有一条4000t/d规模的现代化干法生产线，年生产水泥190万t，熟料150万t．公司自有矿山面积0.448km2，年生产石灰石能力200万t.生产工艺采用具有先进水平的RSP五级窑外分解技术．危险废物均采用汽车运输方式，配置危险品专用车辆，行车路线为货车专用线.矿山至厂区的运输距离约1.5km，废弃物的运输距离约50km．常规水泥的生产过程主要包括原辅材料的幵采及运输、生料制备、煤粉制备、熟料煅烧和水泥粉磨等阶段， 添加废弃物处置环节后， 废弃物（污染土壤、消化污泥、废油泥等）可以用作替代原料和替代燃料，以节省石灰石和煤炭等原材料。水泥窑协同处置，准备阶段，煤粉制备过程，主要包括煤炭及工业废物（废白土、涂料渣和废油泥）的贮存和粉磨。

## Technology and included processes
煤粉制备过程，主要包括煤炭及工业废物（废白土、涂料渣和废油泥）的贮存和粉磨。

## Technical purpose
所描述的工业过程用于土壤异位修复的生命周期评估。具体而言，它涉及在准备阶段为生产的水泥中协同处置废物材料。这包括在煤粉制备阶段用废弃产品（如污染土壤、消化污泥、废油泥等）替代传统原材料，以节约石灰石和煤炭等自然资源。该过程适用于寻求将环境可持续性整合到生产中的现代干法水泥厂。

## Reference product
- carbon dioxide: 13.26; measured

## Inputs
All rows: measured
- waste clay: 1.05
- Coating residue: 0.16
- oil sludge: 5.26
- Hard coal, at consumer EU-27: 98.28
- Electricity: 19.8

## Outputs
- Hard coal, at consumer EU-27: 98.8; measured

## Use advice
在使用此数据集进行生命周期评估(LCA)时，确保记录在过程中用作替代物的废物材料的来源和类型。如矿山到工厂的运输距离以及废物的运输距离等运输的独特方面，必须在LCA模型中反映出来。建模者还应考虑过程中使用的技术，即RSP五级窑外分解技术，及其对排放和能源使用的影响。此外，该过程排除了可忽略数量的废气、废水或固废，除非对特定评估意义重大，否则这些在LCA计算中不应被考虑。

## Review details
清单： 内部审查通过几个迭代步骤完成，涉及原始数据验证、原始数据记录、代表性、完整性、与 ISO 14040 和 14044 有关的建模的一致性。

## Data sources
- 侯星宇,张芸,戚昱等.水泥窑协同处置工业废弃物的生命周期评价[J].环境科学学报,2015,35(12):4112-4119.
