# 污泥处理与处置|与煤掺混焚烧发电与干化

Dataset: ILCD process, Unit process, single operation
Geography: CN
Classification: Materials production / Other mineralic materials
Generated by: 金思甜, 2331276@tongji.edu.cn
Review: Dependent internal review by 天工LCI数据工作小组
Amounts: no units in this file; such an amount is in the reference unit of its flow, which a separate flow dataset defines

## General comment
本文中处理将含水率83.48％、干燥基热值为 5MJ／kg 市政污泥，通过烟气干化为45％的污泥，然后与热值为22∙16MJ／kg 的无烟煤掺混燃烧发电

## Reference product
- Sludge: 1000; input; estimated
  本文中处理将含水率83.48％、干燥基热值为 5MJ／kg 市政污泥。

## Inputs
- hard coal: 166.54; calculated
- Light fuel oil: 0.02459; calculated
  燃料油
- hydrogen chloride: 0.09293; calculated
  NMVOC

## Outputs
All rows: calculated
- Flue dust: 3.86673
  烟尘
- carbon dioxide: 4007.77
- carbon monoxide: 1.65217
- Nitrogen oxides: 3.54378
- sulfur dioxide: 1.46455
- methane: 10.5553
- Waste (solid): 606.522

## Review details
清单： 内部审查通过几个迭代步骤完成，涉及原始数据验证、原始数据记录、代表性、完整性、与 ISO 14040 和 14044 有关的建模的一致性。

## Data sources
- 基于生命周期评价的市政污泥烟气干化环境影响评价及其经济性分析
