# 电力生产 ; 电力 ; 火电（9.1%）+水电（82.5%）+风电（7.0%）+太阳能发电（1.4%）

Dataset: ILCD process, Partly terminated system
Geography: YN-CN
Reference year: 2019
Classification: Energy carriers and technologies / Electricity
LCI method principle: Other
Generated by: 熊若熙, xiongrx0126@163.com
Owner: 天工LCI数据工作小组
Review: Dependent internal review by 天工LCI数据工作小组
Amounts: no units in this file; such an amount is in the reference unit of its flow, which a separate flow dataset defines
copyright: false
licenseType: Free of charge for all users and uses

## General comment
电力产生形式包括火力发电、水力发电、风力发电和太阳能发电

## Time period
根据2019年能源统计年鉴数据计算

## Technical purpose
本电力生产流程包括通过多种来源发电：火力发电、水力发电、风力发电和太阳能发电，各自的比例分别为火力9.1%、水电82.5%、风电7.0%和太阳能1.4%。用于为住宅、商业、工业和公共服务等多个领域供电。

## Reference product
- Electricity: 3.6; calculated

## Outputs
- carbon dioxide: 0.106; calculated
- sulfur dioxide: 1.7e-5; calculated
- Nitrogen oxides: 2.8248e-5; calculated
- Dust (unspecified, from stack): 3.803e-6; calculated

## Data treatment and extrapolations
核算方法参考《企业温室气体排放核算方法与报告指南 发电设施》。不同形式发电量及燃料用量来自于《中国能源统计年鉴 2020》中的第三章（能源生产） 和第六章（地区能源平衡表）。用于计算二氧化碳排放因子的低位发热量、单位热值含碳量等燃料参数来自于《2019 年度中国区域电网二氧化碳基准线排放因子 OM 计算说明》、《企业温室气体排放核算方法与报告指南 发电设施》

## Use advice
在利用该数据集进行生命周期评价（LCA）时，用户应遵循《企业温室气体排放核算方法与报告指南 发电设施》中概述的方法论。必须考虑数据中概述的具体能源组合，任何环境影响或二氧化碳排放因子都应使用《2019年度中国区域电网二氧化碳基准线排放因子OM计算说明》和报告指南提供的参数进行计算。为了准确评估，应包括《中国能源统计年鉴2020》相关章节报告的地区能源生产和平衡的变化。

## Review details
清单： 内部审查通过几个迭代步骤完成，涉及原始数据验证、原始数据记录、代表性、完整性、与 ISO 14040 和 14044 有关的建模的一致性。

## Data sources
- 熊若熙. 中国电力生产和消费二氧化碳与污染物排放因子核算. (清华大学, 2023).
