# 地下水修复;原位修复;水泥液浆垂直阻隔;工程实施;水泥液浆屏障

Dataset: ILCD process, Unit process, single operation
Geography: US
Classification: Other Services / Repair and maintenance
Generated by: 肖萌, xiaomeng@mail
Owner: 天工LCI数据工作小组
Review: Dependent internal review by 天工LCI数据工作小组
Amounts: no units in this file; such an amount is in the reference unit of its flow, which a separate flow dataset defines
licenseType: Free of charge for all users and uses

## General comment
本工业流程用于环境修复目的，特别是用于污染场地的原位地下水修复。其意图是形成水泥浆垂直障碍，以防止放射性同位素从受污染土壤迁移到地下水中。这项技术适用于大型环境清洁项目，例如因过去安全措施不当导致放射性同位素污染土壤和地下水的超级基金（Superfund）计划分类下的项目。

## Geography
For this project, a Superfund location at the Brookhaven National Laboratory (BNL) is studied. This particular case was chosen because it is representative of the scale and scenario where soil grouting would be used. It is also one of only a few sites where CS grouting has been used for full scale remediation. BNL has served as a production facility for research and development of radioisotopes for decades. The design of some of the facilities failed to provide adequate safety measures against the spread of radioactivity to the soils and groundwater beneath them and as a result, BNL was added to the Superfund National Priorities List in 1989.

## Reference product
- Cement slurry barrier: 83; measured
  使用该水泥液浆屏障，所能阻隔放射性同位素向地下水迁移的污染土壤量

## Inputs
- cement: 22970; measured
- Electricity: 30240; measured

## Use advice
在使用该数据集进行建模和评估时，用户应确保环境修复的规模和情景与超级基金地点的规模和情景一致。应特别注意水泥浆障碍的体积（在案例研究中为83立方米）以及障碍物对存在的特定放射性同位素的防护效果。用户必须考虑土壤灌浆法的技术适用性及其实施挑战。数据只应用于原位修复案例，其中类似的隔离方法是适用和可行的。

## Review details
清单： 内部审查通过几个迭代步骤完成，涉及原始数据验证、原始数据记录、代表性、完整性、与 ISO 14040 和 14044 有关的建模的一致性。

## Data sources
- Gallagher, P. M., Spatari, S. & Cucura, J. Hybrid life cycle assessment comparison of colloidal silica and cement grouted soil barrier remediation technologies. Journal of Hazardous Materials 250–251, 421–430 (2013).
