# NCM先进的湿法冶金术

Dataset: ILCD process, Unit process, single operation
Geography: CN
Reference year: 2020
Classification: Materials production / Metals and semimetals
Functional unit: using 1 kWh as the functionalunit
Generated by: 彭菲, pengfei24@email.ncu.edu.cn
Owner: 天工LCI数据工作小组
Review: Dependent internal review by 天工LCI数据工作小组
Amounts: no units in this file; such an amount is in the reference unit of its flow, which a separate flow dataset defines
copyright: false
licenseType: Free of charge for all users and uses

## General comment
采用湿法工艺进行材料回收前，对废旧三元锂电池进行安全放电、拆分、热解、机械破碎，分选得到粉末状含锂废料。 含锂物料加入浸出溶剂进行浸出，过滤分离得到含锂溶液，加入净化剂进行反应后，过滤，浓缩，在一定的反应条件下，加入沉淀剂充分反应后结晶沉淀，经过滤、洗涤、干燥后得到电池级碳酸锂。

## Technical purpose
此描述的三元锂电池湿法冶金工艺主要用于回收废旧电池材料。具体来说，它被用于回收高纯度碳酸锂，这是制造消费电子产品、电动车以及能源存储系统新电池电芯的关键组成部分。

## Reference product
- EoL NCM battery: 3.6; input; measured

## Inputs
- Sodium carbonate（95%）: 1.43; article inperiodical
  苏打 (Na2CO3)
- Citric Acid: 16.7; software or database
  柠檬酸，基于GREET/CN的新工艺
- sodium hydroxide: 2.08; article inperiodical
- Electricity: 4.58; article inperiodical
- carbon dioxide: 0.16; article inperiodical
- natural gas: 11.79, 11.79 (2 entries); article inperiodical

## Outputs
- nickel: 0.95; article inperiodical
- manganese: 0.3; article inperiodical
- Lithium carbonate: 0.98; measured
- cobalt: 0.32; measured
- copper: 1.01; measured
- aluminium: 0.8; measured

## Data selection and combination
The data come from multiple papers and are difficult to distinguish.

## Data treatment and extrapolations
calculation basis is GEB2016 (12.0 × 1024 sej)

## Use advice
用户在应用本数据集时，应考虑三元锂电池的特定报废场景，并考虑以GEB2016 (12.0 × 1024 sej)为能量消耗单位，每1 kWh电池产出作为计算基础。应使用这些数据精确模拟湿法冶金工艺的环境影响。需要考虑来自不同论文的数据完整性，并确保在生命周期评估过程中与1 kWh功能单元的方法论一致。

## Review details
清单： 内部审查通过几个迭代步骤完成，涉及原始数据验证、原始数据记录、代表性、完整性、与 ISO 14040 和 14044 有关的建模的一致性。

## Data sources
- Wang, Y. et al. Environmental impact assessment of second life and recycling for LiFePO4 power batteries in China. Journal of Environmental Management 314, 115083 (2022).
