# 土壤和地下水修复;原位;地下水原位化学氧化;注入井

Dataset: ILCD process, Unit process, single operation
Geography: CA
Reference year: 2007
Classification: Other Services / Repair and maintenance
Generated by: 王宁, wang_ning@caep.org.cn
Owner: 天工LCI数据工作小组
Review: Dependent internal review by 天工LCI数据工作小组
Amounts: no units in this file; such an amount is in the reference unit of its flow, which a separate flow dataset defines
copyright: false
licenseType: Free of charge for all users and uses

## General comment
注入井建设

## Geography
The contaminated area was located 600 m from a river shore in the northern part of the prov-ince of Quebec， Canada.

## Technology and included processes
使用聚氯乙烯、膨润土、石英砂、碎石、混凝土、柴油等建造注入井

## Technical purpose
该原位化学氧化过程用于污染土壤和地下水的修复。它特别适用于可直接在地下进行处理的场所。在这种情况下，它用于清理位于加拿大魁北克省北部、距河岸600米的一个已识别污染的区域。

## Reference product
- injection well: 1; estimated

## Inputs
All rows: estimated
- Diesel: 281
- cement: 5117
- bentonite: 1676
- sand: 352
- gravel: 2076
- Polyvinyl chloride: 513

## Use advice
本数据集的用户应考虑污染场地的具体环境条件。应注意到水体的临近性，如所提到的河岸，以及当地的地质和水文地质条件。根据特定的污染物和土壤特性调整注入井和化学氧化过程的设计至关重要。建议记录场地的初始条件、治疗效果以及治疗后的监测数据，以便全面评估。

## Review details
清单： 内部审查通过几个迭代步骤完成，涉及原始数据验证、原始数据记录、代表性、完整性、与 ISO 14040 和 14044 有关的建模的一致性。
