# Anoxic/Oxic process

Dataset: ILCD process, Unit process, single operation
Geography: HLJ-CN
Classification: Materials production / Other mineralic materials
Generated by: 黄润垚, runyaoh@163.com
Review: Dependent internal review by 天工LCI数据工作小组
Amounts: no units in this file; such an amount is in the reference unit of its flow, which a separate flow dataset defines

## Geography
Ashihe River Watershed

## Reference product
- Wastewater: 1; input; article inperiodical

## Inputs
- Electricity: 1.9836; article inperiodical
- Polyferric chloride: 0.0016; article inperiodical

## Outputs
- chemical oxygen demand: 250; article inperiodical

## Review details
清单： 内部审查通过几个迭代步骤完成，涉及原始数据验证、原始数据记录、代表性、完整性、与 ISO 14040 和 14044 有关的建模的一致性。

## Data sources
- Optimization of wastewater treatment strategies using life cycle assessment from a watershed perspective
