# 水泥生产|水泥, 硅酸盐水泥, 42.5MPa|其它回转窑

Dataset: ILCD process, Unit process, black box
Geography: HLJ-CN
Reference year: 2008
Classification: Materials production / Other mineralic materials
Generated by: 杨思琪
Amounts: no units in this file; such an amount is in the reference unit of its flow, which a separate flow dataset defines
copyright: false

## General comment
其他回转窑生产硅酸盐水泥。对黑龙江省水泥工业目前所具备的其他旋窑工艺的工艺流程和工业运行参数进行研究，收集了所确定产品系统的输入、输出数据，并对数据进行了计算、量化。

## Model description
以1kg28天抗压强度为42.5MPa的水泥所具有的使用性能作为功能单位，即1Fu=42.5kgMPa。评价范围为生料准备、熟料煅烧和水泥制备。粘土类资源消耗造成的环境负荷暂不考虑。铁粉属于铁质校正材料，其引发的环境影响不予考虑。产品系统输出端考虑排放的废弃物主要包括氮氧化物、二氧化硫、二氧化碳及粉尘。

## Reference product
- cement, portland cement, 42.5MPa: 1000
  42.5强度等级的硅酸盐水泥

## Inputs
- limestone, crushed, for mill: 1203.4; article inperiodical
  石灰石
- gypsum (desulphurized): 59; article inperiodical
  石膏
- hard coal: 235.386; article inperiodical
  标准煤。原始数据为0.2187kg标准煤，这里换算为硬煤，换算公式为1kg硬煤=0.929kg标准煤。
- electricity, medium voltage: 413.28; article inperiodical
  电力

## Outputs
- particles (> PM10): 0.64; article inperiodical
  粉尘，未标明粒径，按PM>10处理。
- sulfur dioxide: 0.7554; article inperiodical
  二氧化硫
- Nitrogen oxides: 2.951; article inperiodical
  氮氧化物
- carbon dioxide: 1181.7; article inperiodical
  二氧化碳

## Data sources
- 于淼. (2008). 黑龙江水泥工业可持续发展研究 [硕士, 哈尔滨工业大学].
