# 碳酸钙粉末生产;粉碎和筛选方法

Dataset: ILCD process
Geography: CN
Classification: Unit processes / Materials production / Non-energetic raw materials
Generated by: 陆嘉麒, wilsherelu@foxmail.com
Owner: 天工LCI数据工作小组
Review: Dependent internal review by 天工LCI数据工作小组
Amounts: no units in this file; such an amount is in the reference unit of its flow, which a separate flow dataset defines
copyright: false
licenseType: Free of charge for all users and uses

## General comment
该数据集代表通过碾碎和筛选方法生产碳酸钙粉末的碳足迹。生产的碳酸钙粉末通常用作塑料、纸张、油漆和建筑材料的填充剂，以及动物饲料中的膳食钙补充剂。

## Reference product
- Putty Powder: 1000; missing unimportant
  大白粉产品

## Inputs
- Limestone: 1458; missing unimportant
  石灰石
- Light fuel oil: 0.0267; missing unimportant
  柴油
- water: 0.0777; missing unimportant
- Electricity: 54.972; missing unimportant

## Outputs
All rows: missing unimportant
- Particles (PM0.2 - PM2.5): 0.2
  粉尘
- waste water - untreated: 0.035
  生活污水
- municipal solid waste deposition: 0.1232
  生活垃圾
- used oil: 1.668e-6
  废机油
- nitrous oxide: 0.000415
  氮氧化物（燃油废气）
- carbon monoxide (fossil): 0.001117
  一氧化碳（燃油废气）
- total hydrocarbons（THC）: 0.000183
  THC（燃油废气）

## Use advice
使用此数据时，请确保生命周期评估的范围与碳酸钙粉末的预期使用相匹配。考虑数据的地理相关性，因为它涉及CN（中国），并确保碾碎和筛选方法的技术代表性。还应在系统边界内考虑其他过程，如运输、终生处理和可能的回收流。

## Review details
清单： 内部审查通过几个迭代步骤完成，涉及原始数据验证、原始数据记录、代表性、完整性、与 ISO 14040 和 14044 有关的建模的一致性。

## Data sources
- 年产12万吨石膏粉项目环评报告
