# 生料制备|生料

Dataset: ILCD process, Unit process, single operation
Geography: CN
Classification: Materials production / Other mineralic materials
Generated by: 杨思琪
Amounts: no units in this file; such an amount is in the reference unit of its flow, which a separate flow dataset defines
copyright: false

## General comment
在原材料制备阶段，原始的原材料被磨成符合工艺要求的一定粒度范围的细粉末；然后，加入水和其他必要的材料以形成生胚，即为工艺阶段的最终半成品。在这个阶段，输入包括石灰石、粘土、煤、铁粉以及原材料中或在生产线上添加的水。该阶段包括三个内部的转化过程：对原材料进行研磨、煤粉碾磨和加水形成生料球。生料球是这个阶段的最终产品。在这个阶段，球团产品占总产量的大部分，高达79.32%（不包括水）。主要的污染物排放是粉尘，占总产量的0.29%。

## Model description
系统边界为生料的制备阶段（包括磨碎）。

## Reference product
- raw meal: 1000
  生料球

## Inputs
All rows: measured
- limestone, crushed, for mill: 719.28
  石灰石
- clay: 149.614
  黏土
- hard coal, run-of-mine: 99.743
  煤炭
- iron, powder: 34.961
  铁粉
- Water (fresh water): 25.193
  水（水含量）：输入材料中的水。至于每单位水泥产品中的指标，材料的直接输入包括石灰石，粘土，煤炭，铁粉添加剂，混合材料，石膏和氧气，但不包括原材料或能量中添加或包含的水的输入。材料的总输入包括材料的直接输入和隐藏流的输入，其中包括所有水和其他空气组成部分，除了氧气外。
- Water (fresh water): 231.877
  水输入

## Outputs
- particles (> PM10): 3.599; measured
  灰尘，未标明粒径，按PM>10处理。
- wastewater, unpolluted: 257.069; measured
  水

## Sampling procedure
经调查，采用立窑生产系统的水泥企业的年产能为100,000吨熟料。立窑生产线的总体特点是能耗高，生产能力有限，劳动生产率低，粉尘排放量大。立窑生产线的动态代谢分析是在正常生产水平下以1小时为单位进行的。

## Data sources
- Dan Hu, Zhen Guo, Zhen Wang, & Qiang Xiao. (2015). Metabolism analysis and eco-environmental impact assessment of two typical cement production systems in Chinese enterprises. Ecological Informatics 26, 70–77.
