# 土壤修复;原位修复;生物强化修复;施工准备;注射井和监测井的建设

Dataset: ILCD process, Unit process, single operation
Geography: SH-CN
Classification: Other Services / Repair and maintenance
Generated by: 肖萌, xiaomeng@mail
Owner: 天工LCI数据工作小组
Review: Dependent internal review by 天工LCI数据工作小组
Amounts: no units in this file; such an amount is in the reference unit of its flow, which a separate flow dataset defines
licenseType: Free of charge for all users and uses

## General comment
所描述的CHC+ISB过程用于含氯挥发性有机化合物（CVOCs）污染地点的修复。这种原位修复技术涉及使用加热-冷却系统与生物策略结合，专门设计用于处理均质污染的含水层。它适用于上海所提及区域等地区，这些区域的土壤和地下水在广泛深度和表面积上关注CVOCs污染。

## Geography
The aquifer in a certain area in Shanghai, China, is uniformly contaminated with chlorinated volatile organic compounds (CVOCs), with a surface area of 20,000 m2 and a depth of 50 m, with the water table located at a depth of 30 m.

## Reference product
- injection well: 65
  建成的注射井

## Inputs
- Gravel Sand: 356290; calculated
  Gravel sand
- bentonite: 150432; calculated
- Steel sections: 2720; software or database
- Polyethylene: 27200; software or database
  Polyethylene pipe
- Electricity: 1.69206e6; software or database

## Outputs
- Monitoring well: 63
  建成的监测井

## Use advice
此数据集的用户应特别注意污染规模和现场特性，因为所描述的过程是为特定的污染概况量身定制的 —— CVOCs污染的大型含水层（20,000平方米表面积，50米深度），水位位于30米深度。用户必须确保修复策略适用于其现场的具体情况。污染物浓度，水文地质和环境法规的变化可能需要对过程进行调整。在生物修复之前，注射井和监测井的建设至关重要，其设计应根据污染水平和含水层特性。该数据集旨在指导CHC+ISB的实践实施，但不能替代专业环境工程咨询的需要。

## Review details
清单： 内部审查通过几个迭代步骤完成，涉及原始数据验证、原始数据记录、代表性、完整性、与 ISO 14040 和 14044 有关的建模的一致性。

## Data sources
- Ni, Z. et al. Comparative Life-Cycle Assessment of Aquifer Thermal Energy Storage Integrated with in Situ Bioremediation of Chlorinated Volatile Organic Compounds. Environ. Sci. Technol. 54, 3039–3049 (2020).
