# 蔬菜生产 | 农作生产（常规）

Dataset: ILCD process, Unit process, single operation
Geography: HD-HEB-CN
Reference year: 2002
Valid until: 2017
Classification: Materials production / Other mineralic materials
Functional unit: 1T eggplant
Generated by: 张浩然, hrzhang@whu.edu.cn
Review: Dependent internal review by Tiangong LCI Data Working Group
Amounts: no units in this file; such an amount is in the reference unit of its flow, which a separate flow dataset defines
copyright: false

## Geography
曲周

## Time period
设施蔬菜长期定位实验于2002年3月开始

## Technology and included processes
本实验采用的日光温室为拱圆式, 长60 m、宽7 m.温室内多种蔬菜轮作 (每年两茬) , 本研究茄子生长于每年3~8月, 进行了为期4 a (2013~2016年) 的实验.实验设3个处理：常规、综合、有机

## Reference product
- eggplant: 1000; calculated
  常规

## Inputs
- Rice Seeds: 5.8; measured
  综合
- Agricultural film: 41.67; measured
  综合
- Diesel: 50; measured
  综合
- river water: 9425; measured
  综合
- Electricity: 18.18; calculated
  常规
- arable, non-irrigated: 85.34; calculated
  常规
- water: 80.44; calculated
  常规

## Outputs
All rows: calculated
- Hydrocarbons, aliphatic, alkanes, unspecified: 1.24e-5
  常规
- carbon monoxide: 0.0003
  常规
- carbon dioxide (fossil): 1.36
  常规
- ammonium: 1.1134
  常规
- nitrous oxide: 0.179
  常规
- Nitrogen oxides: 0.002
  常规
- nitrate: 2.1173
  常规
- sulfide: 0.0017
  常规
- methane: 2.99e-5
  常规
- phosphorus, total: 0.0165
  常规
- cadmium: 0.0004
  常规
- lead-210: 0.0015
  常规
- copper: 0.0048
  常规
- zinc: 0.0148
  常规
- phosphate: 0.0005
  常规
- Pyrethrins: 0.032
  常规
- benomyl: 0.0325
  常规
- carbendazim: 0.0325
  常规
- mancozeb: 0.0325
  常规

## Deviations from the LCI method approaches
生命周期评价包括以下 4 个步骤: 目标定义与范围界定、清单分析、影响评价和结果解释． 下面对主要步骤进行简要描述

## Data selection and combination
清单分析包括数据的收集和对数据进行量化处
理． 农资生产子系统中化肥、有机肥、杀虫剂、地
膜和柴油等生产的污染物排放( 包括CO、CO2、
NOx、SO2、CH4、N2O和COD 等) 及能源消耗等计
算参考梁龙［22］的研究结果．

## Data treatment and extrapolations
氧化亚氮的收集采用静态箱法［19］，测定采用
Agilent 7890A 型气相色谱仪． 土壤硝态氮( NO3－ -N和总磷淋溶采用自流式农田地下淋溶收集装置，每
次灌溉后 3 ～ 5 d 内用抽水器抽取渗漏液，用流动分析仪( TＲAACS2000 ) 测定． 有机肥中重金属含量( 主要考虑 Cu、Zn、Pb 和 Cd) 的浸提采用硝酸-盐酸-氢氟酸消煮法，待测液用 ICP-MS 测定． 作物收获时，对每次采摘果实进行称量和记录，取 3 次平均值． 各指标的详细测定过程参见文献［

## Review details
Inventory: The internal review was done by several iteration steps concerning raw data validation, raw data documentation, representativity, completeness and consistency of modelling with regard to ISO 14040 and 14044.; Documentation: The review of the documentation was performed by Ecobilan and is in compliance with ISO 14040 and 14044. The data set documentation is correct in view of the appropriateness of the information provided. It includes all relevant information in view of data quality and scope of application of the respective LCI result.

## Data sources
- 徐强,胡克林,李季等.华北平原不同生产模式设施蔬菜生命周期环境影响评价[J].环境科学,2018,39(05):2480-2488.DOI:10.13227/j.hjkx.201710007.
