# 废塑料化学回收制油;生活垃圾中废塑料;油化工艺

Dataset: ILCD process, Unit process, single operation
Geography: CN
Reference year: 2013
Classification: Unit processes / End-of-life treatment / Energy recycling
Functional unit: Dispose of 1 ton of waste plastic
Generated by: 陆嘉麒, wilsherelu@foxmail.com
Owner: 天工LCI数据工作小组
Review: Dependent internal review by 天工LCI数据工作小组
Amounts: no units in this file; such an amount is in the reference unit of its flow, which a separate flow dataset defines
copyright: false
licenseType: Free of charge for all users and uses

## General comment
数据集描述了一个过程，其中废塑料通过化学回收方法生产油。该过程通常用于将无法再使用、受污染或混合废塑料转换为可用的石油产品。生产出的油可以进一步精炼，用作新塑料的原料或作为替代能源。

## Reference product
- packaging waste (plastic): 1000; input; measured

## Inputs
- Electricity: 2052; measured
  电
- Water for industrial use: 0.14; measured
  水
- natural gas: 50; measured
  液化气

## Outputs
All rows: measured
- light fuel oil: 260.5
  轻油
- heavy fuel oil: 547.05
  重油
- Paraffin: 60.7833
  石蜡
- carbon: 58.2333
  炭黑
- carbon dioxide (fossil): 249.74
  天然气燃烧排放
- nitrogen dioxide: 0.32
  天然气燃烧排放
- methane (fossil): 0.0216674
  天然气燃烧排放
- sulfur dioxide: 0.101949
  天然气燃烧排放
- carbon monoxide (fossil): 0.0860491
  天然气燃烧排放

## Use advice
用户在使用此数据集时，应确保在化学回收过程的共产品间正确分配环境负担。应注意预定义的系统边界和假设，尤其是关于回收过程中使用的能源来源、副产品的去向以及输出油的质量。重要的是考虑所提供的数据是否与预期应用的地理位置和技术背景一致。

## Review details
清单： 内部审查通过几个迭代步骤完成，涉及原始数据验证、原始数据记录、代表性、完整性、与 ISO 14040 和 14044 有关的建模的一致性。

## Data sources
- 生活垃圾中废塑料资源化（油化）中试研究总结报告，上海耀森环保科技有限公司
