# 土壤修复;原位修复;多相抽提;工程实施;SVE系统安装

Dataset: ILCD process, Unit process, single operation
Geography: KR
Reference year: 2011
Classification: Other Services / Repair and maintenance
Generated by: 张建宾, zhangjb@caep.org.cn
Owner: 天工LCI数据工作小组
Review: Dependent internal review by 天工LCI数据工作小组
Amounts: no units in this file; such an amount is in the reference unit of its flow, which a separate flow dataset defines
copyright: false
licenseType: Free of charge for all users and uses

## General comment
污染源区面积200 m2，污染深度5 m

## Technology and included processes
1个取出井 2个监测井 已制成的SVE商用系统(包含取出+水/油分离+废气处理设施)直接应用在现场

## Technical purpose
所描述的工业过程用于土壤修复，特别是使用原位多相抽提技术。该流程涉及安装土壤气体抽提(SVE)系统，通常应用在200平方米的污染区域和5米深的污染层中。这种修复方法旨在通过抽取挥发性和半挥发性污染物来处理土壤污染。它通常用于环境工程项目，这些项目的土壤污染水平很高，并需要有效的局部治理解决方案。

## Reference product
- Hardened impermeable ground: 1; missing unimportant

## Inputs
- Flexible Polyurethane Hose: 340; missing unimportant
- sand: 4; missing unimportant
- Concrete: 5; missing unimportant
- CO2 Welding, Laser Beam Welding, Flux-cored Arc Welding, Gas Metal Arc Welding: 100; missing unimportant

## Use advice
在使用该LCA数据集时，必须考虑土壤修复过程的特定背景，包括污染物类型、土壤成分和当地环保法规。此数据集反映了一个独特的应用程序，并可能不适用于所有修复项目。用户应确保技术参数，如污染区域面积、深度和SVE系统安装所需的材料与他们的项目规格相符。排除该数据集中任何回收利益至关重要，因为主要关注点是修复效率。此外，使用阶段行为建模应反映SVE系统的运行条件，以准确评估环境影响。

## Review details
清单： 内部审查通过几个迭代步骤完成，涉及原始数据验证、原始数据记录、代表性、完整性、与 ISO 14040 和 14044 有关的建模的一致性。

## Data sources
- Seung-Woo Jeong, Sangwon Suh. Assessment of Environmental Impacts and CO2 Emissions from Soil Remediation Technologies using Life Cycle Assessment - Case Studies on SVE and Biopile Systems -. 大韓環境工學會誌
