# 丙烯生产 | 丙烯 | 蒸汽裂解路线 | 石脑油

Dataset: ILCD process, Unit process, black box
Geography: DL-LN-CN
Reference year: 2018
Classification: Materials production / Other mineralic materials
Functional unit: A functional unit is defined as 1 ton of propylene product
LCI method principle: Attributional
LCI method approaches: Allocation - mass
Generated by: 任亚楠, renyn15@tsinghua.org.cn
Review: Dependent internal review by Tiangong LCI Data Working Group
Amounts: no units in this file; such an amount is in the reference unit of its flow, which a separate flow dataset defines
copyright: false

## General comment
蒸汽裂解工艺过程主要包括乙烯裂解单元、干气回收单元(ROG)、废碱氧化单元(WAO)、变压吸附制氢(PSA)单元及低温储罐区。本项目输入的关键参数包括原料(石脑油、炼厂干气、正丁烷)、能源(电力、蒸汽、新鲜水)。该工艺供应给产品包括氢气、乙烯、丙烯、混合C4、裂解汽油、裂解燃料油。

## Geography
工艺案例工厂是恒力石化化工有限公司。该企业位于辽宁省大连市，其蒸汽裂解工艺建于2018年，丙烯产能为40万吨/年。

## Time period
工艺建于2018年

## Technology and included processes
工厂为炼化一体化体制，即炼油和石脑油裂解生产化学品相结合的一体化生产模式。因此，蒸汽裂解工艺制丙烯的主要原料(石脑油、炼厂干气、正丁烷、正戊烷)作为中间产品，由该石化厂提供，因此生命周期评价模型忽略其原料运输阶段的环境影响。

## Reference product
- propene (propylene): 1000; measured
  丙烯

## Inputs
All rows: measured
- Refinery Gas: 2680
  炼厂干气
- naphtha: 2970
  轻石脑油
- Butane: 1520
  正丁烷
- C5 Hydrocarbon Mixture: 1250
  C5+
- Methanol: 0.08247
  甲醇
- sodium hydroxide: 23.9153
  氢氧化钠
- Dimethyl disulfide: 0.63398
  二甲基二硫
- Phosphate: 0.13621
  磷酸盐
- natural gas: 1230
  燃料气
- process steam: 3660
  蒸汽
- Water (fresh water): 9050
  新鲜水
- electricity mix: 721.08
  电

## Outputs
All rows: measured
- ethene (ethylene): 3710
  乙烯
- Pyrolysis gasoline: 920
  裂解汽油
- Cracked fuel oil: 120
  裂解燃料油
- C4 Hydrocarbon Mixture: 610
  C4+
- Hydrogen: 170
  氢气
- Methane: 2080
  甲烷
- carbon dioxide: 3560
  CO2
- sulfur dioxide: 0.30451
  SO2
- nitrous oxide: 2.58821
  NOx
- Dust (unspecified, from stack): 0.30451
  颗粒物
- chemical oxygen demand: 5.08618
  COD

## Deviations from the LCI method approaches
采用质量分配法量化产品丙烯和副产品之间的环境负荷

## Data selection and combination
丙烯生产工艺详细的投入产出数据来自企业公开的环境影响评价报告，包括原料和辅料投入、能源和资源消耗，以及废气、废水和固体废物的排放。

## Review details
Inventory: The internal review was done by several iteration steps concerning raw data validation, raw data documentation, representativity, completeness and consistency of modelling with regard to ISO 14040 and 14044.; Documentation: The review of the documentation was performed by Ecobilan and is in compliance with ISO 14040 and 14044. The data set documentation is correct in view of the appropriateness of the information provided. It includes all relevant information in view of data quality and scope of application of the respective LCI result.

## Data sources
- 吕琳. 丙烯产品环境负荷及温室气体减排的碳税政策. (大连理工大学, 2022).
