# Gypsum powder production | CN

Dataset: ILCD process
Classification: Materials production / Other mineralic materials
Generated by: Jiaqi Lu, wilsherelu@foxmail.com
Amounts: no units in this file; such an amount is in the reference unit of its flow, which a separate flow dataset defines

## Reference product
- Gypsum Powder: 1000
  石膏粉产品

## Inputs
- Limestone: 400
  石灰石
- gypsum: 880
  天然石膏
- Cellulose: 8
  纤维素
- water: 110
- electricity mix: 180.36
- process steam: 720
  蒸汽

## Outputs
- nitrous oxide: 1700
  氮氧化物[排放到大气（未指定类型）]
- sulfur dioxide: 20870
  二氧化硫[排放到大气（未指定类型）]
- Particles (PM0.2 - PM2.5): 25330
  总颗粒物[排放到大气（未指定类型）]
