# 水泥生产|水泥, 普通硅酸盐水泥, 42.5MPa|新型干法|混合固废

Dataset: ILCD process, Unit process, black box
Geography: HLJ-CN
Reference year: 2008
Classification: Materials production / Other mineralic materials
Generated by: 杨思琪
Amounts: no units in this file; such an amount is in the reference unit of its flow, which a separate flow dataset defines
copyright: false

## General comment
实验室数据。电石渣替代石灰石生产水泥。生料中电石渣配比30%。
应用黑龙江乙炔化工行业所产生的电石渣烧制水泥。
采用合肥水泥研究设计院开发了预烘干干磨干烧工艺，该工艺是目前较为先进的利用电石渣生产水泥的新型干法工艺。该工艺可使电石渣在生料配比提高到60%以上，石灰石替代率达80%以上，并且较为稳定的配料提高了电石渣入磨的稳定性。

## Model description
以1kg28天抗压强度为42.5MPa的水泥所具有的使用性能作为功能单位，即1Fu=42.5kgMPa。评价范围为生料准备、熟料煅烧和水泥制备。粘土类资源消耗造成的环境负荷暂不考虑。铁粉属于铁质校正材料，其引发的环境影响不予考虑。产品系统输出端考虑排放的废弃物主要包括氮氧化物、二氧化硫、二氧化碳及粉尘。

## Reference product
- cement, ordinary portland cement, 42.5MPa: 1000
  42.5普通硅酸盐水泥

## Inputs
- limestone, crushed, for mill: 588.5
  石灰石
- Carbide slag: 349.1
  电石渣。生料中电石渣配比30%。
- gypsum (desulphurized): 51.3
  石膏。
- ash: 98.7
  粉煤灰
- hard coal: 125.927
  标准煤。原始数据为0.117kg标准煤，这里换算为硬煤，换算公式为1kg硬煤=0.929kg标准煤。
- electricity, medium voltage: 388.8
  电力

## Outputs
- particles (> PM10): 0.324
  粉尘，未标明粒径，按PM>10处理。
- sulfur dioxide: 0.3893
  二氧化硫
- Nitrogen oxides: 1.557
  氮氧化物
- carbon dioxide: 597.9
  二氧化碳（kg）。

## Data sources
- 于淼. (2008). 黑龙江水泥工业可持续发展研究 [硕士, 哈尔滨工业大学].
