# LFP电池火法冶金术

Dataset: ILCD process, Unit process, single operation
Geography: CN
Reference year: 2018
Classification: End-of-life treatment / Material recycling
Functional unit: using 1 kWh as the functionalunit
Generated by: 彭菲, pengfei24@email.ncu.edu.cn
Review: Dependent internal review by 天工LCI数据工作小组
Amounts: no units in this file; such an amount is in the reference unit of its flow, which a separate flow dataset defines
copyright: false

## General comment
首先将完全放电的EoL LFP电池拆解和破碎。然后，电池材料通过1400℃高温冶炼（或称为烧结）过程进行处理。接着进行酸浸，溶剂萃取。最后氧化并进行900℃焙烧得到LiCoO2

## Reference product
- EoL LFP battery: 3.6; input; article inperiodical

## Inputs
All rows: article inperiodical
- Limestone: 1.36
  石灰石、砾石、生产混合物、EU-28
- Sulphuric acid: 4.39
  硫酸，生产混合物、EU-28
- sodium hydroxide: 3
  氢氧化钠，生产混合物、EU-28
- hydrogen peroxide: 0.25
  过氧化氢
- Electricity: 0.074
- natural gas: 6.84, 6.84 (2 entries)

## Outputs
- carbon dioxide: 10.32; article inperiodical
- copper: 0.98; article inperiodical
- iron: 0.91; article inperiodical
- aluminium: 0.14; article inperiodical

## Data selection and combination
The data come from multiple papers and are difficult to distinguish.

## Review details
清单： 内部审查通过几个迭代步骤完成，涉及原始数据验证、原始数据记录、代表性、完整性、与 ISO 14040 和 14044 有关的建模的一致性。

## Data sources
- Wang, Y. et al. Environmental impact assessment of second life and recycling for LiFePO4 power batteries in China. Journal of Environmental Management 314, 115083 (2022).
