# 电力生产 ; 电力 ; 火电（88.0%）+水电（1.5%）+风电（6.7%）+太阳能发电（3.8%）

Dataset: ILCD process, Partly terminated system
Geography: SX-CN
Reference year: 2019
Classification: Energy carriers and technologies / Electricity
LCI method principle: Other
Generated by: 熊若熙, xiongrx0126@163.com
Owner: 天工LCI数据工作小组
Review: Dependent internal review by 天工LCI数据工作小组
Amounts: no units in this file; such an amount is in the reference unit of its flow, which a separate flow dataset defines
copyright: false
licenseType: Free of charge for all users and uses

## General comment
电力产生形式包括火力发电、水力发电、风力发电和太阳能发电

## Time period
根据2019年能源统计年鉴数据计算

## Technical purpose
该数据集代表了电力生成过程，包括火力发电、水力发电、风力发电和太阳能发电。它反映了这些过程在电力产业中的比例混合，通常是国家或地区能源特征的典型表现。这些数据可以用来理解各行业电力消费的环境影响，以及在电力来源是相关因素时，产品和服务生命周期评估。

## Reference product
- Electricity: 3.6; calculated

## Outputs
- carbon dioxide: 0.76; calculated
- sulfur dioxide: 0.000146; calculated
- Nitrogen oxides: 0.00023193; calculated
- Dust (unspecified, from stack): 2.8799e-5; calculated

## Data treatment and extrapolations
核算方法参考《企业温室气体排放核算方法与报告指南 发电设施》。不同形式发电量及燃料用量来自于《中国能源统计年鉴 2020》中的第三章（能源生产） 和第六章（地区能源平衡表）。用于计算二氧化碳排放因子的低位发热量、单位热值含碳量等燃料参数来自于《2019 年度中国区域电网二氧化碳基准线排放因子 OM 计算说明》、《企业温室气体排放核算方法与报告指南 发电设施》

## Use advice
在使用此数据集进行生命周期评估时，请确保电力混合与正在评估的地理位置相对应，因为不同地区的能源配置可能会有显著差异。考虑到所提供数据的具体年份，由于能源组合和技术随时间而变化。为了取得准确的结果，需要将碳排放因素与评估的年份和地区范围对齐。除非数据集的方法论中特别提到了回收过程，否则应排除任何回收过程。如果被评估的产品或服务中的电力消费并不反映数据集中详细说明的平均混合比例，则应该调整数据集。

## Review details
清单： 内部审查通过几个迭代步骤完成，涉及原始数据验证、原始数据记录、代表性、完整性、与 ISO 14040 和 14044 有关的建模的一致性。

## Data sources
- 熊若熙. 中国电力生产和消费二氧化碳与污染物排放因子核算. (清华大学, 2023).
