# 电力生产 ; 电力 ; 火电（12.5%）+水电（85.0%）+风电（1.8%）+太阳能发电（0.7%）

Dataset: ILCD process, Partly terminated system
Geography: SC-CN
Reference year: 2019
Classification: Energy carriers and technologies / Electricity
LCI method principle: Other
Generated by: 熊若熙, xiongrx0126@163.com
Owner: 天工LCI数据工作小组
Review: Dependent internal review by 天工LCI数据工作小组
Amounts: no units in this file; such an amount is in the reference unit of its flow, which a separate flow dataset defines
copyright: false
licenseType: Free of charge for all users and uses

## General comment
电力产生形式包括火力发电、水力发电、风力发电和太阳能发电

## Time period
根据2019年能源统计年鉴数据计算

## Technical purpose
该数据集描述了一个区域的混合电力生产概况，其中火电占生产组合的12.5%，水电占大多数85.0%，风电贡献1.8%，太阳能发电0.7%。这些数据代表了主要用于包括居民、商业和工业能源消费在内的一般用途的电力供应。

## Reference product
- Electricity: 3.6; calculated

## Outputs
- carbon dioxide: 0.114; calculated
- sulfur dioxide: 1.8e-5; calculated
- Nitrogen oxides: 3.0177e-5; calculated
- Dust (unspecified, from stack): 4.202e-6; calculated

## Data treatment and extrapolations
核算方法参考《企业温室气体排放核算方法与报告指南 发电设施》。不同形式发电量及燃料用量来自于《中国能源统计年鉴 2020》中的第三章（能源生产） 和第六章（地区能源平衡表）。用于计算二氧化碳排放因子的低位发热量、单位热值含碳量等燃料参数来自于《2019 年度中国区域电网二氧化碳基准线排放因子 OM 计算说明》、《企业温室气体排放核算方法与报告指南 发电设施》

## Use advice
使用此数据集的用户应参考《企业温室气体排放核算方法与报告指南 发电设施》以了解核算方法。此外，有必要根据《中国能源统计年鉴2020》中的第三章'能源生产'和第六章'地区能源平衡表'来考虑不同形式电力和燃料的消耗。在计算二氧化碳排放因子时，必须根据'2019中国区域电网二氧化碳基准线排放因子计算说明OM'以及企业指南来获取燃料参数。对于区域背景和电力生成组合定义范围内的方法论应给予特别关注。

## Review details
清单： 内部审查通过几个迭代步骤完成，涉及原始数据验证、原始数据记录、代表性、完整性、与 ISO 14040 和 14044 有关的建模的一致性。

## Data sources
- 熊若熙. 中国电力生产和消费二氧化碳与污染物排放因子核算. (清华大学, 2023).
