# 电池组件生产 ; 电池组件 ; 导线焊接串并联、模压封装

Dataset: ILCD process, Unit process, single operation
Geography: SC-CN
Reference year: 2013
Classification: Systems / Other materials
Functional unit: 1 kg solar grade multi-Si
LCI method principle: Attributional
LCI method approaches: Allocation
Generated by: 杨锦锋, yjfzfshn@163.com
Owner: 天工LCI数据工作小组
Review: Dependent internal review by 天工LCI数据工作小组
Amounts: no units in this file; such an amount is in the reference unit of its flow, which a separate flow dataset defines
copyright: false
licenseType: Free of charge for all users and uses

## General comment
多晶硅

## Geography
四川某太阳能电池组件生产企业

## Time period
文章发表

## Technology and included processes
用特殊导线焊接串并联后，模压封装在高透射率钢化玻璃上，进而形成太阳能电池组件产品

## Reference product
- Solar Module: 1e6; measured
  太阳能电池组件（MW）

## Inputs
All rows: measured
- Multi-Si solar cell: 5808
  太阳能电池片
- electricity: 22320
  电耗
- Water (fresh water): 348610
  新鲜水
- Glass: 60
  玻璃
- TPT film: 430
  TPT背板
- Ethylene-vinyl acetate copolymer: 30
  EVA膜
- Organic Silicone: 40
  有机硅胶
- aluminium: 10
  铝框

## Outputs
- volatile organic compound: 3.24; measured
  TVOC
- Welding Fumes: 1.04; measured
  焊接烟气
- industrial waste (unspecified): 132; measured
  固体废弃物

## Deviations from the LCI method approaches
以太阳能级多晶硅为研究对象，运用 LCA的评价方法，定量计算国内普遍生产水平下，太阳能级多晶硅生命周期过程的资源、能源投入和环境排放值

## Data selection and combination
根据四川某太阳能电池组件生产企业生产过程的数据资料收集整理

## Review details
清单： 内部审查通过几个迭代步骤完成，涉及原始数据验证、原始数据记录、代表性、完整性、与 ISO 14040 和 14044 有关的建模的一致性。

## Data sources
- 何洋. 太阳能级多晶硅的生命周期评价. (西南交通大学, 2013).
