# 高密度聚乙烯生产;高密度聚乙烯

Dataset: ILCD process, Unit process, black box
Geography: CN
Reference year: 2020
Classification: Materials production / Plastics
Functional unit: considering 1 kg resin production as the functional unit.
Generated by: 郭慧娟, GHJ@email.ncu.edu.cn
Owner: 天工LCI数据工作小组
Review: Dependent internal review by 天工LCI数据工作小组
Amounts: no units in this file; such an amount is in the reference unit of its flow, which a separate flow dataset defines
copyright: false
licenseType: Free of charge for all users and uses

## General comment
通过前期原油精炼得到乙烯和丙烯，然后分别聚合成PE和PP。对于PE，根据不同的聚合方法得到了HDPE和LDPE

## Geography
Process-based data from China were used, yet if not available, data from Europe were applied instead.

## Time period
Process-based data from China were used, yet if not available, data from Europe were applied instead. The electricity input was developed based on the national grid structure in China (Table S3), which was obtained from the share of the electric power structure in 2020 (National Bureau Statistics of China, 2020).

## Reference product
- polyethylene high density granulate (PE-HD): 1; missing unimportant

## Inputs
- ethylene: 1.02; missing unimportant
- naphtha: 0.075; missing unimportant
- Hydrogen: 0.11; missing unimportant
- Electricity: 1.5; missing unimportant

## Outputs
All rows: missing unimportant
- carbon dioxide: 2.35
- carbon monoxide: 1.76
- hydrocarbons (unspecified): 0.33
- Nitrogen oxides: 0.32
- ethane: 0.016
- toluene: 9e-9
- benzene: 6.5e-7
- phenol: 2e-9
- Waste (unspecified): 1.27
- Suspended substances: 0.33

## Data treatment and extrapolations
ReCiPe method (Europe H/H) was used as the assessment method for consistency.

## Review details
清单： 内部审查通过几个迭代步骤完成，涉及原始数据验证、原始数据记录、代表性、完整性、与 ISO 14040 和 14044 有关的建模的一致性。

## Data sources
- An, J., Wu, F., Wang, D. & You, J. Estimated material metabolism and life cycle greenhouse gas emission of major plastics in China: A commercial sector-scale perspective. Resources, Conservation and Recycling 180, (2022).
