# 基于玉米秸秆乙二醇生产| 乙二醇| 催化反应| 芒草

Dataset: ILCD process, Unit process, black box
Geography: CN
Classification: Materials production / Other mineralic materials
Functional unit: The functional unit was defined as the production of 1 metric ton of EG in China.
LCI method principle: Attributional
Generated by: 唐子睿, tangzirui123@gmail.com
Review: Dependent internal review by Tiangong LCI Data Working Group
Amounts: no units in this file; such an amount is in the reference unit of its flow, which a separate flow dataset defines
copyright: false

## General comment
设计的生物质乙二醇生产模型包括原料供应物流、原料预处理、反应、产品分离、废水处理和利用。

## Geography
功能单位定义为在中国生产1吨乙二醇。

## Technology and included processes
芒草通过预处理单元释放出纤维素和半纤维素，在反应单元中在一定条件下转化为乙二醇。 粗产品流包括乙二醇、丙二醇(PDO)、丁二醇(BDO)、水和其他副产品，并在随后的产品分离装置中进行纯化。 此外，原料供应物流、公用事业发电和废水处理装置旨在支持充足的原材料和能源、回收有价值的成分并处置不可用的物质。

## Reference product
- Ethylene glycol: 1000; article inperiodical

## Inputs
All rows: article inperiodical
- Miscanthus sinensis: 7200
- Diesel: 100
- water: 104600
- sodium hydroxide: 700
- Hydrogen: 100
- Limestone: 100
  Lime
- Tungstic acid: 300
- Diisobutyl Ketone: 40
- Electricity: 1440

## Outputs
- waste water - untreated: 104800; article inperiodical
- Production residues (unspecified): 1800; article inperiodical
  includes diols (0.3 t), heavy fraction (0.8 t), and light fraction (0.7 t).

## Data selection and combination
除了原料供应物流，整个生产系统是通过Aspen Plus模拟开发的，而原料供应物流单位是根据以前的工作进行估计的[44]。

## Review details
Inventory: The internal review was done by several iteration steps concerning raw data validation, raw data documentation, representativity, completeness and consistency of modelling with regard to ISO 14040 and 14044.; Documentation: The review of the documentation was performed by Ecobilan and is in compliance with ISO 14040 and 14044. The data set documentation is correct in view of the appropriateness of the information provided. It includes all relevant information in view of data quality and scope of application of the respective LCI result.

## Data sources
- Zhao, Z., Jiang, J., Zheng, M. & Wang, F. Advancing development of biochemicals through the comprehensive evaluation of bio-ethylene glycol. Chemical Engineering Journal 411, 128516 (2021).
