# 铜渣回收|水泥|电炉处理后生产水泥|铜渣

Dataset: ILCD process, Unit process, single operation
Geography: CN
Reference year: 2010
Classification: Materials production / Other mineralic materials
Functional unit: The functional unit was defined as the recycling of 1 ton of copper slag from copper smelting process.
LCI method principle: Attributional
LCI method approaches: Substitution
Generated by: 王鹏, 2867919560@qq.com
Review: Dependent internal review by Tiangong LCI Data Working Group
Amounts: no units in this file; such an amount is in the reference unit of its flow, which a separate flow dataset defines
copyright: false

## Geography
中国领先的铜业公司。

## Time period
摘自相关公司2010年内部报告。

## Technology and included processes
根据技术可用性，开发了四种铜渣回收方案：（1）直接生产水泥，（2）电炉处理后生产水泥，（3）浮选后生产水泥，（4）生产不烧砖浮选后。

## Reference product
- carbon dioxide (fossil): 5265.9; measured
  CO2

## Inputs
All rows: measured
- Hard coal, at consumer EU-27: 1648.3
  Hard coal
- crude oil; 42.3 MJ/kg: 46.6
  Crude oil
- natural gas; 44.1 MJ/kg: 38.2
  Natural gas
- Limestone: 6567.7
- clay: 1315.1
  Clay
- gypsum: 400.9
  Gypsum

## Outputs
- carbon monoxide: 3.5; measured
  CO
- sulfur dioxide: 19.2; measured
  SO2
- Hard coal: 17; measured
  NOx需要补充
- particles (PM2.5 - PM10): 23.3; measured
  Dust需要补充

## Deviations from the LCI method approaches
在分配程序之后，使用避免负担方法进行表征、归一化和加权。

## Data selection and combination
铜渣处理数据主要来源于国内某铜业龙头企业。水泥和砖的生产数据大部分来自采用先进设备和工艺的真实工厂，并辅以公开发表的文献。

## Data treatment and extrapolations
本研究中使用 GaBi 4 软件对铜回收系统进行建模并确定对环境的影响。采用生态指标99（EI99）进行生命周期影响评估

## Review details
Inventory: The internal review was done by several iteration steps concerning raw data validation, raw data documentation, representativity, completeness and consistency of modelling with regard to ISO 14040 and 14044.; Documentation: The review of the documentation was performed by Ecobilan and is in compliance with ISO 14040 and 14044. The data set documentation is correct in view of the appropriateness of the information provided. It includes all relevant information in view of data quality and scope of application of the respective LCI result.

## Data sources
- Song, X. L., Yang, J. X., Wang, J. W. & Wu, W. J. Assessing the Life Cycle Environmental and Economic Performance of Copper Slag Recycling. AMR 878, 219–225 (2014).
