# 水泥研磨|水泥, 改性粒状铜渣 31%, 42.9MPa|改性粒状铜渣

Dataset: ILCD process, Unit process, single operation
Geography: CS-HUN-CN
Classification: Materials production / Other mineralic materials
Generated by: 杨思琪
Amounts: no units in this file; such an amount is in the reference unit of its flow, which a separate flow dataset defines
copyright: false

## General comment
混合水泥生产。改性粒状铜渣被用作辅助胶凝材料（30 wt.%）。
在窑炉中形成的熟料通过空气淬火装置冷却，其中额外的热量被回收到预热器和旋风分离器中。然后将熟料与石膏混合，在水泥磨中与约30wt％的改性粒状铜渣（Modified granulated copper slag，MGCS）一起研磨。最后，从水泥磨中得到细灰色粉末，然后放置在筒仓中。
MGCS的制备是一个关键的阶段。原始的铜渣采自瑞典斯德哥尔摩的Boliden Mineral AB冶炼厂。将其在生料磨中研磨，以形成粒径小于0.60毫米的粒状铜渣（Granulated copper slag，GCS）。CaO（纯度99.9％）由中国长沙大诺建材有限公司提供。MGCS制备过程如下：在炉中加入GCS和CaO（20wt％），加热温度升至约1550℃，此时混合物完全熔化。然后采用水淬法形成MGCS。整个过程在150mL/min的氮气中进行。该过程在中国长沙矿冶研究院有限公司进行。生产的MGCS最终由卡车运输到水泥厂，该厂以电能为主要能源。

## Geography
湖南省长沙市内某典型水泥厂

## Model description
功能单位（FU）被定义为具有42.9 MPa抗压强度的1千克混合水泥。

## Reference product
- cement, modified granulated copper slag 31%, 42.9 MPa: 1000
  混合水泥42.9MPa

## Inputs
- clinker: 657; measured
  熟料
- gypsum (desulphurized): 47.3; measured
  石膏
- Modified granulated copper slag: 310; measured
  改性粒状铜渣（MGCS）
- electricity, medium voltage: 259.92; measured
  电。电力是由热力产生的。

## Outputs
- particles (> PM10): 1.69e-5; measured
  PM，未标明粒径，按PM>10处理。

## Deviations from the LCI method approaches
与背景系统相关的数据从Ecoinvent 3.1数据库中获得。

## Data selection and combination
前景系统的清单数据是直接从位于中国湖南省长沙市的水泥厂收集的。

## Data sources
- Qinli Zhang, Bingyi Zhang, & Daolin Wang. (2022). Environmental Benefit Assessment of Blended Cement with Modified Granulated Copper Slag. MATERIALS, 15(15).
