# 电力生产 ; 电力 ; 火电（96.1%）+水电（2.2%）+风电（0.7%）+太阳能发电（1.1%）

Dataset: ILCD process, Partly terminated system
Geography: BJ-CN
Reference year: 2019
Classification: Energy carriers and technologies / Electricity
LCI method principle: Other
Generated by: 熊若熙, xiongrx0126@163.com
Owner: 天工LCI数据工作小组
Review: Dependent internal review by 天工LCI数据工作小组
Amounts: no units in this file; such an amount is in the reference unit of its flow, which a separate flow dataset defines
copyright: false
licenseType: Free of charge for all users and uses

## General comment
电力产生形式包括火力发电、水力发电、风力发电和太阳能发电

## Time period
根据2019年能源统计年鉴数据计算

## Technical purpose
该数据集代表了电力生产的不同形式：火力发电、水力发电、风力发电和太阳能发电，可以用于居民生活、商业和工业应用的电网分配。特别是，大部分电力通过火力发电产生，主要用于工业制造等高需求场景，而可再生能源（水力发电、风力发电和太阳能发电）可以用于并网和离网的可持续能源解决方案。

## Reference product
- Electricity: 3.6; calculated

## Outputs
- carbon dioxide: 0.345; calculated
- sulfur dioxide: 2e-5; calculated
- Nitrogen oxides: 3.6e-5; calculated
- Dust (unspecified, from stack): 8e-6; calculated

## Data treatment and extrapolations
核算方法参考《企业温室气体排放核算方法与报告指南 发电设施》。不同形式发电量及燃料用量来自于《中国能源统计年鉴 2020》中的第三章（能源生产） 和第六章（地区能源平衡表）。用于计算二氧化碳排放因子的低位发热量、单位热值含碳量等燃料参数来自于《2019 年度中国区域电网二氧化碳基准线排放因子 OM 计算说明》、《企业温室气体排放核算方法与报告指南 发电设施》

## Use advice
在使用该数据集进行生命周期评估时，必须考虑与电力生成形式相关的碳排放因子，此因子是根据《2019年能源统计年鉴》等权威来源计算得出的。数据集应结合《企业温室气体排放核算方法与报告指南 发电设施》中概述的指导方针使用。在模拟使用阶段时，必须注重电力生成的具体组合，以反映适当的环境影响，并且方法论应考虑提供参考文献中概述的能源生产和燃料使用的区域变化。

## Review details
清单： 内部审查通过几个迭代步骤完成，涉及原始数据验证、原始数据记录、代表性、完整性、与 ISO 14040 和 14044 有关的建模的一致性。

## Data sources
- 熊若熙. 中国电力生产和消费二氧化碳与污染物排放因子核算. (清华大学, 2023).
