# 土壤修复;原位修复;多相抽提;施工准备;建井

Dataset: ILCD process, Unit process, single operation
Geography: KR
Reference year: 2011
Classification: Other Services / Repair and maintenance
Generated by: 张建宾, zhangjb@caep.org.cn
Owner: 天工LCI数据工作小组
Review: Dependent internal review by 天工LCI数据工作小组
Amounts: no units in this file; such an amount is in the reference unit of its flow, which a separate flow dataset defines
copyright: false
licenseType: Free of charge for all users and uses

## General comment
建设3口抽提井

## Technology and included processes
聚氯乙烯45 kg -砂0.3 m3，膨润土211 kg -砂浆2,291 kg -钻井设备柴油11 L

## Technical purpose
该数据集描述了一种称为原位多相抽提的土壤修复过程，包括建设抽提井。这个过程特别用于去除现场土壤污染，而无需挖掘。它适用于环境工程领域，用于清理被污染的土地，通常作为环境修复项目或土壤保护努力的一部分。

## Reference product
- diesel: 0.011; input; missing unimportant

## Inputs
- waste incineration of plastics (rigid PVC): 45; missing unimportant
- sand: 0.3; missing unimportant
- bentonite: 211; missing unimportant
- Mortar: 2291; missing unimportant

## Outputs
- Extraction wel: 3; missing unimportant
  3口井

## Use advice
使用此数据集时，应将列出的所有组分及其数量包括在生命周期评估中。这意味着要计算45公斤PVC、0.3立方米沙子、211公斤膨润土、2291公斤砂浆以及11升用于钻探设备的柴油燃料。应特别注意系统边界，确保根据将此数据应用到的具体情景来定义使用阶段和生命周期终端阶段。这包括但不限于过程中可能的排放、能源使用以及回收材料的管理。

## Review details
清单： 内部审查通过几个迭代步骤完成，涉及原始数据验证、原始数据记录、代表性、完整性、与 ISO 14040 和 14044 有关的建模的一致性。

## Data sources
- Seung-Woo Jeong, Sangwon Suh. Assessment of Environmental Impacts and CO2 Emissions from Soil Remediation Technologies using Life Cycle Assessment - Case Studies on SVE and Biopile Systems -. 大韓環境工學會誌
