# 改性粒状铜渣生产|改性粒状铜渣

Dataset: ILCD process, Unit process, single operation
Geography: CS-HUN-CN
Classification: Materials production / Other mineralic materials
Generated by: 杨思琪
Amounts: no units in this file; such an amount is in the reference unit of its flow, which a separate flow dataset defines
copyright: false

## General comment
改性粒状铜渣（Modified granulated copper slag，MGCS）。MGCS制备是一个关键的阶段。原始的铜渣是从瑞典斯德哥尔摩的Boliden Mineral AB熔炉采购而来。它在生料磨中被研磨成粒径小于0.60毫米的粒状铜渣（Granulated copper slag，GCS）。CaO（纯度为99.9%）由长沙大诺建材有限公司提供。MGCS的制备过程如下。在加热温度升至约1550℃时，将GCS和CaO（20重量％）装入熔炉中，此时混合物完全熔化。然后采用淬水法形成MGCS。整个过程在氮气环境下进行，流速为150毫升/分钟。这个过程是在长沙矿冶研究院有限公司进行的。生产的MGCS最终被卡车运输到使用电力作为主要能源的水泥工厂。

## Geography
湖南省长沙市内某典型水泥厂

## Model description
功能单位（FU）被定义为具有42.9 MPa抗压强度的1千克混合水泥。

## Reference product
- Modified granulated copper slag: 1000
  改性粒状铜渣（MGCS）

## Inputs
- calcium oxide: 190.968; measured
  CaO
- Granulated copper slag: 954.839; measured
  粒状铜渣（GCS）
- electricity, medium voltage: 1800; measured
  电

## Outputs
- particles (> PM10): 1.17742; measured
  PM，未标明粒径，按PM>10处理。

## Deviations from the LCI method approaches
与背景系统相关的数据从Ecoinvent 3.1数据库中获得。

## Cut-off and completeness
由于铜渣可以被视为废物并根据欧盟指令不分配任何环境负担，因此本研究未考虑铜渣来源准备的影响。因此，只考虑了对粒状铜渣研磨和改性过程中产生的影响。

## Data selection and combination
前景系统的清单数据是直接从位于中国湖南省长沙市的水泥厂收集的。

## Data sources
- Qinli Zhang, Bingyi Zhang, & Daolin Wang. (2022). Environmental Benefit Assessment of Blended Cement with Modified Granulated Copper Slag. MATERIALS, 15(15).
