# 土壤修复;原位修复;多相抽提;工程实施;SVE运行

Dataset: ILCD process, Unit process, single operation
Geography: KR
Reference year: 2011
Classification: Other Services / Repair and maintenance
Generated by: 张建宾, zhangjb@caep.org.cn
Owner: 天工LCI数据工作小组
Review: Dependent internal review by 天工LCI数据工作小组
Amounts: no units in this file; such an amount is in the reference unit of its flow, which a separate flow dataset defines
copyright: false
licenseType: Free of charge for all users and uses

## General comment
采用SVE系统抽提750天

## Technology and included processes
SVE操作期间预计所需电量:148748 kWh

## Technical purpose
该土壤修复过程利用SVE（土壤气体抽提）在原位治理受污染土地。多相抽提系统连续运作750天，以确保污染物去除过程的效率和效果。它适用于需要降低土壤中挥发性有机化合物（VOCs）的环境恢复项目。

## Reference product
- Remediated soil: 1000; missing unimportant

## Inputs
- Electricity: 535493; missing unimportant

## Use advice
使用该LCA数据集时，需特别考虑运行SVE系统的能耗，本数据集中记录为在750天的抽提周期内消耗了148,748千瓦时电能。应使用这些数据来精确地模拟和评估对应时间段和污染水平的环境影响。此外，此数据集仅与原位土壤蒸汽抽提的技术规格相关，并可能不适用于其他土壤修复技术。确保使用该数据与技术范围和区域环境指导方针一致。

## Review details
清单： 内部审查通过几个迭代步骤完成，涉及原始数据验证、原始数据记录、代表性、完整性、与 ISO 14040 和 14044 有关的建模的一致性。

## Data sources
- Seung-Woo Jeong, Sangwon Suh. Assessment of Environmental Impacts and CO2 Emissions from Soil Remediation Technologies using Life Cycle Assessment - Case Studies on SVE and Biopile Systems -. 大韓環境工學會誌
