# 地下水修复;原位修复;可渗透反应墙;反应介质墙建设

Dataset: ILCD process, Unit process, single operation
Geography: US
Reference year: 2011
Classification: Other Services / Repair and maintenance
Generated by: 张建宾, zhangjb@caep.org.cn
Owner: 天工LCI数据工作小组
Review: Dependent internal review by 天工LCI数据工作小组
Amounts: no units in this file; such an amount is in the reference unit of its flow, which a separate flow dataset defines
copyright: false
licenseType: Free of charge for all users and uses

## General comment
反应介质填充

## Geography
多佛空军基地

## Technology and included processes
Fe0和石英砂的混合物

## Technical purpose
该描述的工艺涉及多佛空军基地的地下水修复，具体使用原位可渗透反应墙（PRB）方法。可渗透反应墙是一种地下结构，允许地下水通过反应介质流动，这种介质被设计为去除或降解污染物。建设反应墙通常包括在地下放置反应介质，创建一个处理受污染地下水的屏障。技术用途包括在军事场所或具有类似环境问题的其他地点管理受污染的地下水。

## Reference product
- Reactive barrier: 1; measured

## Inputs
- iron: 139000; measured
- quartz sand: 139000; measured
- Primary energy: 483000; measured

## Use advice
该数据集的用户应注意，它特别涉及到用反应介质构建和填充原位可渗透反应墙，以进行地下水修复。应关注当地地质条件、水文地质属性、现存特定污染物及其浓度水平。方法论建议包括确保与技术选择的兼容性、预期的污染物去除效率，以及长期维护和监测计划。同时，还必须考虑可能的环境影响，包括与修建和维护可渗透反应墙相关的任何排放和能源使用。

## Review details
清单： 内部审查通过几个迭代步骤完成，涉及原始数据验证、原始数据记录、代表性、完整性、与 ISO 14040 和 14044 有关的建模的一致性。

## Data sources
- Mark S. H. Mak and Irene M. C. Lo.Environmental Life Cycle Assessment of Permeable Reactive Barriers: Effects of Construction Methods, Reactive Materials and Groundwater Constituents[J].Environmental Science & Technology 2011, 45, 23, 10148-10154
