# 工业硅生产

Dataset: ILCD process, Unit process, single operation
Geography: CN
Reference year: 2014
Classification: Materials production / Other mineralic materials
Functional unit: The functional unit of the LCA study was 1 kWh based on a multi-Si PV module
LCI method principle: Attributional
LCI method approaches: Allocation
Generated by: 杨锦锋, yjfzfshn@163.com
Review: Dependent internal review by Tiangong LCI Data Working Group
Amounts: no units in this file; such an amount is in the reference unit of its flow, which a separate flow dataset defines
copyright: false

## General comment
多晶硅

## Geography
这项研究为中国的多晶硅组件光伏系统提供了生命週期评估

## Time period
文章发表

## Reference product
- Metallurgical silicon: 6.08; article inperiodical
  Silicon (99%)

## Inputs
- quartz sand: 20.48; article inperiodical
  Quartz sand
- hard coal: 45.4; article inperiodical
  Standard coal

## Outputs
All rows: article inperiodical
- carbon dioxide: 132.91
  Carbon dioxide
- carbon monoxide: 1.7
  Carbon monoxide
- Slag: 4.38
- Nitrogen oxides: 279.55
- Silicon dioxide: 1.7
- sulfur dioxide: 0.79
  Sulfur dioxide

## Deviations from the LCI method approaches
本研究旨在定量评估中国光伏系统的生命周期环境影响，为中国光伏产业的可持续发展提供科学依据

## Data selection and combination
库存数据，包括太阳能级硅、晶圆、铸锭、电池和模块生产所涉及的材料消耗和环境排放，主要来自代表中国当前领域多硅光伏技术的公司。能源消费数据参考了“中国太阳能光伏的清洁生产”报告(Li and Chang，2012)。多晶硅生产数据来源于国内有关的文献资料

## Review details
Inventory: The internal review was done by several iteration steps concerning raw data validation, raw data documentation, representativity, completeness and consistency of modelling with regard to ISO 14040 and 14044.; Documentation: The review of the documentation was performed by Ecobilan and is in compliance with ISO 14040 and 14044. The data set documentation is correct in view of the appropriateness of the information provided. It includes all relevant information in view of data quality and scope of application of the respective LCI result.

## Data sources
- Fu, Y., Liu, X. & Yuan, Z. Life-cycle assessment of multi-crystalline photovoltaic (PV) systems in China. Journal of Cleaner Production 86, 180–190 (2015).
