# 基于玉米秸秆乙醇生产; 乙醇 ; 发酵; 玉米秸秆

Dataset: ILCD process, Unit process, single operation
Geography: GX-CN
Classification: Energy carriers and technologies / Renewable fuels
Functional unit: The functional unit is 1.7 tonne of ethanol production.
LCI method principle: Attributional
LCI method approaches: Allocation - mass
Generated by: 唐子睿, tangzirui123@gmail.com
Owner: 天工LCI数据工作小组
Review: Dependent internal review by 天工LCI数据工作小组
Amounts: no units in this file; such an amount is in the reference unit of its flow, which a separate flow dataset defines
copyright: false
licenseType: Free of charge for all users and uses

## General comment
本研究对两种替代乙醇生产方案（基于玉米秸秆和基于木薯）的乙烯生产进行了评估。

## Geography
相关生产数据（例如电力、蒸汽、水、化学品、原材料消耗和直接排放）来源于中国广西省玉米秸秆乙烯生产工厂。

## Technology and included processes
本研究包括的过程总结如下：1）玉米秸秆生产；2）乙醇和乙烯生产；3）原料干燥；4）公路运输；5）废物处理；6) 材料和煤炭能源生产；7）生产能源回收。

## Technical purpose
所收集的数据涉及基于玉米秸秆的乙醇生产，该乙醇主要用于乙烯的生产。通过此过程产生的乙烯对各种工业应用至关重要，包括合成聚合物、化学品，以及作为塑料、洗涤剂和其他有机化合物生产的前体。数据集中详细介绍了利用玉米秸秆的生产情景，主要关注通过发酵过程衍生出乙醇这一乙烯合成的关键中间体。

## Reference product
- Ethanol: 1700; article inperiodical

## Inputs
All rows: article inperiodical
- Straw: 5400
- Glucoamylase: 3.8
- Calcium hydroxide: 18.3
- Amylase: 4.97, 4.8 (2 entries)
- Dipotassium Phosphate: 1.8
- Diammonium phosphate: 1.6
- Sulfuric acid: 9.3
- calcium chloride: 0.9
- Alkali: 31.4
- Urea: 0.96
- water: 48800
- process steam: 6960
- electricity: 2580.84

## Outputs
- Protein Feed: 1740; article inperiodical

## Deviations from the LCI method approaches
进行了基于产品质量的联产品分配。

## Data selection and combination
相关生产数据（例如电力、蒸汽、水、化学品、原材料消耗和直接排放）来源于中国广西玉米秸秆乙烯生产工厂。2. 玉米秸秆生产、燃煤发电和公路运输过程的相关数据取自参考文献。3. 由于缺乏中国的信息，因此使用了欧洲的化学品生产数据和相关背景数据[26]。

## Use advice
当使用此数据集进行生命周期评估时，用户应注意数据包括了旨在用于乙烯合成的基于玉米的乙醇生产过程的输入和输出。这包括原料消耗、能源使用和从种植、干燥、运输到废物处理等各个阶段的排放。已根据产品质量执行了共产品分配。分析的功能单位定义为生产1.7吨乙醇。为确保应用的一致性，用户应确保研究条件与其评估目标一致——特别是在地理和技术背景方面。从参考资料或其他地区（例如欧洲的化学品生产数据）引入的数据可能无法准确反映中国的本地实践，应谨慎使用。

## Review details
清单： 内部审查通过几个迭代步骤完成，涉及原始数据验证、原始数据记录、代表性、完整性、与 ISO 14040 和 14044 有关的建模的一致性。

## Data sources
- Hong, J., Zhang, Y., Xu, X. & Li, X. Life cycle assessment of corn- and cassava-based ethylene production. Biomass and Bioenergy 67, 304–311 (2014).
