# NGH开采| 甲烷水合物 |LCA、LCC分析

Dataset: ILCD process, Unit process, single operation
Geography: GD-CN
Reference year: 2009
Classification: Materials production / Other mineralic materials
LCI method principle: Attributional
LCI method approaches: Consequential
Generated by: 康诗康, 908798159@qq.com
Review: Dependent internal review by Tiangong LCI Data Working Group
Amounts: no units in this file; such an amount is in the reference unit of its flow, which a separate flow dataset defines
copyright: false

## General comment
本文对水合物的开采进行LCA分析，得到其生 命周期过程中对环境影响最重要的工艺环节和影 响类别，分析其产生原因，并提出合理的改进意见

## Geography
数据研制地点

## Time period
文献发表时间

## Technology and included processes
运用生命周期评价（LCA）和生命周期成本分析（LCC）两大方法，分 别对海洋NGH开采的环境效应和经济效益进行了系统分析，并与天然气（NG）开采进行对比。 结果表明，NGH开采排放的酸 性气体接近零，温室气体排放也比较少，全生命周期成本比NG开采低。

## Reference product
- process steam from natural gas: 0.31; log-normal; article inperiodical
  开采工程成本,数据为分布，量中填写的数据为取平均（取中值）的结果

## Outputs
All rows: log-normal; article inperiodical
- process steam from natural gas: 0.000623
  Exploitation engineering,数据为分布，量中填写的数据为取平均（取中值）的结果
- process steam from natural gas: 0.001
  Drilling engineering,数据为分布，量中填写的数据为取平均（取中值）的结果
- process steam from natural gas: 0.00099
  Surface engineering,数据为分布，量中填写的数据为取平均（取中值）的结果
- process steam from natural gas: 0.481
  Mining engineering,数据为分布，量中填写的数据为取平均（取中值）的结果
- process steam from natural gas: 0.484
  Total,数据为分布，量中填写的数据为取平均（取中值）的结果

## Data selection and combination
广州海洋地质调查局在南海北部东沙、 神狐、 西沙和琼东南4个海域实施了9年的水合物专项 调查，完成18个航次的综合调查与研究，发现大量 冷泉碳酸盐及以天然气为生的甲烷菌生物群，在很 大程度上可以判定存在大块的渗漏型[5]NGH矿藏[8]， 具有品位高、埋藏浅、分布集中的特点。

## Data treatment and extrapolations
运用生命周期的方法， 对NGH开采进行了环 境性能和经济性能的综合评价。 有效识别关键排放 物和环境影响潜值，找出最主要的环境成本，为技 术方案的选择提供定量的科学依据。 说明NGH的 开采具有现实可行性。

## Review details
Inventory: The internal review was done by several iteration steps concerning raw data validation, raw data documentation, representativity, completeness and consistency of modelling with regard to ISO 14040 and 14044.; Documentation: The review of the documentation was performed by Ecobilan and is in compliance with ISO 14040 and 14044. The data set documentation is correct in view of the appropriateness of the information provided. It includes all relevant information in view of data quality and scope of application of the respective LCI result.

## Data sources
- 樊栓狮;梁华杰;郎雪梅;王燕鸿; 天然气水合物开采的全生命周期分析. 天然气化工(C1化学与化工) 73–78 (2010).
