# 土壤和地下水修复;原位;土壤生物通风;污染土壤得到修复

Dataset: ILCD process, Unit process, single operation
Geography: CA
Reference year: 2007
Classification: Other Services / Repair and maintenance
Generated by: 王宁, wang_ning@caep.org.cn
Owner: 天工LCI数据工作小组
Review: Dependent internal review by 天工LCI数据工作小组
Amounts: no units in this file; such an amount is in the reference unit of its flow, which a separate flow dataset defines
copyright: false
licenseType: Free of charge for all users and uses

## General comment
使用电力运行生物通风系统，污染土壤得到修复

## Geography
The contaminated area was located 600 m from a river shore in the northern part of the prov-ince of Quebec， Canada.

## Technology and included processes
使用电力驱动土壤通风系统，使受污染的土壤得到修复

## Technical purpose
该数据集描述了一个原位土壤生物通风过程，旨在修复污染土壤。该过程涉及使用电力驱动的土壤通风系统，在受污染的地点直接将土壤中的污染物通过增强微生物的降解作用进行处理。这种修复技术适用于土壤修复项目，尤其适合于邻近水体（如河流）的地区，因为它能最小化对环境的干扰。此次土壤生物通风是在加拿大魁北克省北部河岸600米处的一个受污染区域中使用的。

## Reference product
- Remediated soil: 1; estimated
  得到修复的土壤

## Inputs
- Electricity: 174000; estimated
  生物通风系统运行所消耗的电力
- contaminated soil: 1; estimated
  受污染的土壤

## Use advice
使用该数据集时，需要考虑土壤生物通风过程的具体情境，因为结果可能会根据不同的区域环境条件（如土壤成分和气候）而有所不同。该数据应当应用于具有相似地理和环境特点的情境中，以进行准确的影响评估。用户必须计算土壤通风系统的电力消耗，并且应确保正确的电力组合模型的建立。此外，还应考虑与操作直接相关的排放，并且如果与正在评估的修复活动相关，则应包括任何运输或间接排放。

## Review details
清单： 内部审查通过几个迭代步骤完成，涉及原始数据验证、原始数据记录、代表性、完整性、与 ISO 14040 和 14044 有关的建模的一致性。
