# 电力生产 ; 电力 ; 火电（76.1%）+水电（7.2%）+风电（12.4%）+太阳能发电（4.3%）

Dataset: ILCD process, Partly terminated system
Geography: JL-CN
Reference year: 2019
Classification: Energy carriers and technologies / Electricity
LCI method principle: Other
Generated by: 熊若熙, xiongrx0126@163.com
Owner: 天工LCI数据工作小组
Review: Dependent internal review by 天工LCI数据工作小组
Amounts: no units in this file; such an amount is in the reference unit of its flow, which a separate flow dataset defines
copyright: false
licenseType: Free of charge for all users and uses

## General comment
电力产生形式包括火力发电、水力发电、风力发电和太阳能发电

## Time period
根据2019年能源统计年鉴数据计算

## Technical purpose
该电力生产数据集包括热电（煤炭、天然气、石油）、水电、风电和太阳能发电设施的组合。各种发电类型的比例为：火力发电76.1%，水力发电7.2%，风力发电12.4%，太阳能发电4.3%。这些数据主要用于能源领域，为住宅、商业、工业和公共服务提供电力。该多样化的能源组合有助于了解在使用这些不同发电方法的地区的电力消费的环境影响。

## Reference product
- Electricity: 3.6; calculated

## Outputs
- carbon dioxide: 0.828; calculated
- sulfur dioxide: 0.000142; calculated
- Nitrogen oxides: 0.000223724; calculated
- Dust (unspecified, from stack): 2.7533e-5; calculated

## Data treatment and extrapolations
核算方法参考《企业温室气体排放核算方法与报告指南 发电设施》。不同形式发电量及燃料用量来自于《中国能源统计年鉴 2020》中的第三章（能源生产） 和第六章（地区能源平衡表）。用于计算二氧化碳排放因子的低位发热量、单位热值含碳量等燃料参数来自于《2019 年度中国区域电网二氧化碳基准线排放因子 OM 计算说明》、《企业温室气体排放核算方法与报告指南 发电设施》

## Use advice
在使用此数据集进行生命周期评估（LCA）时，重要的是要准确反映所示的区域能源组合。应基于这种电力生成来源的比例代表来应用排放因子。在确定LCA范围时，必须进行方法论注意，确保分析系统中的电力消费符合这种电力生成分布。任何能源组合或技术的更新或变化都应考虑，并相应调整数据。除非具体来源与配置文件的比例之一匹配，否则数据不应用于单一能源源的评估。建议用户咨询引用的《企业温室气体排放核算方法与报告指南发电设施》以计算温室气体排放。

## Review details
清单： 内部审查通过几个迭代步骤完成，涉及原始数据验证、原始数据记录、代表性、完整性、与 ISO 14040 和 14044 有关的建模的一致性。

## Data sources
- 熊若熙. 中国电力生产和消费二氧化碳与污染物排放因子核算. (清华大学, 2023).
