# 水泥生产|水泥, 硅酸盐水泥|燃烧后二氧化碳捕获

Dataset: ILCD process, Unit process, black box
Geography: CN
Reference year: 2008
Classification: Materials production / Other mineralic materials
Generated by: 杨思琪
Amounts: no units in this file; such an amount is in the reference unit of its flow, which a separate flow dataset defines
copyright: false

## General comment
采用后燃烧碳捕集和储存（post-combustion carbon capture and storage）技术的水泥生产。
对于燃烧后CO2捕集技术，排放到大气之前添加CO2分离过程。分离后的高纯度CO2经过压缩后可以进行运输和储存。化学吸收目前是从低压和低浓度烟气中捕集CO2的最常用方法，MonoEthanolAmine（MEA）是最常用的吸附剂。因此，MEA吸附方法被选为燃烧后CO2捕集技术的案例研究。MEA CO2捕集需要额外的能量，因为CO2被MEA吸收后需要大量的低压蒸汽对MEA进行再生。我们假设蒸汽将由现场的联合发电工厂供应，并且该工厂还可以满足水泥工厂的燃烧后捕集过程和其他生产过程的电力需求。窑气中的NOx和SO2会对MEA吸收过程产生负面影响，因此在将烟气传递到CO2捕集单元之前，它们必须降到所需水平。选择性催化还原（Selective catalytic reduction，SCR）单元被考虑用于消除NOx，烟气脱硫单元被考虑用于从烟气中去除SO2。

## Geography
http://documents.ieaghg.org/index.php/s/YKm6B7zikUpPgGA?path=%2F2008

## Reference product
- cement, portland cement: 1000
  水泥产品。数据来源于IEA温室气体研发计划（IEA GHG）的技术报告《Cement Industry中的CO2捕捉》（2008年）。在线可获取：http://documents.ieaghg.org/index.php/s/YKm6B7zikUpPgGA?path=%2F2008（访问日期：2017年9月5日）。

## Inputs
All rows: article inperiodical
- hard coal, run-of-mine: 291.6
  煤炭。数据来源于IEA温室气体研发计划（IEA GHG）的技术报告《Cement Industry中的CO2捕捉》（2008年）。在线可获取：http://documents.ieaghg.org/index.php/s/YKm6B7zikUpPgGA?path=%2F2008（访问日期：2017年9月5日）。
- petroleum coke: 31.9
  石油焦。数据来源于IEA温室气体研发计划（IEA GHG）的技术报告《Cement Industry中的CO2捕捉》（2008年）。在线可获取：http://documents.ieaghg.org/index.php/s/YKm6B7zikUpPgGA?path=%2F2008（访问日期：2017年9月5日）。
- electricity, medium voltage: -81.828
  电。数据来源于IEA温室气体研发计划（IEA GHG）的技术报告《Cement Industry中的CO2捕捉》（2008年）。在线可获取：http://documents.ieaghg.org/index.php/s/YKm6B7zikUpPgGA?path=%2F2008（访问日期：2017年9月5日）。
- limestone, crushed, for mill: 1258.51
  石灰石。数据来源于IEA温室气体研发计划（IEA GHG）的技术报告《Cement Industry中的CO2捕捉》（2008年）。在线可获取：http://documents.ieaghg.org/index.php/s/YKm6B7zikUpPgGA?path=%2F2008（访问日期：2017年9月5日）。
- ferric oxide: 7.47
  氧化铁。数据来源于IEA温室气体研发计划（IEA GHG）的技术报告《Cement Industry中的CO2捕捉》（2008年）。在线可获取：http://documents.ieaghg.org/index.php/s/YKm6B7zikUpPgGA?path=%2F2008（访问日期：2017年9月5日）。
- gypsum (desulphurized): 23.63
  石膏。数据来源于IEA温室气体研发计划（IEA GHG）的技术报告《Cement Industry中的CO2捕捉》（2008年）。在线可获取：http://documents.ieaghg.org/index.php/s/YKm6B7zikUpPgGA?path=%2F2008（访问日期：2017年9月5日）。
- ammonia, anhydrous, liquid: 1.85
  氨。数据来源于IEA温室气体研发计划（IEA GHG）的技术报告《Cement Industry中的CO2捕捉》（2008年）。在线可获取：http://documents.ieaghg.org/index.php/s/YKm6B7zikUpPgGA?path=%2F2008（访问日期：2017年9月5日）。
- monoethanolamine: 2.24
  单乙醇胺（MEA）。数据来源于IEA温室气体研发计划（IEA GHG）的技术报告《Cement Industry中的CO2捕捉》（2008年）。在线可获取：http://documents.ieaghg.org/index.php/s/YKm6B7zikUpPgGA?path=%2F2008（访问日期：2017年9月5日）。

## Outputs
- carbon dioxide: 1067.73; article inperiodical
  二氧化碳捕获。数据来源于IEA温室气体研发计划（IEA GHG）的技术报告《Cement Industry中的CO2捕捉》（2008年）。在线可获取：http://documents.ieaghg.org/index.php/s/YKm6B7zikUpPgGA?path=%2F2008（访问日期：2017年9月5日）。
- carbon dioxide: 188.42; article inperiodical
  二氧化碳排放。数据来源于IEA温室气体研发计划（IEA GHG）的技术报告《Cement Industry中的CO2捕捉》（2008年）。在线可获取：http://documents.ieaghg.org/index.php/s/YKm6B7zikUpPgGA?path=%2F2008（访问日期：2017年9月5日）。
- particles (PM2.5): 0.0109; software or database
  颗粒<2.5um。数据来自ecoinvent数据库，版本为Ecoinvent Database v3。在线可获取链接：http://www.ecoinvent.org/database/ecoinvent-33/ecoinvent-33.html（访问日期：2018年4月15日）。由于额外的烟气脱硫（FDG）和选择性催化还原（SCR）过程，后燃烧情况下颗粒物减少了50%。
- particles (> PM10): 0.0026; software or database
  颗粒>10um。数据来自ecoinvent数据库，版本为Ecoinvent Database v3。在线可获取链接：http://www.ecoinvent.org/database/ecoinvent-33/ecoinvent-33.html（访问日期：2018年4月15日）。由于额外的烟气脱硫（FDG）和选择性催化还原（SCR）过程，后燃烧情况下颗粒物减少了50%。
- particles (PM2.5 - PM10): 0.0036; software or database
  颗粒>2.5um，<10um。数据来自ecoinvent数据库，版本为Ecoinvent Database v3。在线可获取链接：http://www.ecoinvent.org/database/ecoinvent-33/ecoinvent-33.html（访问日期：2018年4月15日）。由于额外的烟气脱硫（FDG）和选择性催化还原（SCR）过程，后燃烧情况下颗粒物减少了50%。

## Cut-off and completeness
热电联产电厂（Combined heat and power）有少量剩余电力，这些电力被输送到电网。没有考虑剩余电力对环境影响的抵消。

## Sampling procedure
生产能力设定为每年生产1百万吨水泥，水泥产品中熟料的比例为91%。

## Data sources
- Jing An, Richard S. Middleton, & Yingnan Li. (2019). Environmental Performance Analysis of Cement Production with CO2 Capture and Storage Technology in a Life-Cycle Perspective. Sustainability 11, 2626.
