# 聚乙烯生产|聚乙烯 |低压气相流化床 550000t/a

Dataset: ILCD process, Unit process, black box
Geography: CN
Reference year: 2009
Classification: Materials production / Other mineralic materials
Functional unit: 1 ton of polythene
Generated by: 程晓宇, chengxiaoyu-0@qq.com
Review: Dependent internal review by 天工LCI数据工作小组
Amounts: no units in this file; such an amount is in the reference unit of its flow, which a separate flow dataset defines
copyright: false

## General comment
根据低压气相流化床聚合聚乙烯生产工艺，将聚乙烯生产过程的生命周期阶段分为以下几个子阶段，即：原油开采与运输、蒸馏精炼、乙烯制造、聚乙烯制造。

## Geography
我国东北某大型石化企业

## Time period
文献发表时间

## Reference product
- Polyethylene: 1000; measured

## Inputs
- energy (recovered): 32300; article inperiodical
- Gasoline (regular): 85.05; measured
- Diesel: 56.81; measured
- crude oil; 42.3 MJ/kg: 2326.28; measured
- Light Hydrocarbon: 459.17; measured
- naphtha: 1392.77; measured
- Complement component 3 (C3): 72.48; measured
- C-4: 442.87; measured
- Hydrocracking Tail Oil: 565.13; measured
- ethylene: 958.93; measured
- butene: 37.07; measured
- hexane: 20.07; measured
- Butane: 2.4; measured
- hydrogen: 0.11; measured

## Outputs
All rows: measured
- carbon dioxide (fossil): 91.07
- sulfur dioxide: 0.63
- Nitrogen oxides: 1.03
- carbon monoxide: 2.64
- hydrocarbons (unspecified): 7.1
- Total Suspended Particles: 4.96
- waste water - untreated: 7.22
- Waste (solid): 77.53

## Data treatment and extrapolations
必要的补充和校正

## Review details
清单： 内部审查通过几个迭代步骤完成，涉及原始数据验证、原始数据记录、代表性、完整性、与 ISO 14040 和 14044 有关的建模的一致性。

## Data sources
- 李蔓, 王震 & 孙德智. 聚乙烯生产生命周期评价的研究. 环境科学与技术 191–195 (2009).
