# 土壤修复;异位修复;热脱附修复;工程实施;异位热脱附主处理

Dataset: ILCD process, Unit process, single operation
Geography: SH-CN
Classification: Other Services / Repair and maintenance
Generated by: 王枫, wangfeng@caep.org.cn
Owner: 天工LCI数据工作小组
Review: Dependent internal review by 天工LCI数据工作小组
Amounts: no units in this file; such an amount is in the reference unit of its flow, which a separate flow dataset defines
copyright: false
licenseType: Free of charge for all users and uses

## General comment
异位热脱附修复1立方米污染土，通过上料机和传送装置，将污染土壤输送到回转窑，通入天然气，将污染土壤均 匀加热到设定的温度，并按照设定速率向窑尾输送至出料仓，在回转窑中使土壤中的污染物充分 气化挥发

## Geography
我国华东区域5 个污染土壤异位热脱附修复工程案例

## Technology and included processes
通过上料机和传送装置，将污染土壤输送到回转窑，通入天然气，将污染土壤均匀加热到设定的温度，并按照设定速率向窑尾输送至出料仓，在回转窑中使土壤中的污染物充分气化挥发

## Technical purpose
所描述的过程涉及1立方米受污染土壤的异位热脱附修复。通过上料机和传送系统，将受污染土壤输送至回转窑中，在窑内引入天然气，将土壤均匀加热至设定温度。土壤随后按预定速率向窑尾移动至出料仓。在回转窑中，土壤中的污染物被挥发和气化。这个过程在中国华东地区5个污染土壤异位热脱附修复项目案例中得到了执行。数据集适用于专注于土壤修复的环境工程公司以及研究土壤脱附方法效能的研究人员。

## Reference product
- Soil treated with ex-situ thermal desorption primary treatment: 1; measured

## Inputs
- Diesel: 0.0002; measured
- Steel sections: 0.08; measured
- Natural gas, at consumer EU-27: 35; measured
- Electricity: 5.4; measured

## Use advice
使用此数据集时，请确保使用案例的环境条件与华东地区案例研究所描述的过程的地域特定性紧密相关。用户应考虑土壤组成、污染物类型和可能影响热脱附过程适用性和效果的当地法规的变化。此外，考虑使用天然气作为加热过程中的效率、能源需求和可能排放。在方法论上，应考虑到生命周期评估的边界条件，特别是范围是否包括了污染物气化和挥发的后果。

## Review details
清单： 内部审查通过几个迭代步骤完成，涉及原始数据验证、原始数据记录、代表性、完整性、与 ISO 14040 和 14044 有关的建模的一致性。

## Data sources
- 刘爽,陈盼,宋慧敏等.我国华东地区污染土壤异位热脱附修复碳排放及减排策略[J].环境工程学报,2022,16(08):2663-2671.
