# Anaerobic/Anoxic/Oxic (A2O) process | Wastewater | wastewater treatment

Dataset: ILCD process, Unit process, single operation
Geography: SZ-JS-CN
Classification: Materials production / Other mineralic materials
Generated by: 于晨阳, yuchenyang0506@foxmail.com
Review: Dependent internal review by 天工LCI数据工作小组
Amounts: no units in this file; such an amount is in the reference unit of its flow, which a separate flow dataset defines

## Reference product
- Wastewater: 10000; input; measured
  The treatment of 10,000 m3 of wastewater per day over 50 years

## Inputs
All rows: measured
- Wastewater: 1.83e9
- chemical oxygen demand: 3.6e8
- chemical oxygen demand: 2.01e8
  biochemical oxygen demand
- Suspended solids, unspecified: 1.33e8
- ammonia: 4.13e7
  Ammonia nitrogen
- nitrogen, total (excluding N2): 6.39e7
- phosphorus, total: 7.3e6
- Electricity: 1.5192e9
  50 years
- polyaluminium chloride: 4.56e7
- Polyacrylamide: 474000
- Cement: 1.5e7
- Steel sections: 250000
- Steel sections: 3.1e6
  pipe
- Wood: 120000

## Outputs
All rows: measured
- chemical oxygen demand: 1.01e7
  biochemical oxygen demand
- chemical oxygen demand: 2.06e8
- Suspended solids, unspecified: 1.54e7
- nitrogen, total (excluding N2): 2.19e7
- phosphorus, total: 2.01e6, 3.53e6 (2 entries)
- ammonia: 1.64e6
  Ammonia nitrogen
- Sludge: 4.75e8
- nitrogen: 1.28e6
- potassium: 3.46e6
- cadmium: 199
- chromium: 5780
- copper: 17900
- lead: 1110
- nickel: 2570
- zinc: 61100

## Review details
清单： 内部审查通过几个迭代步骤完成，涉及原始数据验证、原始数据记录、代表性、完整性、与 ISO 14040 和 14044 有关的建模的一致性。

## Data sources
- Life Cycle Assessment of a municipal wastewater treatment plant: a case study in Suzhou, China
