# 华东水稻-冬小麦生产 | 农作生产(水稻)

Dataset: ILCD process, Unit process, single operation
Geography: NJ-JS-CN
Reference year: 2015
Valid until: 2015
Classification: Materials production / Other mineralic materials
Functional unit: 1 ton of rice and 1 ton of winter wheat
Generated by: 张浩然, hrzhang@whu.edu.cn
Review: Dependent internal review by Tiangong LCI Data Working Group
Amounts: no units in this file; such an amount is in the reference unit of its flow, which a separate flow dataset defines
copyright: false

## Reference product
- rice: 9360; measured

## Inputs
All rows: measured
- Diesel: 27.8
  水稻
- heavy fuel oil: 33.1
  水稻
- nitrogen: 300
  水稻
- phosphorus: 120
  水稻
- potassium chloride: 120
  水稻
- Bactericide: 2
  水稻
- Rice Seeds: 3.9
  水稻
- Insecticide: 0.1
  水稻
- Electricity: 263.16
  水稻

## Deviations from the LCI method approaches
农产品生命周期的起始边界为与稻麦生命周期相关的能源原料开采, 终止边界为经过农作物种植栽培至收获输出农作物产品和排放废气

## Data selection and combination
江苏省南京市江宁区82户农户近2年的投入产出抽样调查结果。化肥主要包括复合肥和尿素, 杀虫剂为氧化乐果和辛硫磷, 除草剂为丁草胺和华星草克等。田间秸秆全部采用机械粉碎还田

## Data treatment and extrapolations
对产品系统整个生命周期所有输入与输出的过程及进行运算的过程, 一般包括分类和特征化、标准化和加权评估

## Sampling procedure
江苏省南京市江宁区82户农户近2年的投入产出抽样调查结果

## Review details
Inventory: The internal review was done by several iteration steps concerning raw data validation, raw data documentation, representativity, completeness and consistency of modelling with regard to ISO 14040 and 14044.; Documentation: The review of the documentation was performed by Ecobilan and is in compliance with ISO 14040 and 14044. The data set documentation is correct in view of the appropriateness of the information provided. It includes all relevant information in view of data quality and scope of application of the respective LCI result.

## Data sources
- 胡乃娟,陈倩,朱利群.长江中下游稻-麦轮作系统生命周期环境影响评价——以江苏南京为例[J].长江流域资源与环境,2019,28(05):1111-1120.
