# 水泥生产|水泥, 复合硅酸盐水泥|新型干法, 水泥窑协同处置工业固体废弃物|混合固废

Dataset: ILCD process, Unit process, black box
Geography: CN
Reference year: 2012
Classification: Materials production / Other mineralic materials
Generated by: 杨思琪
Amounts: no units in this file; such an amount is in the reference unit of its flow, which a separate flow dataset defines
copyright: false

## General comment
案例企业配备有4500t/d新型干法水泥熟料生产线。案例为有水泥窑协同处置工业固体废弃物水泥生产系统。

## Geography
东北某水泥厂

## Model description
系统边界为水泥厂水泥生产系统。

## Reference product
- cement, portland-composite cement: 1000
  水泥产品

## Inputs
All rows: measured
- limestone, crushed, for mill: 1128.05
  石灰石
- shale: 1.23171
  页岩
- silica stone: 17.8049
  硅石
- iron, powder: 27.3171
  铁粉
- gypsum (desulphurized): 52.2561
  石膏
- ash: 124.39
  粉煤灰
- blast furnace slag: 204.268
  矿渣
- waste clay: 1.04878
  废白土
- Coating slag: 0.160366
  涂料渣
- refinery sludge: 5.26829
  废油泥
- Catalyst waste: 2.11585
  废催化剂
- soil, contaminated: 5.26829
  污染土壤
- digester sludge: 15.7927
  消化污泥
- hard coal, run-of-mine: 98.4146
  煤炭。年耗煤用能=（1.614E+8）kg×（2.149E+7）J/kg（平均地位热值）（3.7E+15）J。
- diesel: 4.18659
  柴油。柴油=（6.866E+6）kg×（46.04）MJ/kg（燃烧值）=（3.16E+8）MJ。
- electricity, medium voltage: 338.488
  总耗电量。年耗电能=（1.542E+8）kWh×（3.60E+6）J/kWh=（5.55E+14）J。
- tap water: 251.22
  原文是总水量，即自来水。

## Outputs
- carbon dioxide: 884.146; measured
  CO2
- sulfur dioxide: 0.328659; measured
  SO2
- Nitrogen oxides: 1.11585; measured
  NOx
- particles (> PM10): 0.853659; measured
  粉尘，未标明粒径，按PM>10处理。

## Data sources
- 邵帅. (2016). 基于Emergy和Em-LCA的水泥企业可持续发展水平评价 [硕士, 大连理工大学].
