# Granite Slabs production | 1.8*0.6*0.2 m2, CN

Dataset: ILCD process
Classification: Materials production / Other mineralic materials
Generated by: Jiaqi Lu, wilsherelu@foxmail.com
Amounts: no units in this file; such an amount is in the reference unit of its flow, which a separate flow dataset defines

## Reference product
- Granite slab product: 1
  花岗岩板材产品

## Inputs
- granite: 3543.75
  花岗岩毛坯
- water: 4984.46
- electricity mix: 1.5984e6

## Outputs
- Nitrogenous Matter (unspecified, as N): 2.15
  氨氮[排放到水体（未指定类型）
- chemical oxygen demand: 20
  化学需氧量[排放到水体（未指定类型）]
- Particles (PM0.2 - PM2.5): 940
  总颗粒物[排放到大气（未指定类型）]
- Sludge (from processing): 576880
