# 开采阶段|钻井液|低渗气田|废弃钻井液钻井

Dataset: ILCD process, Unit process, single operation
Geography: EEDS-NMG-CN
Reference year: 2014
Classification: Materials production / Other mineralic materials
LCI method principle: Attributional
LCI method approaches: Consequential
Generated by: 李梓萌, 1577978537@qq.com
Review: Dependent internal review by Tiangong LCI Data Working Group
Amounts: no units in this file; such an amount is in the reference unit of its flow, which a separate flow dataset defines
copyright: false

## General comment
全井钻进过程中无废弃固相和液相落地。钻井液不落地技术减少了挖泥浆池的工作量,实现了钻井施工过程中废弃钻井液的零排放,减少了其对环境造成的损害,完钻后地面完全恢复钻前状态;废弃钻井液的重复利用,还可大幅减少钻井成本投入

## Geography
大牛地气田位于陕蒙交界地区，属于鄂尔多斯盆地，是 中国石油化工股份有限公司华北分公司 开发地区之一。大牛地气田“十二五”期间计划部署水平井723口，新建天然气产能66.5×108m3，天然气产量达214×108m3。2012年，按会战要求大牛地气田实现了年产天然气30×108m3，完钻水平井119口，平均完钻井深3 992.21 m，平均水平段长1 131.13 m，是国内第1个实现水平井规模开发的低渗气田。

## Inputs
- LPG - liquefied petroleum gas: 1000; uniform; article inperiodical
  大牛地气田水平井钻井液化学处理剂的平均用量为200 t/井，配制钻井液为1 000 m3/井.该井完钻后集中处理废弃钻井液超过800 m3，运至下一口井重复利用。

## Review details
Inventory: The internal review was done by several iteration steps concerning raw data validation, raw data documentation, representativity, completeness and consistency of modelling with regard to ISO 14040 and 14044.; Documentation: The review of the documentation was performed by Ecobilan and is in compliance with ISO 14040 and 14044. The data set documentation is correct in view of the appropriateness of the information provided. It includes all relevant information in view of data quality and scope of application of the respective LCI result.

## Data sources
- 钻井液不落地技术在大牛地气田的应用 - 中国知网.
