# 土壤和地下水修复;原位;地下水抽出处理;得到修复的地下水

Dataset: ILCD process, Unit process, single operation
Geography: DK
Reference year: 2021
Classification: Other Services / Engineering and consulting
Generated by: 王宁, wang_ning@caep.org.cn
Owner: 天工LCI数据工作小组
Review: Dependent internal review by 天工LCI数据工作小组
Amounts: no units in this file; such an amount is in the reference unit of its flow, which a separate flow dataset defines
copyright: false
licenseType: Free of charge for all users and uses

## General comment
地下水抽出处理系统的运行，使地下水得到修复

## Technology and included processes
使用电力运行地下水抽出处理系统，使地下水得到修复

## Technical purpose
此数据集描述了原位地下水抽出处理的修复过程。它在环境工程中应用，用于抽取受污染的地下水，通过使用电力系统在地面以上进行处理，然后输出经过修复的地下水。该过程通常用于因工业活动、化学泄漏或其他污染物而地下水受到污染且需要恢复以满足环境标准的场地。

## Reference product
- Remediated groundwater: 1; estimated

## Inputs
- Electricity: 35000; estimated
- contaminated groundwater: 1; estimated

## Use advice
在使用此数据集进行生命周期评估时，应特别关注过程的边界条件，例如用于为处理系统供电的电力组合，因为这可能会显著影响环境概况。此外，还应考虑污染物去除效率和提取污染物的管理。如果与其他修复方法进行比较，确保应用一致的系统边界。数据集未计入过程中所使用设备生产的排放和影响；因此，如果相关，应在生命周期评估中包括这一点。

## Review details
清单： 内部审查通过几个迭代步骤完成，涉及原始数据验证、原始数据记录、代表性、完整性、与 ISO 14040 和 14044 有关的建模的一致性。

## Data sources
- Sustainable remediation assessment of a chlorinated ethene plume: method evelopment, application, and assessment
