# 电力生产 ; 电力 ; 火电（81.0%）+水电（1.3%）+风电（10.9%）+太阳能发电（6.7%）

Dataset: ILCD process, Partly terminated system
Geography: NX-CN
Reference year: 2019
Classification: Energy carriers and technologies / Electricity
LCI method principle: Other
Generated by: 熊若熙, xiongrx0126@163.com
Owner: 天工LCI数据工作小组
Review: Dependent internal review by 天工LCI数据工作小组
Amounts: no units in this file; such an amount is in the reference unit of its flow, which a separate flow dataset defines
copyright: false
licenseType: Free of charge for all users and uses

## General comment
电力产生形式包括火力发电、水力发电、风力发电和太阳能发电

## Time period
根据2019年能源统计年鉴数据计算

## Technical purpose
该数据集代表了一个特定区域内的电力生成组合，主要由火力发电（81.0%）组成，并有水力发电（1.3%）、风力发电（10.9%）和太阳能发电（6.7%）的贡献。这种电力组合产生的电力可以用于需要电能的住宅、商业、工业和运输领域。具体来说，这种电力输出可以为机械、照明、电子产品、供暖系统以及其他需要电力的应用提供动力，不论规模大小。

## Reference product
- Electricity: 3.6; calculated

## Outputs
- carbon dioxide: 0.777; calculated
- sulfur dioxide: 0.000134; calculated
- Nitrogen oxides: 0.000212225; calculated
- Dust (unspecified, from stack): 2.5817e-5; calculated

## Data treatment and extrapolations
核算方法参考《企业温室气体排放核算方法与报告指南 发电设施》。不同形式发电量及燃料用量来自于《中国能源统计年鉴 2020》中的第三章（能源生产） 和第六章（地区能源平衡表）。用于计算二氧化碳排放因子的低位发热量、单位热值含碳量等燃料参数来自于《2019 年度中国区域电网二氧化碳基准线排放因子 OM 计算说明》、《企业温室气体排放核算方法与报告指南 发电设施》

## Use advice
数据使用者在将此数据集应用于环境影响评估或碳足迹计算时，应考虑不同电力来源的具体比例。必须考虑区域电力生成组合，因为它影响所消耗电力的总排放因子。碳排放因子已根据《企业温室气体排放核算方法与报告指南 发电设施》建议的方法计算，参考了所提供的低位发热值、单位能量含碳量等燃料参数。用户必须确保此数据与其他生命周期评估数据集的方法论一致，并确认区域能源组合反映了他们研究范围。

## Review details
清单： 内部审查通过几个迭代步骤完成，涉及原始数据验证、原始数据记录、代表性、完整性、与 ISO 14040 和 14044 有关的建模的一致性。

## Data sources
- 熊若熙. 中国电力生产和消费二氧化碳与污染物排放因子核算. (清华大学, 2023).
