# 水泥生产|水泥, 普通硅酸盐水泥, 42.5MPa|新型干法|混合固废

Dataset: ILCD process, Unit process, black box
Geography: CN
Reference year: 2004
Classification: Materials production / Other mineralic materials
Generated by: 杨思琪
Amounts: no units in this file; such an amount is in the reference unit of its flow, which a separate flow dataset defines
copyright: false

## General comment
矿渣和粉煤灰替代粘土进行水泥生产。原料组分包括石灰石、石膏、粘土和铁粉等。在干法生产工艺中，除这些组分外，还包括掺入粉煤灰和矿渣等工业废渣。能源消耗包括各生产工序的电耗和煤耗，污染物则包括颗粒物、SO2、NOx和CO2等。

## Model description
研究以1kg42.5等级硅酸盐水泥作为评价的功能单位。评价范围界定为水泥产品的厂内生产过程及其周边环境。其中，厂内生产过程是指原料依次经过预处理、生料粉磨、煅烧、熟料磨和水泥均化等工序最终成为水泥产品的生产全过程。水泥生产过程的周边环境是指外部资源和能源的投人和污染物的排放等。

## Reference product
- cement, ordinary portland cement, 42.5MPa: 1000
  1kg42.5等级硅酸盐水泥

## Inputs
All rows: measured
- limestone, crushed, for mill: 1073.7
  石灰石
- gypsum (desulphurized): 51.1
  石膏
- iron, powder: 28.5
  铁粉
- ash: 98
  粉煤灰
- blast furnace slag: 137.6
  矿渣
- hard coal: 100.957
  标准煤。原始数据为0.0938kg标准煤，这里换算为硬煤，换算公式为1kg硬煤=0.929kg标准煤。
- electricity, medium voltage: 347.76
  电力

## Outputs
- particles (> PM10): 0.255; measured
  颗粒物，未标明粒径，按PM>10处理。
- sulfur dioxide: 0.3501; measured
  SO2
- Nitrogen oxides: 1.419; measured
  NOx
- carbon dioxide: 807.3; measured
  CO2

## Data sources
- 朱天乐, 何炜, 曾小岚, 黄新, & 马保国. (2006). 中国水泥生产环境负荷研究. 环境科学, 10, 2135–2138.
