# 湿法制砂;粗、中砂洗砂;水洗

Dataset: ILCD process, Unit process, single operation
Geography: CS-HUN-CN
Reference year: 2020
Classification: Materials production / Non-energetic raw materials
Generated by: 崔航, Cuihang0716@163.com
Owner: 天工LCI数据工作小组
Review: Dependent internal review by 天工LCI数据工作小组
Amounts: no units in this file; such an amount is in the reference unit of its flow, which a separate flow dataset defines
copyright: false
licenseType: Free of charge for all users and uses

## General comment
随着制砂废水漏出的粒径小于4mm的砂经洗砂机和细砂回收机制得2~3cm的中砂后，由脱水筛进行水砂分离后，通过输送带运至成品堆场

## Technical purpose
该工业过程用于生产中砂（2-3厘米），使用洗砂机和细砂回收机从湿砂中生产。生产过程之后，利用脱水筛分离水和砂，然后通过输送带将产品运输到成品堆场。此过程适用于建筑和建材行业，需要中砂用于混凝土生产、沥青混合料以及其他与建设相关的应用。

## Reference product
- sand: 133333; measured
  沙子量

## Inputs
All rows: measured
- Water (fresh water): 85
- electricity mix: 216
  洗砂机用电量
- electricity mix: 158.4
  脱水筛用电量
- electricity mix: 108
  洗石机用电量
- sand: 133333
  沙子量

## Outputs
- water: 65.49; measured

## Use advice
在使用此数据集进行生命周期评估（LCA）时，用户应确保考虑砂石生产过程发生的具体条件。考虑过程中的能源和水消耗以及与之相关的废物产生和废水处理是很重要的。此外，如果适用砂的回收，应在材料生命周期内予以考虑。用户还应验证此过程与应用区域环境的技术兼容性，以确保在环境影响评估中的准确性。

## Review details
清单： 内部审查通过几个迭代步骤完成，涉及原始数据验证、原始数据记录、代表性、完整性、与 ISO 14040 和 14044 有关的建模的一致性。

## Data sources
- 年产 60 万吨机制砂建设项目环评报告
