# 砖生产|非烧结砖|原材料加工（破碎、混合）

Dataset: ILCD process, Unit process, single operation
Geography: MY-SC-CN
Reference year: 2020
Classification: Materials production / Other mineralic materials
Functional unit: 1t WDC were chosen as the functional unit
Generated by: 王湘锦, r99rt4@163.com
Review: Dependent internal review by Tiangong LCI Data Working Group
Amounts: no units in this file; such an amount is in the reference unit of its flow, which a separate flow dataset defines
copyright: false

## Technology and included processes
包括在 WDC 粉碎预处理后加入适量骨料（即人造砂），制备免烧砖。整个生产过程包括搅拌（时间为 2 分钟）、压制（压力为 3 兆帕；尺寸为 240 × 115 × 53 毫米）和维护步骤

## Reference product
- clay: 1000; input; measured

## Inputs
All rows: measured
- sand: 2310
- Fly ash: 12
- portland cement: 530
- Water (fresh water): 300
- electricity mix: 342

## Outputs
- brickbat aggregate: 4152; measured
  砖块粗原料
- particles (> PM10): 0.12357; measured

## Deviations from the LCI method approaches
作为生命周期评估的一部分，亿科环境技术有限公司开发的 eFootprint 在线分析平台用于对整个生命周期过程进行定量分析。

## Data selection and combination
有关原材料、能源投入和污染物排放数据的信息来自绵阳建材制造有限公司。

## Sampling procedure
此外，选择 1t WDC 作为功能单位，并按照功能单位计算所有原材料、辅助材料、能耗、运输和直接排放的输入参数。

## Review details
Inventory: The internal review was done by several iteration steps concerning raw data validation, raw data documentation, representativity, completeness and consistency of modelling with regard to ISO 14040 and 14044.; Documentation: The review of the documentation was performed by Ecobilan and is in compliance with ISO 14040 and 14044. The data set documentation is correct in view of the appropriateness of the information provided. It includes all relevant information in view of data quality and scope of application of the respective LCI result.

## Data sources
- Liu, W. et al. Comparative life cycle assessment of cement, sintered bricks and non-sintered bricks manufacturing using water-based drilling cuttings from shale gas production in the Sichuan Basin, China. J. Environ. Manage. 314, 115135 (2022).
