# 铜基混合废料回收|黑铜|冶炼工艺|铜基混合废料

Dataset: ILCD process, Unit process, single operation
Geography: JX-CN
Reference year: 2020
Classification: Materials production / Other mineralic materials
Functional unit: We consider the functional unit of the recycling of copper-based mixed waste to be 1000 kg electrolytic copper.
LCI method principle: Attributional
LCI method approaches: Allocation - market value
Generated by: 王鹏, 2867919560@qq.com
Review: Dependent internal review by 天工LCI数据工作小组
Amounts: no units in this file; such an amount is in the reference unit of its flow, which a separate flow dataset defines
copyright: false

## Geography
典型案例是位于中国江西省的一家金属回收企业，

## Technology and included processes
以铜基混合废料为主要原料，辅以煤炭、电力、高品位废铜、石英砂、石灰石、石灰等辅助材料以及其他生产工艺，产生中间产品和废渣，如二次渣、海绵铜、阳极铜泥渣等。

## Reference product
- Black copper（90% Cu）: 1350; measured
  Black copper需要补充

## Inputs
All rows: measured
- Anode sludge: 3.4
  Copper byproduct/Self-produced需要补充
- copper: 464.4
  Copper slag concentrate/Self-produced
- particles (PM2.5 - PM10): 1.4
  Dust需要补充
- Hard coal, at consumer EU-27: 710.1
  Hard coal
- Quicklime: 162
  Quicklime需要补充
- Limestone: 162
  limestone
- oxygen: 137.5
  Oxygen (gaseous)
- quartz sand: 135
  Quartz sand
- Copper-based mixed waste: 3240
  Copper-based mixed waste需要补充
- copper scrap: 8.1
  Copper scrap需要补充
- Scrap: 483.9
  Scrap需要补充
- Slag and ash: 125763
  Slag and ash需要补充
- transport in t*km,transport in t*km: 0.2751
  Transport
- Electricity: 699.84

## Outputs
- mineral waste (ash): 94.5; measured
  Ash 1|To zinc recovery
- Copper-containing slag: 2932.7; measured
  Copper-containing slag需要补充
- mineral waste (ash): 0.4; measured
  Ash 2|To smelting
- carbon dioxide: 977.4; measured
  Carbon dioxide|Emission into the air

## Deviations from the LCI method approaches
使用LCA-ReCiPe 2016（Heijungs et al., 2017）表征和归一化方法（中点和端点方法），将生命周期清单转换为多个领域的影响分数。

## Data selection and combination
前台数据和后台数据。

## Data treatment and extrapolations
采用GaBi 9.0软件计算各种铜基混合废物回收工艺单位质量的库存、资源消耗和废物排放量。

## Review details
清单： 内部审查通过几个迭代步骤完成，涉及原始数据验证、原始数据记录、代表性、完整性、与 ISO 14040 和 14044 有关的建模的一致性。

## Data sources
- Zhang, W. et al. Analyzing the environmental impact of copper-based mixed waste recycling-a LCA case study in China. Journal of Cleaner Production 284, 125256 (2021).
