# 土壤修复;异位修复;热脱附修复;工程实施;土壤开挖

Dataset: ILCD process, Unit process, single operation
Geography: SH-CN
Classification: Other Services / Repair and maintenance
Generated by: 王枫, wangfeng@caep.org.cn
Owner: 天工LCI数据工作小组
Review: Dependent internal review by 天工LCI数据工作小组
Amounts: no units in this file; such an amount is in the reference unit of its flow, which a separate flow dataset defines
copyright: false
licenseType: Free of charge for all users and uses

## General comment
异位热脱附修复1立方米污染土，使用挖机将污染土壤从污染区域挖出，以便运送至处理大棚

## Geography
我国华东区域5 个污染土壤异位热脱附修复工程案例

## Technology and included processes
使用挖机将污染土壤从污染区域挖出，以便运送至处理大棚

## Technical purpose
异位热脱附修复工艺专为土壤修复设计，旨在每次操作处理1立方米受污染土壤。使用挖掘机将污染土壤从污染现场挖出，并将其运输到处理棚单元过程。该方法由中国华东区域的5个污染土壤异位热脱附修复工程案例所示。

## Reference product
- Excavated soil: 1; measured

## Inputs
- Oils, unspecified: 0.00011; measured

## Use advice
使用该数据的用户应注意，所描述的工艺专门用于异位热脱附土壤修复，可能不适用于其他类型的修复技术。确保数据集反映了华东区域独特的技术适用性和处理能力至关重要。任何将此数据外推至其他地区或不同土壤条件的行为都必须谨慎进行，考虑到当地环境合规法规和土壤特性。

## Review details
清单： 内部审查通过几个迭代步骤完成，涉及原始数据验证、原始数据记录、代表性、完整性、与 ISO 14040 和 14044 有关的建模的一致性。

## Data sources
- 刘爽,陈盼,宋慧敏等.我国华东地区污染土壤异位热脱附修复碳排放及减排策略[J].环境工程学报,2022,16(08):2663-2671.
