# 再生铜生产|铜（1吨，99.99%）|双面吹浴冶炼技术|铜精矿

Dataset: ILCD process, Unit process, single operation
Geography: CN
Reference year: 2018
Classification: Materials production / Other mineralic materials
Functional unit: the production of 1 ton of copper (i.e., refined or reclaimed copper) was selected as the functional unit.
LCI method principle: Attributional
LCI method approaches: Allocation - mass
Generated by: 王鹏, 2867919560@qq.com
Review: Dependent internal review by Tiangong LCI Data Working Group
Amounts: no units in this file; such an amount is in the reference unit of its flow, which a separate flow dataset defines
copyright: false

## Geography
中国有两个精炼铜和再生铜生产基地。

## Reference product
- copper: 1000; software or database

## Inputs
- Land Occupation: 0.92; measured
  Land occupation
- water: 5070; measured
  Water
- Electricity: 1031.83; software or database
- Oils (unspecified): 76.41; software or database
  Oil
- hard coal: 201.15; software or database
  Coal
- Chemicals inorganic: 0.0889; software or database
  Chemicals inorganic需要补充
- Chemicals organic: 18.29; software or database
  Chemicals organic需要补充
- Natural gas, at consumer EU-27: 0; software or database
  Natural gas
- Sulfuric acid(98%): 7.3; software or database
  Sulfuric acid需要补充resourse

## Outputs
- carbon dioxide: 331.49; software or database
  Carbon dioxide
- particles (PM2.5 - PM10): 0.03932; software or database
- sulfur oxides: 0.40038; software or database
  Sulfur dioxide
- nitrous oxide: 0.94684; software or database
- arsenic: 0.00404, 6.51e-6 (2 entries); software or database
  Arsenic
- lead: 0.00022; software or database
  Lead
- copper: 0.00039, 0.00019 (2 entries); software or database
  Copper
- nickel: 8.48e-6, 0.00024 (2 entries); software or database
  Nickel
- sulphuric acid: 0.00021; software or database
  Sulfuric acid
- Phosphorus: 1.54e-5; software or database
- lead-210: 1.65e-5; software or database
  Lead
- ammonium: 0.0002; software or database
  Ammonia
- Hazardous waste (deposited, hibernating in ground, non elementary flow): 4.66; measured
  Hazardous waste

## Deviations from the LCI method approaches
采用 ReCiPe 方法在中点水平进行生命周期影响评估 (LCIA)，该方法是 LCA 分析中最常用的指标方法之一（Goedkoop 等人，2009 年；Schryveretal.2009）。

## Data selection and combination
本研究中提供的生命周期清单数据是从中国的两个精炼和再生铜生产基地收集的。

## Data treatment and extrapolations
LCA 使用 SimaPro 8.2 软件进行。

## Review details
Inventory: The internal review was done by several iteration steps concerning raw data validation, raw data documentation, representativity, completeness and consistency of modelling with regard to ISO 14040 and 14044.; Documentation: The review of the documentation was performed by Ecobilan and is in compliance with ISO 14040 and 14044. The data set documentation is correct in view of the appropriateness of the information provided. It includes all relevant information in view of data quality and scope of application of the respective LCI result.

## Data sources
- Hong, J. et al. Life cycle assessment of copper production: a case study in China. Int J Life Cycle Assess 23, 1814–1824 (2018).
