# 农田修复;原位修复;钝化修复;工程实施;药剂施加、混合搅拌

Dataset: ILCD process, Unit process, single operation
Geography: NJ-YN-CN
Classification: Other Services / Repair and maintenance
Generated by: 肖萌, xiaomeng@mail
Owner: 天工LCI数据工作小组
Review: Dependent internal review by 天工LCI数据工作小组
Amounts: no units in this file; such an amount is in the reference unit of its flow, which a separate flow dataset defines
licenseType: Free of charge for all users and uses

## General comment
稳定化修复实施阶段，对污染土进行药剂施撒（为人力运输与撒施），并使用轮式旋耕机TH554对污染场地进行药剂施加。使用的稳定化药剂为海泡石和生石灰。

## Geography
云南省怒江州受铅锌矿污染某耕地土壤 污染修复工程

## Technical purpose
此工业流程用于修复重金属污染的农田，以降低土壤中镉（Cd）和铅（Pb）的有效态分数超过70％，确保作物中Cd和Pb的浓度水平达到可接受的标准，从而使土地再次适合农业使用。该过程包括向污染场地施加稳定剂，具体为海泡石和生石灰。稳定剂手工撒布后，使用轮式旋耕机（TH554）混合到土壤中。此原位固化/稳定化技术专为云南省怒江州受铅锌矿污染的面积为16公顷的区域设计。

## Reference product
- contaminated soil: 9.06e6; input; measured
  受污染的农田土壤

## Inputs
- Diesel: 67354.2; measured
- natural pumice: 172000; measured
  海泡石（pumice）
- quicklime: 68000; measured
  生石灰（quicklime）

## Outputs
- Soil passivation by sepiolite and quicklime: 9.06e6; measured
  使用海泡石、生石灰钝化后的农田土壤

## Use advice
在使用此数据集进行生命周期评估时，确保您的研究范围包括由于历史采矿活动导致重金属污染的农业土地的具体条件。该数据集适用于需要原位土壤稳定化的农业修复项目，尤其是对于具有与云南省受影响区域相似重金属污染的土地。必须将药剂的手动施用和随后的机械混合作为过程的一部分进行账目处理。稳定化的效果和环境影响很大程度上取决于药剂施用率的正确性和土壤混合的彻底性。为了获得完整的准确性，用户还必须考虑土壤类型、气候条件以及修复技术的长期稳定性。

## Review details
清单： 内部审查通过几个迭代步骤完成，涉及原始数据验证、原始数据记录、代表性、完整性、与 ISO 14040 和 14044 有关的建模的一致性。

## Data sources
- 肖萌 et al. 农田污染钝化修复环境影响定量评估方法与案例分析. 中国环境科学 43, 3571–3581 (2023).
