# 土壤和地下水修复;原位;地下水抽出处理;建设;处理设施

Dataset: ILCD process, Unit process, single operation
Geography: JS-CN
Reference year: 2022
Classification: Other Services / Repair and maintenance
Generated by: 王宁, wang_ning@caep.org.cn
Owner: 天工LCI数据工作小组
Review: Dependent internal review by 天工LCI数据工作小组
Amounts: no units in this file; such an amount is in the reference unit of its flow, which a separate flow dataset defines
copyright: false
licenseType: Free of charge for all users and uses

## General comment
使用 PVC 管、混凝土和钢材等建设水处理设施

## Geography
a closed pesticide manufacturing plant located in Jiangsu Province, China.

## Technical purpose
该数据集代表了土壤和地下水修复用水处理设施的建设阶段。这些设施专门用于江苏省一个已关闭的农药制造厂的场外地下水抽出处理方法。建设使用了PVC管、混凝土和钢材等材料。

## Reference product
- Treatment facilities: 1; measured

## Inputs
- Polyvinyl chloride: 400; measured
- Concrete: 60500; measured
- Steel sections: 2250; measured

## Use advice
在进行生命周期评估（LCA）时，确保通过包括与操作规模相关的所有相应输入和输出，准确表示建设阶段。考虑数据集的地理特殊性和技术相关性，特别是建设此类设施的当地环境影响。这些数据应用于化工行业中类似的修复项目和情境的LCA研究，特别是那些涉及场外地下水处理的研究。该数据集不适用于不相似的修复方法或不同工业部门，除非进行适当的修改。

## Review details
清单： 内部审查通过几个迭代步骤完成，涉及原始数据验证、原始数据记录、代表性、完整性、与 ISO 14040 和 14044 有关的建模的一致性。

## Data sources
- Ding, D. et al. Assessing the environmental impacts and costs of biochar and monitored natural attenuation for groundwater heavily contaminated with volatile organic compounds. Science of The Total Environment 846, 157316 (2022).
