# Putty powder production | CN

Dataset: ILCD process
Classification: Materials production / Other mineralic materials
Generated by: Jiaqi Lu, wilsherelu@foxmail.com
Amounts: no units in this file; such an amount is in the reference unit of its flow, which a separate flow dataset defines

## Reference product
- Putty Powder: 1000
  腻子粉产品

## Inputs
- White Portland cement: 100
  白色硅酸盐水泥
- Calcium Powder: 440
  钙粉
- Caulk Compound: 50
  胶粉
- Ordinary Portland Cement: 270
  普通硅酸盐水泥
- sand: 220
  沙子
- crushed stone 16/32: 500
  石粉
- gypsum: 160
  石膏
- Shuangfei Powder: 600
  双飞粉
- Cement: 160
  水泥
- Calcium carbonate (> 63 microns): 200
  重钙粉
- electricity mix: 122.616
- water: 320

## Outputs
- Particles (PM0.2 - PM2.5): 70
  总颗粒物[排放到大气（未指定类型）]
- phosphorus, total: 1.75
  总磷[排放到水体（未指定类型）]
- non-methane volatile organic compounds: 3240
  non-methane volatile organic compounds[排放到大气（未指定类型）]
