# 晶圆切片

Dataset: ILCD process, Unit process, single operation
Geography: CN
Reference year: 2016
Classification: Materials production / Other mineralic materials
Functional unit: Grid-connected electricity generation from a 1 MWp multi-Si PV system, whose lifespan is 30 years of a 10 MWp power station has been taken as the research object and the functional unit
LCI method principle: Attributional
LCI method approaches: Allocation
Generated by: 杨锦锋, yjfzfshn@163.com
Review: Dependent internal review by Tiangong LCI Data Working Group
Amounts: no units in this file; such an amount is in the reference unit of its flow, which a separate flow dataset defines
copyright: false

## General comment
多晶硅

## Geography
该电站位于宁夏中部地区，年平均太阳辐射量约为5955.80 MJ m2 a-1，年平均日照高峰时数为1718h

## Time period
文章发表

## Reference product
- Multi-Si wafer: 1; article inperiodical
  SoG-Si wafer

## Inputs
All rows: article inperiodical
- electricity: 2.304
  Electricity
- Solar grade multi-Si: 0.0204
  SoG-Si ingot
- Water (fresh water): 4.26
  Fresh water
- Steel Wire,Cable: 0.01314
  Steel wire
- Polyethylene glycol: 0.0231
- Silicon carbide: 0.02008
- Glass: 0.00839
- Glue: 0.00012
- Lactic acid: 0.00093
- citric acid: 0.00062
  Citric acid
- Detergent: 0.00111

## Outputs
All rows: article inperiodical
- waste water - untreated: 0.48589
  Waste water
- Waste (solid): 0.09582
  Waste mortar
- Steel scrap (St),Steel scrap (St): 0.01314
  Waste steel wire
- Glass for recovery (shards): 0.00839
  Waste glass
- organic waste (unspecified): 0.00012
  Glue (Organic waste)
- l-(+)-lactic acid: 0.00093
  Lactic acid (Hazardous
  waste)
- citric acid: 0.00062
  Citric acid (Hazardous
  waste)
- hydrogen chloride: 5e-7
  Hydrogen chloride
- Nitrogen oxides: 3e-6
- fluoride: 0.00044
  Fluoride
- chloride: 7e-5
  Chlorides
- chemical oxygen demand: 0.00312
  Chemical oxygen
  demand (COD)
- nitrogen, total (excluding N2): 3e-5
  Total Nitrogen (TN)
- Suspended solids, unspecified: 5e-5
  Suspended solids (SS)
- industrial waste (unspecified): 0.00034
  Solid waste

## Deviations from the LCI method approaches
对中国冶金路线多晶硅光伏并网发电系统进行了生命周期评估

## Data selection and combination
调查云南、宁夏工厂

## Review details
Inventory: The internal review was done by several iteration steps concerning raw data validation, raw data documentation, representativity, completeness and consistency of modelling with regard to ISO 14040 and 14044.; Documentation: The review of the documentation was performed by Ecobilan and is in compliance with ISO 14040 and 14044. The data set documentation is correct in view of the appropriateness of the information provided. It includes all relevant information in view of data quality and scope of application of the respective LCI result.

## Data sources
- Yu, Z. et al. Life cycle assessment of grid-connected power generation from metallurgical route multi-crystalline silicon photovoltaic system in China. Applied Energy 185, 68–81 (2017).
