# 本地品牌纯牛奶生产 | 包装处理

Dataset: ILCD process, Unit process, single operation
Geography: CD-SC-CN
Reference year: 2017
Classification: Materials production / Other mineralic materials
Functional unit: The Tetra Pak 1litre pure liquid milk is selected to assess its lifecycle based carbon footprint.
Generated by: 杨瑞, 1632707028@qq.com
Review: Dependent internal review by Tiangong LCI Data Working Group
Amounts: no units in this file; such an amount is in the reference unit of its flow, which a separate flow dataset defines
copyright: false

## General comment
包装废弃物预处理选择回收利用。由于铝塑复合材料的分离技术通常具有较低的热值，因此这些容器不适合焚烧

## Geography
奶源基地位于中国四川省西南部洪崖县，距离省会成都市约147公里。乳品加工厂位于成都郊区郫县，距离奶源基地约175公里。品牌牛奶主要分布在距离乳制品加工厂约40公里的成都市中心。牛奶包装废弃物被运送到距离市中心约30公里的市政垃圾填埋场进行最终处理。

## Technology and included processes
本研究仅关注对纯牛奶生产有直接贡献的过程，即仅关注能源和材料投入以及碳排放的影响，如图1所示。从而简化了牛奶生命周期的系统边界，将其划分为原料奶生产、乳制品加工、产品运输和包装废弃物处理四个阶段。

## Reference product
- milk: 0.001; measured
  pure liquid milk

## Inputs
- hard coal: 0.00903; measured
  Raw coal
- Natural gas, at consumer EU-27: 4.63e-10; measured
- crude oil; 42.3 MJ/kg: 7.76e-6; measured
- Electricity: 0.04104; measured

## Outputs
- carbon dioxide: 0.0155; measured
- methane: 8.43e-5; measured
- carbon dioxide: 0.012; measured
  Landfill disposal
- carbon dioxide: 0.0623738; article inperiodical

## Deviations from the LCI method approaches
与传统的LCA相比，本研究简化了生命周期影响评估的过程，主要使用不同类别的指标来阐述生命周期清单的结果(Nigri et al.， 2014)。

## Data selection and combination
包装废弃物预处理选择回收利用。由于铝塑复合材料的分离技术通常具有较低的热值，这些容器不适合焚烧(Xie et al.， 2011)。因此，填埋处理是最终的选择(Meneses et al.， 2012)。填埋阶段的碳排放数据类似于Cherubini的卫生填埋处置清单(Cherubini et al.， 2009)，见表4。

## Review details
Inventory: The internal review was done by several iteration steps concerning raw data validation, raw data documentation, representativity, completeness and consistency of modelling with regard to ISO 14040 and 14044.; Documentation: The review of the documentation was performed by Ecobilan and is in compliance with ISO 14040 and 14044. The data set documentation is correct in view of the appropriateness of the information provided. It includes all relevant information in view of data quality and scope of application of the respective LCI result.

## Data sources
- Zhao, R., Xu, Y., Wen, X., Zhang, N. & Cai, J. Carbon footprint assessment for a local branded pure milk product: a lifecycle based approach. Food Sci. Technol 38, 98–105 (2017).
