# Sludge treatment and disposal|thermal drying-incineration

Dataset: ILCD process, Unit process, single operation
Geography: CN
Classification: Materials production / Other mineralic materials
Functional unit: One ton of sludge on a dry basis (1 t-DS) is defined as the functional unit.
Generated by: 金思甜, 2331276@tongji.edu.cn
Review: Dependent internal review by 天工LCI数据工作小组
Amounts: no units in this file; such an amount is in the reference unit of its flow, which a separate flow dataset defines

## Reference product
- Sludge: 1000; input; estimated
  a dry basis (1 t-DS)

## Inputs
All rows: measured
- Electricity: 707.04
- Diesel: 0.3
- hard coal; 26.3 MJ/kg: 900
- hydrogen chloride gas: 6.1
- sodium hydroxide: 5.4
- Limestone: 70

## Outputs
- electricity from waste incineration: 3535.2; measured
- heat: 11800; measured
- mineral waste (ash): 600; measured

## Review details
清单： 内部审查通过几个迭代步骤完成，涉及原始数据验证、原始数据记录、代表性、完整性、与 ISO 14040 和 14044 有关的建模的一致性。

## Data sources
- Combined Life Cycle Environmental and Exergetic Assessment of Four Typical Sewage Sludge Treatment Techniques in China
