# 深层天然气技术经济评价 | 火山岩储层|TOPSIS法优选

Dataset: ILCD process, Unit process, single operation
Geography: HLJ-CN
Reference year: 2009
Classification: Materials production / Other mineralic materials
LCI method principle: Attributional
LCI method approaches: Consequential
Generated by: 康诗康, 908798159@qq.com
Review: Dependent internal review by Tiangong LCI Data Working Group
Amounts: no units in this file; such an amount is in the reference unit of its flow, which a separate flow dataset defines
copyright: false

## General comment
按照气田开发方案设计的原理和程序提出了兴城火山岩储层开发方案的设计时在选择开发方式、划分开发层系和确定开发井网这三个方面应重点的考虑问题并采用改进后的TOPSIS法对开发方案进行了优选。

## Geography
松辽盆地兴城气田

## Time period
文献发表时间

## Technology and included processes
所谓气田开发 就是依据详探结果和必要的生产性开发试验 在综合研究的基础上对具 有工业价值的气田 按照国家对天然气生产的要求 从气田的实际情况和生产规律出发 制定出合理的开发方案 并对气田进行建设和投产

## Reference product
- Natural gas, at consumer EU-27: 14229.6; input; normal; article inperiodical
  估价模式,数据为分布，量中填写的数据为取平均（取中值）的结果

## Data selection and combination
徐深井区天然气以甲烷 含71.81%-80.23%为主、均不会出现反凝析现象。不会出现硫化氢腐蚀现象。地层压力高达 左右 弹性能量大。衰蝎开采比其它任何开发方式都经济和简便易行

## Data treatment and extrapolations
一个气田开发方案应该反映出技术、经济、质量、效益性能等方面的内容对于一个和国际接轨的气田 还要考虑健康、安全、环保等方面的因素。方案所设计的指标要符合国家和行业标准、规范。指标的选取要求覆盖面广而且各个指标间是相对独立的

## Review details
Inventory: The internal review was done by several iteration steps concerning raw data validation, raw data documentation, representativity, completeness and consistency of modelling with regard to ISO 14040 and 14044.; Documentation: The review of the documentation was performed by Ecobilan and is in compliance with ISO 14040 and 14044. The data set documentation is correct in view of the appropriateness of the information provided. It includes all relevant information in view of data quality and scope of application of the respective LCI result.

## Data sources
- 巩艳芬. 松辽盆地兴城气田火山岩储层天然气开发技术经济评价. (2009).
