# 挖掘土壤;土壤异位修复;挖掘和填埋

Dataset: ILCD process, Unit process, single operation
Geography: IT
Reference year: 2021
Classification: Unit processes / Other Services / Repair and maintenance
Generated by: 肖萌, xiaomeng@mail
Owner: 天工LCI数据工作小组
Review: Dependent internal review by 天工LCI数据工作小组
Amounts: no units in this file; such an amount is in the reference unit of its flow, which a separate flow dataset defines
copyright: false
licenseType: Free of charge for all users and uses

## General comment
被污染的土壤被收集、运输并在垃圾填埋场处理。该环节实现对场地原有的污染土壤进行开挖

## Geography
The site taken as a reference for the remediation is an area of 712 m2 located in a disused industrial district of Tuscany (Italy), in the past subjected to various productive activities that led to contamination with various metals, some of which potentially toxic such as lead (Pb), arsenic (As) and thallium (Tl). As it is a “site of national interest”, its exact location is considered confidential and cannot be disclosed.

## Technical purpose
上述工业过程应用于受污染土壤的环境修复，特别是在废弃的工业区域内。该方法包括开挖受污染土壤，运输到填埋场，以及后续的处置。该过程专门用于需要异位处理的土壤修复项目，并适用于包含重金属等危险物质的场地。

## Reference product
- Excavated soil,Excavated soil: 1; measured

## Inputs
- Diesel,Diesel: 0.136; measured
  0.136 kg Diesel per m3 of soil excavated

## Use advice
在使用此数据集时，用户必须确保修复过程与特定场地的特性、污染物类型及其浓度相关。建议根据当地规定确认填埋处置的可行性，因为重金属污染要求特定的填埋场分类。另外，由于该场地被指定为国家利益场地，必须保持对确切位置的保密。

## Review details
清单： 内部审查通过几个迭代步骤完成，涉及原始数据验证、原始数据记录、代表性、完整性、与 ISO 14040 和 14044 有关的建模的一致性。

## Data sources
- Vocciante, M., De Folly D’Auris, A., Franchi, E., Petruzzelli, G. & Ferro, S. CO2 footprint analysis of consolidated and innovative technologies in remediation activities. J Clean Prod 297, 126723 (2021).
