# 锂电池匣体含镍钴回收利用技术

Dataset: ILCD process, Unit process, black box
Geography: CN
Reference year: 2018
Classification: Materials production / Metals and semimetals
Functional unit: calculation basis is GEB2016 (12.0 × 1024 sej)
Generated by: 彭菲, pengfei24@email.ncu.edu.cn
Owner: 天工LCI数据工作小组
Review: Dependent internal review by 天工LCI数据工作小组
Amounts: no units in this file; such an amount is in the reference unit of its flow, which a separate flow dataset defines
copyright: false
licenseType: Free of charge for all users and uses

## General comment
利用回收的废旧匣钵，通过物理分离、还原浸出、串级分离、蒸发结晶、提纯等工艺，提取镍、钴、锰前驱体，以及碳酸锂等产品，生产明矾、硫酸钾等副产品。

## Technical purpose
所述镍钴匣体回收利用技术是指从回收的废旧匣钵材料中提取镍、钴、锰前驱体和碳酸锂等宝贵物资的过程。该技术旨在从废弃的锂电池匣体中回收这些关键材料。生成的副产品，包括明矾和硫酸钾，通常被用于各种工业应用中，如在明矾基产品和肥料的生产中使用。

## Reference product
- Ni-Co-containing saggars: 1000; input; measured
  含镍铬的纱锭

## Inputs
All rows: measured
- water,water: 149.2, 216, 85.6, 96.4 (4 entries)
- Electricity: 29.7, 17.82, 3.96, 59.4, 7.2 (5 entries)
- Sulfuric acid: 216
  硫酸
- waste water - untreated: 160
  浸渣洗涤水
- process steam: 10, 12, 10 (3 entries)
- potassium: 55.6
  氢氧化钾
- potassium: 59.6
  硫酸钾母液
- potassium: 20
  硫酸钾
- Potassium carbonate: 66
  碳酸钾
- process steam: 198
  蒸汽
- Ni-Co-Mn precursor,Ni-Co-Mn precursor: 5.8
  粗镍钴锰前驱体
- Lithium carbonate: 35.2
  粗镍钴锰前驱体
- Sulfuric acid(98%): 10
  硫酸（98%）
- carbon dioxide: 11
- water,water: 16
  纯净水
- ammonium: 9
  25%氨
- sodium hydroxide: 6
- Polishing Powder: 171.4
  抛光粉，含水量30%
- Acidic Leaching Liquor: 647
  酸性浸出液
- Concentrated Mother Liquor: 693.2
  滤液

## Outputs
All rows: measured
- bauxite: 977.8
  陶瓷骨料
- Polishing Powder: 171.4
  抛光粉，含水量30%
- Acidic Leaching Liquor: 647
  酸性浸出液
- Production residues (unspecified): 128.4
  浸出渣
- Alum: 166.2
  铝
- Ni-Co-Mn precursor,Ni-Co-Mn precursor: 5.8, 5, 28.2 (3 entries)
  镍钴锰前体
- Methanol: 693.2
  酒
- Magnesium hydroxide: 1.4
  氢氧化镁
- Aluminum hydroxide: 1.2
  氢氧化铝
- sulfate: 104
  硫酸钾
- Concentrated Mother Liquor: 59.6
  浓缩母液
- Process water: 656.8
  冷凝水
- Lithium carbonate: 35.2
  粗镍钴锰前驱体
- Slag: 1.8
  钙镁渣
- waste water - untreated: 58

## Data selection and combination
The data used in this article are mainly derived from the analysis data of the results of the pilot test conducted by the Institute of Process Engineering of the Chinese Academy of Sciences with a company in Hunan Province, China, including physical separation, reduction and leaching, cascade separation, crystallization, and purification. The emergy values of the various raw materials and emissions are from the Appendix of “Energy Analysis Theory and Practice” by Liu and Yang

## Use advice
使用这个数据集的用户应该确保数据专门应用于涉及从锂电池匣体回收和恢复镍、钴和锰的场景。在建模生命周期评估时，重要的是要考虑回收材料的使用阶段行为，并相应地应用数据。提供的数据中给出的能值必须谨慎处理，将刘和杨的《能量分析理论与实践》纳入作为方法论参考。该数据集是基于1 kWh能量当量的功能单元，以GEB2016（12.0×1024 sej）作为计算依据。用户应确保他们的方法与该基础保持一致，当解释和集成数据时。

## Review details
清单： 内部审查通过几个迭代步骤完成，涉及原始数据验证、原始数据记录、代表性、完整性、与 ISO 14040 和 14044 有关的建模的一致性。

## Data sources
- Zhang, W. et al. Evaluation of the Ecological Benefits of Recycling Multiple Metals from Lithium Battery Saggars Based on Emergy Analysis. SUSTAINABILITY 13, (2021).
