# 电力生产 ; 电力 ; 火电（77.3%）+水电（7.9%）+风电（11.1%）+太阳能发电（3.6%）

Dataset: ILCD process, Partly terminated system
Geography: XJ-CN
Reference year: 2019
Classification: Energy carriers and technologies / Electricity
LCI method principle: Other
Generated by: 熊若熙, xiongrx0126@163.com
Owner: 天工LCI数据工作小组
Review: Dependent internal review by 天工LCI数据工作小组
Amounts: no units in this file; such an amount is in the reference unit of its flow, which a separate flow dataset defines
copyright: false
licenseType: Free of charge for all users and uses

## General comment
电力产生形式包括火力发电、水力发电、风力发电和太阳能发电

## Time period
根据2019年能源统计年鉴数据计算

## Technical purpose
本数据集描述了包括火电、水电、风电和太阳能发电的混合电力生产，各自占比分别为77.3%、7.9%、11.1%和3.6%。适用于评估具有类似能源组合的电网电力消耗的环境影响。此数据适用于各个行业的可持续性分析，其中使用了这些来源的电力。

## Reference product
- Electricity: 3.6; calculated

## Outputs
- carbon dioxide: 0.677; calculated
- sulfur dioxide: 0.000117; calculated
- Nitrogen oxides: 0.000184503; calculated
- Dust (unspecified, from stack): 2.2347e-5; calculated

## Data treatment and extrapolations
核算方法参考《企业温室气体排放核算方法与报告指南 发电设施》。不同形式发电量及燃料用量来自于《中国能源统计年鉴 2020》中的第三章（能源生产） 和第六章（地区能源平衡表）。用于计算二氧化碳排放因子的低位发热量、单位热值含碳量等燃料参数来自于《2019 年度中国区域电网二氧化碳基准线排放因子 OM 计算说明》、《企业温室气体排放核算方法与报告指南 发电设施》

## Use advice
在使用此数据进行生命周期评估或任何环境影响分析时，确保将其应用于具有类似电力发电特性的区域。应注意数据的基准年（2019年）以及根据特定参考指南确定的每种发电类型独有的碳排放因子。用户应根据自2019年以来能源组合或能源生产技术进步的任何变化调整数据。

## Review details
清单： 内部审查通过几个迭代步骤完成，涉及原始数据验证、原始数据记录、代表性、完整性、与 ISO 14040 和 14044 有关的建模的一致性。

## Data sources
- 熊若熙. 中国电力生产和消费二氧化碳与污染物排放因子核算. (清华大学, 2023).
