# 电力生产 ; 电力 ; 火电（49.5%）+水电（29.7%）+风电（13.7%）+太阳能发电（7.1%）

Dataset: ILCD process, Partly terminated system
Geography: GS-CN
Reference year: 2019
Classification: Energy carriers and technologies / Electricity
LCI method principle: Other
Generated by: 熊若熙, xiongrx0126@163.com
Owner: 天工LCI数据工作小组
Review: Dependent internal review by 天工LCI数据工作小组
Amounts: no units in this file; such an amount is in the reference unit of its flow, which a separate flow dataset defines
copyright: false
licenseType: Free of charge for all users and uses

## General comment
电力产生形式包括火力发电、水力发电、风力发电和太阳能发电

## Time period
根据2019年能源统计年鉴数据计算

## Technical purpose
该工业过程涉及通过混合能源方式产生电力：火力发电、水力发电、风力发电和太阳能发电。这些电力被用于普通消费者使用、工业消费和服务业。能源来源的分解包括49.5%来自火力发电，29.7%来自水力发电，13.7%来自风力发电，以及7.1%来自太阳能发电。这种能源组合被用来满足电力网的不同需求和可靠性要求。

## Reference product
- Electricity: 3.6; calculated

## Outputs
- carbon dioxide: 0.413; calculated
- sulfur dioxide: 7.1e-5; calculated
- Nitrogen oxides: 0.000112248; calculated
- Dust (unspecified, from stack): 1.3671e-5; calculated

## Data treatment and extrapolations
核算方法参考《企业温室气体排放核算方法与报告指南 发电设施》。不同形式发电量及燃料用量来自于《中国能源统计年鉴 2020》中的第三章（能源生产） 和第六章（地区能源平衡表）。用于计算二氧化碳排放因子的低位发热量、单位热值含碳量等燃料参数来自于《2019 年度中国区域电网二氧化碳基准线排放因子 OM 计算说明》、《企业温室气体排放核算方法与报告指南 发电设施》

## Use advice
在使用这些工业过程数据进行生命周期评估（LCA）时，必须仔细关注数据来源和计算方法。碳排放因子是根据2019年能源统计年鉴数据计算的，核算方法概述在《企业温室气体排放核算方法与报告指南 发电设施》中。用户应确保根据《中国能源统计年鉴 2020》和《2019 年度中国区域电网二氧化碳基准线排放因子 OM 计算说明》中的数据，反映不同电力发电形式的碳排放计算以及燃料消耗的区域差异和特定特性。还建议用户定期更新数据集，因为新的统计数据变得可用，以保持LCA研究的准确性。

## Review details
清单： 内部审查通过几个迭代步骤完成，涉及原始数据验证、原始数据记录、代表性、完整性、与 ISO 14040 和 14044 有关的建模的一致性。

## Data sources
- 熊若熙. 中国电力生产和消费二氧化碳与污染物排放因子核算. (清华大学, 2023).
