# 土壤修复;原位修复;生物通风;注汽井建设

Dataset: ILCD process, Unit process, single operation
Geography: CN
Reference year: 2022
Classification: Other Services / Repair and maintenance
Generated by: 王宁, wang_ning@caep.org.cn
Owner: 天工LCI数据工作小组
Review: Dependent internal review by 天工LCI数据工作小组
Amounts: no units in this file; such an amount is in the reference unit of its flow, which a separate flow dataset defines
copyright: false
licenseType: Free of charge for all users and uses

## General comment
空气注入井建设

## Geography
案例焦化厂位于我国北方中纬度地带

## Technology and included processes
使用柴油、水、PVC等建造空气注入井和抽提井

## Technical purpose
该土壤修复工艺，特别是使用生物通风的原位生物修复方法，包括安装空气注入系统、抽提系统和废气处理设施。该数据集描述的过程作为一个案例研究中的单一操作单元应用于中国北方中纬度区域的焦化厂。

## Reference product
- injection well: 1; measured

## Inputs
- diesel: 0.506; measured
- Polyvinyl chloride: 1000; measured
- Water (fresh water): 785; measured

## Use advice
使用该数据集时，用户应确保其环境影响评估的范围准确反映了原位生物通风过程的特定条件，如中国北方的区域气候条件。应重视空气注入与抽取系统的运行参数以及废气处理设施的效能。用户应考虑由于生物通风过程中污染物形态改变可能导致的环境影响转移，同时验证数据与所评估具体场地的相关性。

## Review details
清单： 内部审查通过几个迭代步骤完成，涉及原始数据验证、原始数据记录、代表性、完整性、与 ISO 14040 和 14044 有关的建模的一致性。

## Data sources
- 刘文晓,夏天翔,张丽娜等.基于修复效果的污染土壤修复工程环境足迹分析[J].环境科学研究,2022,35(10):2367-2377.DOI:10.13198/j.issn.1001-6929.2022.07.05.
