# 电力生产 ; 电力 ; 火电（61.6%）+水电（34.1%）+风电（3.5%）+太阳能发电（0.9%）

Dataset: ILCD process, Partly terminated system
Geography: GZ-CN
Reference year: 2019
Classification: Energy carriers and technologies / Electricity
LCI method principle: Other
Generated by: 熊若熙, xiongrx0126@163.com
Owner: 天工LCI数据工作小组
Review: Dependent internal review by 天工LCI数据工作小组
Amounts: no units in this file; such an amount is in the reference unit of its flow, which a separate flow dataset defines
copyright: false
licenseType: Free of charge for all users and uses

## General comment
电力产生形式包括火力发电、水力发电、风力发电和太阳能发电

## Time period
根据2019年能源统计年鉴数据计算

## Technical purpose
该数据集描述了一种电力生产的工业过程，其中包括通过多种方法生成电力：火力发电、水力发电、风力发电和太阳能发电。电力生产的构成是火力发电61.6%，水力发电34.1%，风力发电3.5%和太阳能发电0.9%。这种电力生成形式的混合可用于供应电网，满足住宅、商业和工业用途的能源需求。

## Reference product
- Electricity: 3.6; calculated

## Outputs
- carbon dioxide: 0.463; calculated
- sulfur dioxide: 9.9e-5; calculated
- Nitrogen oxides: 0.0001563; calculated
- Dust (unspecified, from stack): 1.9028e-5; calculated

## Data treatment and extrapolations
核算方法参考《企业温室气体排放核算方法与报告指南 发电设施》。不同形式发电量及燃料用量来自于《中国能源统计年鉴 2020》中的第三章（能源生产） 和第六章（地区能源平衡表）。用于计算二氧化碳排放因子的低位发热量、单位热值含碳量等燃料参数来自于《2019 年度中国区域电网二氧化碳基准线排放因子 OM 计算说明》、《企业温室气体排放核算方法与报告指南 发电设施》

## Use advice
应用该数据集进行生命周期评估（LCA）的用户，在确定需要电力的产品或系统的环境影响时，应考虑电力生产的具体组合。碳排放因子基于2019年能源统计年鉴数据计算。在分析与电力相关的排放时，遵循《企业温室气体排放核算方法与报告指南 发电设施》中概述的核算方法至关重要。数据集用户还应意识到技术的适用性，并确保数据的区域相关性符合其评估范围。必须相应考虑不同形式的发电和燃料使用，以及计算二氧化碳排放因子的燃料参数。

## Review details
清单： 内部审查通过几个迭代步骤完成，涉及原始数据验证、原始数据记录、代表性、完整性、与 ISO 14040 和 14044 有关的建模的一致性。

## Data sources
- 熊若熙. 中国电力生产和消费二氧化碳与污染物排放因子核算. (清华大学, 2023).
